# OpenSim document version 40000
Model Zara61:
  gravity: 0 -9.80665 0
  length_units: meters
  force_units: N
  credits:
    Menegolo Andrea IMPORTANT NOTE: The geometry files included in the ULB_Project.zip file have similar names but different reference frames from the ones included in the OpenSim distribution. Please, include the Geometry directory from this model in the front of your GeometryPath.
  publications:
    Delp, S.L., Loan, J.P., Hoy, M.G., Zajac, F.E., Topp E.L., Rosen, J.M.: An interactive graphics-based model of the lower extremity to study orthopaedic surgical procedures, IEEE Transactions on Biomedical Engineering, vol. 37, pp. 757-767, 1990. Yamaguchi G.T., Zajac F.E.: A planar model of the knee joint to characterize the knee extensor mechanism." J . Biomecl7. vol. 21. pp. 1-10. 1989. Anderson F.C., Pandy M.G.: A dynamic optimization solution for vertical jumping in three dimensions. Computer Methods in Biomechanics and Biomedical Engineering 2:201-231, 1999. Anderson F.C., Pandy M.G.: Dynamic optimization of human walking. Journal of Biomechanical Engineering 123:381-390, 2001. Delp SL, Anderson FC, Arnold AS, Loan P, Habib A, John CT, Guendelman E, Thelen DG (in press). OpenSim: Open-source Software to Create and Analyze Dynamic Simulations of Movement. IEEE Transactions on Biomedical Engineering. (2007) Holzbaur KR, Murray WM, Delp SL.: A model of the upper extremity for simulating musculoskeletal surgery and analyzing neuromuscular control., Ann Biomed Eng. 2005 Jun;33(6):829-40. (2005)
  Ground
  BodySet:
    Body ulna_l: mass=0 [kg] mass_center=(0 0 0) inertia=(0 0 0 0 0 0) meshes=ulna_l.vtp
    Body radius_l: mass=0 mass_center=(0 0 0) inertia=(0 0 0 0 0 0) meshes=radius_l.vtp
    Body lunate_l: mass=0 mass_center=(0 0 0) inertia=(0 0 0 0 0 0) meshes=Geometry/lunate_l.vtp
    Body scaphoid_l: mass=0 mass_center=(0 0 0) inertia=(0 0 0 0 0 0) meshes=Geometry/scaphoid_l.vtp
    Body pisiform_l: mass=0 mass_center=(0 0 0) inertia=(0 0 0 0 0 0) meshes=Geometry/pisiform_l.vtp
    Body triquetrum_l: mass=0 mass_center=(0 0 0) inertia=(0 0 0 0 0 0) meshes=Geometry/triquetrum_l.vtp
    Body capitate_l: mass=0 mass_center=(0 0 0) inertia=(0 0 0 0 0 0) meshes=Geometry/capitate_l.vtp
    Body trapezium_l: mass=0 mass_center=(0 0 0) inertia=(0 0 0 0 0 0) meshes=Geometry/trapezium_l.vtp
    Body trapezoid_l: mass=0 mass_center=(0 0 0) inertia=(0 0 0 0 0 0) meshes=Geometry/trapezoid_l.vtp
    Body hamate_l: mass=0 mass_center=(0 0 0) inertia=(0 0 0 0 0 0) meshes=Geometry/hamate_l.vtp
    Body firstmc1_l: mass=0 mass_center=(0 0 0) inertia=(0 0 0 0 0 0)
    Body firstmc_l: mass=0 mass_center=(0 0 0) inertia=(0 0 0 0 0 0) meshes=Geometry/1mc_l.vtp
    Body secondmc_l: mass=0 mass_center=(0 0 0) inertia=(0 0 0 0 0 0) meshes=Geometry/2mc_l.vtp
    Body thirdmc_l: mass=0 mass_center=(0 0 0) inertia=(0 0 0 0 0 0) meshes=Geometry/3mc_l.vtp
    Body fourthmc_l: mass=0 mass_center=(0 0 0) inertia=(0 0 0 0 0 0) meshes=Geometry/4mc_l.vtp
    Body fifthmc_l: mass=0 mass_center=(0 0 0) inertia=(0 0 0 0 0 0) meshes=Geometry/5mc_l.vtp
    Body proximal_thumb_l: mass=0 mass_center=(0 0 0) inertia=(0 0 0 0 0 0) meshes=Geometry/thumbprox_l.vtp
    Body distal_thumb_l: mass=0 mass_center=(0 0 0) inertia=(0 0 0 0 0 0) meshes=Geometry/thumbdist_l.vtp
    Body 2proxph_l: mass=0 mass_center=(0 0 0) inertia=(0 0 0 0 0 0) meshes=Geometry/2proxph_l.vtp
    Body 2midph_l: mass=0 mass_center=(0 0 0) inertia=(0 0 0 0 0 0) meshes=Geometry/2midph_l.vtp
    Body 2distph_l: mass=0 mass_center=(0 0 0) inertia=(0 0 0 0 0 0) meshes=Geometry/2distph_l.vtp
    Body 3proxph_l: mass=0 mass_center=(0 0 0) inertia=(0 0 0 0 0 0) meshes=Geometry/3proxph_l.vtp
    Body 3midph_l: mass=0 mass_center=(0 0 0) inertia=(0 0 0 0 0 0) meshes=Geometry/3midph_l.vtp
    Body 3distph_l: mass=0 mass_center=(0 0 0) inertia=(0 0 0 0 0 0) meshes=Geometry/3distph_l.vtp
    Body 4proxph_l: mass=0 mass_center=(0 0 0) inertia=(0 0 0 0 0 0) meshes=Geometry/4proxph_l.vtp
    Body 4midph_l: mass=0 mass_center=(0 0 0) inertia=(0 0 0 0 0 0) meshes=Geometry/4midph_l.vtp
    Body 4distph_l: mass=0 mass_center=(0 0 0) inertia=(0 0 0 0 0 0) meshes=Geometry/4distph_l.vtp
    Body 5proxph_l: mass=0 mass_center=(0 0 0) inertia=(0 0 0 0 0 0) meshes=Geometry/5proxph_l.vtp
    Body 5midph_l: mass=0 mass_center=(0 0 0) inertia=(0 0 0 0 0 0) meshes=Geometry/5midph_l.vtp
    Body 5distph_l: mass=0 mass_center=(0 0 0) inertia=(0 0 0 0 0 0) meshes=Geometry/5distph_l.vtp
  JointSet:
    CustomJoint elbow: socket_parent_frame=ground_offset socket_child_frame=ulna_l_offset
      Coordinate floatyaw: default_value=0 range=(-3.141593 3.141593) clamped=true
      Coordinate floatroll: default_value=0 range=(-3.141593 3.141593) clamped=true
      Coordinate floatpitch: default_value=0 range=(-3.141593 3.141593) clamped=true
      Coordinate floatx: default_value=0 range=(-5 5) clamped=true
      Coordinate floaty: default_value=0 range=(-5 5) clamped=true
      Coordinate floatz: default_value=0 range=(-5 5) clamped=true
      PhysicalOffsetFrame ground_offset: socket_parent=/ground translation=(0 0 0) [meters]
      PhysicalOffsetFrame ulna_l_offset: socket_parent=/bodyset/ulna_l translation=(0 0 0)
      SpatialTransform:
        TransformAxis rotation1: coordinates=floatyaw axis=(1 0 0) LinearFunction(coefficients=1 0)
        TransformAxis rotation2: coordinates=floatroll axis=(0 1 0) LinearFunction(coefficients=1 0)
        TransformAxis rotation3: coordinates=floatpitch axis=(0 0 1) LinearFunction(coefficients=1 0)
        TransformAxis translation1: coordinates=floatx axis=(1 0 0) LinearFunction(coefficients=1 0)
        TransformAxis translation2: coordinates=floaty axis=(0 1 0) LinearFunction(coefficients=1 0)
        TransformAxis translation3: coordinates=floatz axis=(0 0 1) LinearFunction(coefficients=1 0)
    CustomJoint radioulnar_l: socket_parent_frame=ulna_l_offset socket_child_frame=radius_l_offset
      Coordinate pro_sup_l: default_value=1.570796 range=(-2.094395 3.141593) clamped=true
      PhysicalOffsetFrame ulna_l_offset: socket_parent=/bodyset/ulna_l translation=(0.00024019 -0.00690744 -0.0120092)
      PhysicalOffsetFrame radius_l_offset: socket_parent=/bodyset/radius_l translation=(0 0 0)
      SpatialTransform: axes_held_at_zero=(rotation2 rotation3 translation1 translation2 translation3)
        TransformAxis rotation1: coordinates=pro_sup_l axis=(0.01716099 -0.9926656 -0.119668)
            LinearFunction(coefficients=1 0)
    CustomJoint radiocarpal_l: socket_parent_frame=radius_l_offset socket_child_frame=lunate_l_offset
      Coordinate deviation_l: default_value=0 range=(-1.570796 1.570796) clamped=true
      Coordinate flexion_l: default_value=0 range=(-3.141593 3.141593) clamped=true
      PhysicalOffsetFrame radius_l_offset: socket_parent=/bodyset/radius_l translation=(0.0108088 -0.145319 -0.0150122)
      PhysicalOffsetFrame lunate_l_offset: socket_parent=/bodyset/lunate_l translation=(0 0 0)
      SpatialTransform: axes_held_at_zero=(rotation3 translation1 translation2 translation3)
        TransformAxis rotation1: coordinates=deviation_l axis=(0 0 1) LinearFunction(coefficients=1 0)
        TransformAxis rotation2: coordinates=flexion_l axis=(-1 0 0) LinearFunction(coefficients=1 0)
    WeldJoint lun_scaph_l: socket_parent_frame=lunate_l_offset socket_child_frame=scaphoid_l_offset
      PhysicalOffsetFrame lunate_l_offset: socket_parent=/bodyset/lunate_l
          translation=(0.00669999 -0.00242276 0.00068058)
      PhysicalOffsetFrame scaphoid_l_offset: socket_parent=/bodyset/scaphoid_l translation=(0 0 0)
    WeldJoint lun_pis_l: socket_parent_frame=lunate_l_offset socket_child_frame=pisiform_l_offset
      PhysicalOffsetFrame lunate_l_offset: socket_parent=/bodyset/lunate_l
          translation=(-0.00726608 -0.00536543 0.00574913)
      PhysicalOffsetFrame pisiform_l_offset: socket_parent=/bodyset/pisiform_l translation=(0 0 0)
    WeldJoint lun_triq_l: socket_parent_frame=lunate_l_offset socket_child_frame=triquetrum_l_offset
      PhysicalOffsetFrame lunate_l_offset: socket_parent=/bodyset/lunate_l
          translation=(-0.00585279 -0.00406993 0.00069959)
      PhysicalOffsetFrame triquetrum_l_offset: socket_parent=/bodyset/triquetrum_l translation=(0 0 0)
    WeldJoint proximal_distal_l: socket_parent_frame=lunate_l_offset socket_child_frame=capitate_l_offset
      PhysicalOffsetFrame lunate_l_offset: socket_parent=/bodyset/lunate_l
          translation=(0.00216658 -0.00817025 -0.00126293)
      PhysicalOffsetFrame capitate_l_offset: socket_parent=/bodyset/capitate_l translation=(0 0 0)
    WeldJoint cap_trpzm_l: socket_parent_frame=capitate_l_offset socket_child_frame=trapezium_l_offset
      PhysicalOffsetFrame capitate_l_offset: socket_parent=/bodyset/capitate_l
          translation=(0.00829996 -0.00247974 0.00559447)
      PhysicalOffsetFrame trapezium_l_offset: socket_parent=/bodyset/trapezium_l translation=(0 0 0)
    WeldJoint cap_trpzd_l: socket_parent_frame=capitate_l_offset socket_child_frame=trapezoid_l_offset
      PhysicalOffsetFrame capitate_l_offset: socket_parent=/bodyset/capitate_l
          translation=(0.00496219 -0.00220457 0.00133729)
      PhysicalOffsetFrame trapezoid_l_offset: socket_parent=/bodyset/trapezoid_l translation=(0 0 0)
    WeldJoint cap_ham_l: socket_parent_frame=capitate_l_offset socket_child_frame=hamate_l_offset
      PhysicalOffsetFrame capitate_l_offset: socket_parent=/bodyset/capitate_l
          translation=(-0.00595322 -0.00135411 0.00040704)
      PhysicalOffsetFrame hamate_l_offset: socket_parent=/bodyset/hamate_l translation=(0 0 0)
    CustomJoint CMC1a_l: socket_parent_frame=trapezium_l_offset socket_child_frame=firstmc1_l_offset
      Coordinate cmc_flexion_l: default_value=0 range=(-0.2617994 0.7853982) clamped=true
      PhysicalOffsetFrame trapezium_l_offset: socket_parent=/bodyset/trapezium_l translation=(0 0 0)
      PhysicalOffsetFrame firstmc1_l_offset: socket_parent=/bodyset/firstmc1_l translation=(0 0 0)
      SpatialTransform: axes_held_at_zero=(rotation2 rotation3 translation1 translation2 translation3)
        TransformAxis rotation1: coordinates=cmc_flexion_l axis=(0.04239899 0.6652858 0.7453838)
            LinearFunction(coefficients=1 0)
    CustomJoint CMC1b_l: socket_parent_frame=firstmc1_l_offset socket_child_frame=firstmc_l_offset
      Coordinate cmc_abduction_l: default_value=0 range=(-0.6981317 0.8726646) clamped=true
      PhysicalOffsetFrame firstmc1_l_offset: socket_parent=/bodyset/firstmc1_l
          translation=(0.00320801 -0.00240601 0.00111389)
      PhysicalOffsetFrame firstmc_l_offset: socket_parent=/bodyset/firstmc_l translation=(0 0 0)
      SpatialTransform: axes_held_at_zero=(rotation2 rotation3 translation1 translation2 translation3)
        TransformAxis rotation1: coordinates=cmc_abduction_l axis=(-0.495557 -0.731736 0.467959)
            LinearFunction(coefficients=1 0)
    WeldJoint CMC2_l: socket_parent_frame=capitate_l_offset socket_child_frame=secondmc_l_offset
      PhysicalOffsetFrame capitate_l_offset: socket_parent=/bodyset/capitate_l
          translation=(0.00857208 -0.0219599 -0.00293732)
      PhysicalOffsetFrame secondmc_l_offset: socket_parent=/bodyset/secondmc_l translation=(0 0 0)
    WeldJoint CMC3_l: socket_parent_frame=capitate_l_offset socket_child_frame=thirdmc_l_offset
      PhysicalOffsetFrame capitate_l_offset: socket_parent=/bodyset/capitate_l
          translation=(0.00027843 -0.022905 -0.00430619)
      PhysicalOffsetFrame thirdmc_l_offset: socket_parent=/bodyset/thirdmc_l translation=(0 0 0)
    WeldJoint CMC4_l: socket_parent_frame=capitate_l_offset socket_child_frame=fourthmc_l_offset
      PhysicalOffsetFrame capitate_l_offset: socket_parent=/bodyset/capitate_l
          translation=(-0.00703162 -0.0236522 -0.00205065)
      PhysicalOffsetFrame fourthmc_l_offset: socket_parent=/bodyset/fourthmc_l translation=(0 0 0)
    WeldJoint CMC5_l: socket_parent_frame=capitate_l_offset socket_child_frame=fifthmc_l_offset
      PhysicalOffsetFrame capitate_l_offset: socket_parent=/bodyset/capitate_l
          translation=(-0.0127814 -0.0202455 0.00246217)
      PhysicalOffsetFrame fifthmc_l_offset: socket_parent=/bodyset/fifthmc_l translation=(0 0 0)
    CustomJoint MCP_l: socket_parent_frame=firstmc_l_offset socket_child_frame=proximal_thumb_l_offset
      Coordinate mp_flexion_l: default_value=0 range=(-0.7807963 0) clamped=true
      PhysicalOffsetFrame firstmc_l_offset: socket_parent=/bodyset/firstmc_l
          translation=(0.00798956 -0.0141391 0.00614956)
      PhysicalOffsetFrame proximal_thumb_l_offset: socket_parent=/bodyset/proximal_thumb_l translation=(0 0 0)
      SpatialTransform: axes_held_at_zero=(rotation2 rotation3 translation1 translation2 translation3)
        TransformAxis rotation1: coordinates=mp_flexion_l axis=(0.084295 0.203488 0.975442)
            LinearFunction(coefficients=1 0)
    CustomJoint IP_l: socket_parent_frame=proximal_thumb_l_offset socket_child_frame=distal_thumb_l_offset
      Coordinate ip_flexion_l: default_value=0 range=(-1.22173 0) clamped=true
      PhysicalOffsetFrame proximal_thumb_l_offset: socket_parent=/bodyset/proximal_thumb_l
          translation=(0.0067468 -0.0124816 0.00486734)
      PhysicalOffsetFrame distal_thumb_l_offset: socket_parent=/bodyset/distal_thumb_l translation=(0 0 0)
      SpatialTransform: axes_held_at_zero=(rotation2 rotation3 translation1 translation2 translation3)
        TransformAxis rotation1: coordinates=ip_flexion_l axis=(0.05010201 0.4796231 0.8760431)
            LinearFunction(coefficients=1 0)
    CustomJoint 2MCP_l: socket_parent_frame=secondmc_l_offset socket_child_frame=2proxph_l_offset
      Coordinate 2mcp_flexion_l: default_value=4e-8 range=(-0.3490659 1.745329) clamped=true
      Coordinate 2mcp_abduction_l: default_value=0 range=(0 0.3490659) clamped=true
      PhysicalOffsetFrame secondmc_l_offset: socket_parent=/bodyset/secondmc_l
          translation=(0.00131089 -0.0105751 -0.00135545) orientation=(0.15 -0.1 0.15) [radians]
      PhysicalOffsetFrame 2proxph_l_offset: socket_parent=/bodyset/2proxph_l translation=(0 0 0)
          orientation=(0.15 -0.1 0.15)
      SpatialTransform: axes_held_at_zero=(rotation3 translation1 translation2 translation3)
        TransformAxis rotation1: coordinates=2mcp_flexion_l axis=(-1 0 0) LinearFunction(coefficients=1 0)
        TransformAxis rotation2: coordinates=2mcp_abduction_l axis=(0 0 1) LinearFunction(coefficients=1 0)
    CustomJoint 2prox-midph_l: socket_parent_frame=2proxph_l_offset socket_child_frame=2midph_l_offset
      Coordinate 2pm_flexion_l: default_value=0 range=(0 2.094395) clamped=true
      PhysicalOffsetFrame 2proxph_l_offset: socket_parent=/bodyset/2proxph_l
          translation=(0.00458927 -0.0251979 -0.00447266) orientation=(0.15 -0.1 0.15)
      PhysicalOffsetFrame 2midph_l_offset: socket_parent=/bodyset/2midph_l translation=(0 0 0)
          orientation=(0.15 -0.1 0.15)
      SpatialTransform: axes_held_at_zero=(rotation2 rotation3 translation1 translation2 translation3)
        TransformAxis rotation1: coordinates=2pm_flexion_l axis=(-1 0 0) LinearFunction(coefficients=1 0)
    CustomJoint 2mid-distph_l: socket_parent_frame=2midph_l_offset socket_child_frame=2distph_l_offset
      Coordinate 2md_flexion_l: default_value=0 range=(-0.3490659 1.745329) clamped=true
      PhysicalOffsetFrame 2midph_l_offset: socket_parent=/bodyset/2midph_l
          translation=(0.00198868 -0.0148498 -0.00072793) orientation=(0.15 -0.1 0.15)
      PhysicalOffsetFrame 2distph_l_offset: socket_parent=/bodyset/2distph_l translation=(0 0 0)
          orientation=(0.15 -0.1 0.15)
      SpatialTransform: axes_held_at_zero=(rotation2 rotation3 translation1 translation2 translation3)
        TransformAxis rotation1: coordinates=2md_flexion_l axis=(-1 0 0) LinearFunction(coefficients=1 0)
    CustomJoint 3MCP_l: socket_parent_frame=thirdmc_l_offset socket_child_frame=3proxph_l_offset
      Coordinate 3mcp_flexion_l: default_value=0 range=(-0.8726646 1.570796) clamped=true
      Coordinate 3mcp_abduction_l: default_value=0 range=(0 0.17) clamped=true
      PhysicalOffsetFrame thirdmc_l_offset: socket_parent=/bodyset/thirdmc_l
          translation=(7.653e-5 -0.00838338 -0.00056697) orientation=(0.08 0 0.03)
      PhysicalOffsetFrame 3proxph_l_offset: socket_parent=/bodyset/3proxph_l translation=(0 0 0)
          orientation=(0.08 0 0.03)
      SpatialTransform: axes_held_at_zero=(rotation3 translation1 translation2 translation3)
        TransformAxis rotation1: coordinates=3mcp_flexion_l axis=(-1 0 0) LinearFunction(coefficients=1 0)
        TransformAxis rotation2: coordinates=3mcp_abduction_l axis=(0 0 1) LinearFunction(coefficients=1 0)
    CustomJoint 3prox-midph_l: socket_parent_frame=3proxph_l_offset socket_child_frame=3midph_l_offset
      Coordinate 3pm_flexion_l: default_value=0 range=(0 2.094395) clamped=true
      PhysicalOffsetFrame 3proxph_l_offset: socket_parent=/bodyset/3proxph_l
          translation=(0.00110792 -0.0296862 -0.00418325) orientation=(0.08 0 0.03)
      PhysicalOffsetFrame 3midph_l_offset: socket_parent=/bodyset/3midph_l translation=(0 0 0)
          orientation=(0.08 0 0.03)
      SpatialTransform: axes_held_at_zero=(rotation2 rotation3 translation1 translation2 translation3)
        TransformAxis rotation1: coordinates=3pm_flexion_l axis=(-1 0 0) LinearFunction(coefficients=1 0)
    CustomJoint 3mid-distph_l: socket_parent_frame=3midph_l_offset socket_child_frame=3distph_l_offset
      Coordinate 3md_flexion_l: default_value=0 range=(-0.3490659 1.745329) clamped=true
      PhysicalOffsetFrame 3midph_l_offset: socket_parent=/bodyset/3midph_l
          translation=(0.00088987 -0.0189364 -0.00127386) orientation=(0.08 0 0.03)
      PhysicalOffsetFrame 3distph_l_offset: socket_parent=/bodyset/3distph_l translation=(0 0 0)
          orientation=(0.08 0 0.03)
      SpatialTransform: axes_held_at_zero=(rotation2 rotation3 translation1 translation2 translation3)
        TransformAxis rotation1: coordinates=3md_flexion_l axis=(-1 0 0) LinearFunction(coefficients=1 0)
    CustomJoint 4MCP_l: socket_parent_frame=fourthmc_l_offset socket_child_frame=4proxph_l_offset
      Coordinate 4mcp_flexion_l: default_value=0 range=(-0.8726646 1.570796) clamped=true
      Coordinate 4mcp_abduction_l: default_value=0 range=(-0.17 0) clamped=true
      PhysicalOffsetFrame fourthmc_l_offset: socket_parent=/bodyset/fourthmc_l
          translation=(-0.00059812 -0.00774254 5.655e-5) orientation=(0.05 0.1 -0.07)
      PhysicalOffsetFrame 4proxph_l_offset: socket_parent=/bodyset/4proxph_l translation=(0 0 0)
          orientation=(0.05 0.4 -0.07)
      SpatialTransform: axes_held_at_zero=(rotation3 translation1 translation2 translation3)
        TransformAxis rotation1: coordinates=4mcp_flexion_l axis=(-1 0 0) LinearFunction(coefficients=1 0)
        TransformAxis rotation2: coordinates=4mcp_abduction_l axis=(0 0 1) LinearFunction(coefficients=1 0)
    CustomJoint 4prox-midph_l: socket_parent_frame=4proxph_l_offset socket_child_frame=4midph_l_offset
      Coordinate 4pm_flexion_l: default_value=0 range=(0 2.094395) clamped=true
      PhysicalOffsetFrame 4proxph_l_offset: socket_parent=/bodyset/4proxph_l
          translation=(-0.0025305 -0.0288733 -0.00096471) orientation=(0.05 0.4 -0.07)
      PhysicalOffsetFrame 4midph_l_offset: socket_parent=/bodyset/4midph_l translation=(0 0 0)
          orientation=(0.05 0.4 -0.07)
      SpatialTransform: axes_held_at_zero=(rotation2 rotation3 translation1 translation2 translation3)
        TransformAxis rotation1: coordinates=4pm_flexion_l axis=(-1 0 0) LinearFunction(coefficients=1 0)
    CustomJoint 4mid-distph_l: socket_parent_frame=4midph_l_offset socket_child_frame=4distph_l_offset
      Coordinate 4md_flexion_l: default_value=0 range=(-0.3490659 1.745329) clamped=true
      PhysicalOffsetFrame 4midph_l_offset: socket_parent=/bodyset/4midph_l
          translation=(-0.00176775 -0.0189127 -0.00042954) orientation=(0.05 0.4 -0.07)
      PhysicalOffsetFrame 4distph_l_offset: socket_parent=/bodyset/4distph_l translation=(0 0 0)
          orientation=(0.05 0.4 -0.07)
      SpatialTransform: axes_held_at_zero=(rotation2 rotation3 translation1 translation2 translation3)
        TransformAxis rotation1: coordinates=4md_flexion_l axis=(-1 0 0) LinearFunction(coefficients=1 0)
    CustomJoint 5MCP_l: socket_parent_frame=fifthmc_l_offset socket_child_frame=5proxph_l_offset
      Coordinate 5mcp_flexion_l: default_value=0 range=(-0.8726646 1.570796) clamped=true
      Coordinate 5mcp_abduction_l: default_value=0 range=(-0.3490659 0) clamped=true
      PhysicalOffsetFrame fifthmc_l_offset: socket_parent=/bodyset/fifthmc_l
          translation=(-0.00068327 -0.00916895 0.00064005) orientation=(0 0.2 -0.15)
      PhysicalOffsetFrame 5proxph_l_offset: socket_parent=/bodyset/5proxph_l translation=(0 0 0)
          orientation=(0 0.5 -0.15)
      SpatialTransform: axes_held_at_zero=(rotation3 translation1 translation2 translation3)
        TransformAxis rotation1: coordinates=5mcp_flexion_l axis=(-1 0 0) LinearFunction(coefficients=1 0)
        TransformAxis rotation2: coordinates=5mcp_abduction_l axis=(0 0 1) LinearFunction(coefficients=1 0)
    CustomJoint 5prox-midph_l: socket_parent_frame=5proxph_l_offset socket_child_frame=5midph_l_offset
      Coordinate 5pm_flexion_l: default_value=9.21e-6 range=(0 2.094395) clamped=true
      PhysicalOffsetFrame 5proxph_l_offset: socket_parent=/bodyset/5proxph_l
          translation=(-0.00351272 -0.0236641 0.00191572) orientation=(0 0.5 -0.15)
      PhysicalOffsetFrame 5midph_l_offset: socket_parent=/bodyset/5midph_l translation=(0 0 0)
          orientation=(0 0.5 -0.15)
      SpatialTransform: axes_held_at_zero=(rotation2 rotation3 translation1 translation2 translation3)
        TransformAxis rotation1: coordinates=5pm_flexion_l axis=(-1 0 0) LinearFunction(coefficients=1 0)
    CustomJoint 5mid-distph_l: socket_parent_frame=5midph_l_offset socket_child_frame=5distph_l_offset
      Coordinate 5md_flexion_l: default_value=0 range=(-0.3490659 1.745329) clamped=true
      PhysicalOffsetFrame 5midph_l_offset: socket_parent=/bodyset/5midph_l
          translation=(-0.00191441 -0.0137876 0.00149565) orientation=(0 0.5 -0.15)
      PhysicalOffsetFrame 5distph_l_offset: socket_parent=/bodyset/5distph_l translation=(0 0 0)
          orientation=(0 0.5 -0.15)
      SpatialTransform: axes_held_at_zero=(rotation2 rotation3 translation1 translation2 translation3)
        TransformAxis rotation1: coordinates=5md_flexion_l axis=(-1 0 0) LinearFunction(coefficients=1 0)
  MarkerSet:
    Marker Wrist_L: lunate_l (0 0 0)
    Marker Thumb_MCP_L: firstmc1_l (0 0 0)
    Marker Thumb_PIP_L: proximal_thumb_l (0 0 0)
    Marker Thumb_DIP_L: distal_thumb_l (0 0 0)
    Marker Thumb_TIP_L: distal_thumb_l (0.0036406 -0.00759107 0.00318146)
    Marker Index_MCP_L: 2proxph_l (0 0 0)
    Marker Index_PIP_L: 2midph_l (0 0 0)
    Marker Index_DIP_L: 2distph_l (0 0 0)
    Marker Little_PIP_L: 5midph_l (0 0 0)
    Marker Ring_PIP_L: 4midph_l (0 0 0)
    Marker Middle_PIP_L: 3midph_l (0 0 0)
    Marker Middle_MCP_L: 3proxph_l (0 0 0)
    Marker Ring_MCP_L: 4proxph_l (0 0 0)
    Marker Little_MCP_L: 5proxph_l (0 0 0)
    Marker Middle_DIP_L: 3distph_l (0 0 0)
    Marker Ring_DIP_L: 4distph_l (0 0 0)
    Marker Little_DIP_L: 5distph_l (0 0 0)
    Marker Index_TIP_L: 2distph_l (0.00139244 -0.0103364 -0.00093022)
    Marker Middle_TIP_L: 3distph_l (0.00079439 -0.0139604 -0.00068913)
    Marker Ring_TIP_L: 4distph_l (-0.00150248 -0.0127572 -0.00199878)
    Marker Little_TIP_L: 5distph_l (-0.00174837 -0.00981224 0.00081439)
