# OpenSim document version 30000
Model Zara61:
  length_units: meters
  force_units: N
  gravity: 0 -9.80665 0
  credits:
    Menegolo Andrea IMPORTANT NOTE: The geometry files included in the ULB_Project.zip file have similar names but different reference frames from the ones included in the OpenSim distribution. Please, include the Geometry directory from this model in the front of your GeometryPath.
  publications:
    Delp, S.L., Loan, J.P., Hoy, M.G., Zajac, F.E., Topp E.L., Rosen, J.M.: An interactive graphics-based model of the lower extremity to study orthopaedic surgical procedures, IEEE Transactions on Biomedical Engineering, vol. 37, pp. 757-767, 1990. Yamaguchi G.T., Zajac F.E.: A planar model of the knee joint to characterize the knee extensor mechanism." J . Biomecl7. vol. 21. pp. 1-10. 1989. Anderson F.C., Pandy M.G.: A dynamic optimization solution for vertical jumping in three dimensions. Computer Methods in Biomechanics and Biomedical Engineering 2:201-231, 1999. Anderson F.C., Pandy M.G.: Dynamic optimization of human walking. Journal of Biomechanical Engineering 123:381-390, 2001. Delp SL, Anderson FC, Arnold AS, Loan P, Habib A, John CT, Guendelman E, Thelen DG (in press). OpenSim: Open-source Software to Create and Analyze Dynamic Simulations of Movement. IEEE Transactions on Biomedical Engineering. (2007) Holzbaur KR, Murray WM, Delp SL.: A model of the upper extremity for simulating musculoskeletal surgery and analyzing neuromuscular control., Ann Biomed Eng. 2005 Jun;33(6):829-40. (2005)
  BodySet:
    Body ground: mass=0 mass_center=(0 0 0) inertia_xx=0 inertia_yy=0 inertia_zz=0 meshes=treadmill.vtp
    Body thorax: mass=0 mass_center=(0 0 0) inertia_xx=0 inertia_yy=0 inertia_zz=0
        meshes=(thorax.vtp hat_skull.vtp hat_jaw.vtp hat_spine.vtp)
      CustomJoint floatjoint: parent_body=ground location_in_parent=(-0.00297992 -0.375882 0.1720064) location=(0 0 0)
        Coordinate floatpitch: motion_type=rotational default_value=0 range=(-1.570796 1.570796) clamped=true
        Coordinate floatroll: motion_type=rotational default_value=0 range=(-1.570796 1.570796) clamped=true
        Coordinate floatyaw: motion_type=rotational default_value=0 range=(-3.141593 3.141593) clamped=true
        Coordinate floatx: motion_type=translational default_value=0 range=(-5 5) clamped=true
        Coordinate floaty: motion_type=translational default_value=0 range=(-5 5) clamped=true
        Coordinate floatz: motion_type=translational default_value=0 range=(-5 5) clamped=true
        SpatialTransform:
          TransformAxis rotation1: coordinates=floatroll axis=(0 0 1) LinearFunction(coefficients=1 0)
          TransformAxis rotation2: coordinates=floatpitch axis=(-1 0 0) LinearFunction(coefficients=1 0)
          TransformAxis rotation3: coordinates=floatyaw axis=(0 -1 0) LinearFunction(coefficients=1 0)
          TransformAxis translation1: coordinates=floatx axis=(1 0 0) LinearFunction(coefficients=1 0)
          TransformAxis translation2: coordinates=floaty axis=(0 1 0) LinearFunction(coefficients=1 0)
          TransformAxis translation3: coordinates=floatz axis=(0 0 1) LinearFunction(coefficients=1 0)
      WrapEllipsoid Thorax: xyz_body_rotation=(0.0434587 -0.331962 0.189892)
          translation=(-0.0390553 -0.128802 0.0717364) quadrant=all dimensions=(0.10118 0.136593 0.0809437)
      WrapEllipsoid Thorax_l: xyz_body_rotation=(-0.0434587 0.331962 0.189892)
          translation=(-0.0390553 -0.128802 -0.0717364) quadrant=all dimensions=(0.10118 0.136593 0.0809437)
    Body clavicle_l: mass=0 mass_center=(0 0 0) inertia_xx=0 inertia_yy=0 inertia_zz=0 meshes=clavicle_l.vtp
      WeldJoint sternoclavicular_l: parent_body=thorax location_in_parent=(0.00639962 0.00701175 -0.02576539)
          location=(0 0 0)
    Body clavphant_l: mass=0 mass_center=(0 0 0) inertia_xx=0 inertia_yy=0 inertia_zz=0
      WeldJoint unrotscap_l: parent_body=clavicle_l location_in_parent=(-0.01449905 0.02030676 -0.1371338)
          location=(0 0 0)
    Body scapula_l: mass=0 mass_center=(0 0 0) inertia_xx=0 inertia_yy=0 inertia_zz=0 meshes=scapula_l.vtp
      WeldJoint acromioclavicular_l: parent_body=clavphant_l location_in_parent=(0 0 0) location=(0 0 0)
      WrapEllipsoid Deltoid2_l: xyz_body_rotation=(-3.13042 1.54881 -1.31423)
          translation=(-0.00586842 -0.0382459 -0.00971324) active=false quadrant=-y
          dimensions=(0.0303539 0.0404719 0.0354129)
      WrapTorus Delt3_l: xyz_body_rotation=(-0.620988 -0.32882 -0.560774) translation=(-0.0984478 -0.0433049 0.0374365)
          active=false quadrant=all inner_radius=0.04047186 outer_radius=0.06070778
      WrapTorus INFSP_l: xyz_body_rotation=(-0.0253073 -0.58835 0.151844) translation=(-0.0567618 -0.0201348 0.0113321)
          quadrant=all inner_radius=0.00809437 outer_radius=0.01922414
      WrapEllipsoid TMIN_l: xyz_body_rotation=(2.09754 0.280823 -1.76348) translation=(-0.0422931 -0.0525122 0.0363235)
          quadrant=x dimensions=(0.0303539 0.0303539 0.0505898)
      WrapCylinder TRIlongglen_l: xyz_body_rotation=(-1.37532 0.294612 2.43596)
          translation=(-0.0363235 -0.0312645 0.0133557) quadrant=x radius=0.00303538 length=0.0303539
    Body scapphant_l: mass=0 mass_center=(0 0 0) inertia_xx=0 inertia_yy=0 inertia_zz=0
      WeldJoint unrothum_l: parent_body=scapula_l location_in_parent=(-0.00966265 -0.03440108 -0.00910616)
          location=(0 0 0)
    Body humphant_l: mass=0 mass_center=(0 0 0) inertia_xx=0 inertia_yy=0 inertia_zz=0
      WeldJoint shoulder0_l: parent_body=scapula_l location_in_parent=(0 0 0) location=(0 0 0)
    Body humphant1_l: mass=0 mass_center=(0 0 0) inertia_xx=0 inertia_yy=0 inertia_zz=0
      WeldJoint shoulder1_l: parent_body=humphant_l location_in_parent=(0 0 0) location=(0 0 0)
    Body humerus_l: mass=0 mass_center=(0 0 0) inertia_xx=0 inertia_yy=0 inertia_zz=0 meshes=humerus_l.vtp
      CustomJoint shoulder_l: parent_body=humphant1_l location_in_parent=(0 0 0) location=(0 0 0)
        Coordinate shoulder_elev_l: motion_type=rotational default_value=0 range=(-1.047198 1.570796) clamped=true
        Coordinate shoulder_add_l: motion_type=rotational default_value=0 range=(-1.919862 0.7853982) clamped=true
        Coordinate shoulder_rot_l: motion_type=rotational default_value=0 range=(-0.8726646 1.570796) clamped=true
        SpatialTransform: axes_held_at_zero=(translation1 translation2 translation3)
          TransformAxis rotation1: coordinates=shoulder_elev_l axis=(0 0 1) LinearFunction(coefficients=1 0)
          TransformAxis rotation2: coordinates=shoulder_add_l axis=(-1 0 0) LinearFunction(coefficients=1 0)
          TransformAxis rotation3: coordinates=shoulder_rot_l axis=(0 -1 0) LinearFunction(coefficients=1 0)
      WrapEllipsoid DELT1hh_l: xyz_body_rotation=(-0.0584685 -1.00461 0.570374)
          translation=(-0.00741146 -0.00677163 0.0139698) quadrant=-z dimensions=(0.0159959 0.0533198 0.0266599)
      WrapCylinder delt2hum_l: xyz_body_rotation=(-1.68093 0.0249582 0.0516617)
          translation=(0.00090644 -0.0510804 -0.00058651) quadrant=all radius=0.00501206 length=0.02665992
      WrapEllipsoid delt3hum_l: xyz_body_rotation=(-1.72735 -0.0759218 -2.74313)
          translation=(0.00101309 -0.0315653 -0.00058651) quadrant=x dimensions=(0.00533197 0.00533197 0.0266599)
      WrapEllipsoid SUPSP_l: xyz_body_rotation=(-0.0380482 -0.00855211 -1.30673)
          translation=(0.00010664 0.00410562 -0.00229275) quadrant=all dimensions=(0.010664 0.010664 0.010664)
      WrapEllipsoid INFSP_and_TMIN_hum_head_l: xyz_body_rotation=(0.286583 0.00907571 -0.0684169)
          translation=(-0.00015996 0.00138633 -0.00202615) quadrant=all dimensions=(0.010664 0.01333 0.010664)
      WrapEllipsoid SUBSCAP_l: xyz_body_rotation=(0.924501 -0.288852 0.381529)
          translation=(-0.001333 0.00037324 0.0023994) quadrant=all dimensions=(0.010664 0.00906437 0.0149296)
      WrapCylinder TMINhum_l: xyz_body_rotation=(-1.75353 -0.0692896 2.74628) translation=(-0.00074649 -0.0242605 0)
          quadrant=x radius=0.00373238 length=0.03732388
      WrapSphere TMAJ_LAT_PEC_CORBhh_l: translation=(0.00037324 0 -0.00319918) quadrant=all radius=0.01599594
      WrapCylinder TMAJ_LAThum_l: xyz_body_rotation=(-1.53641 0.0637045 1.41424)
          translation=(0.00037324 -0.0236207 0.00293259) quadrant=-x radius=0.00373238 length=0.02132794
      WrapEllipsoid PEC1hh_l: xyz_body_rotation=(0.620465 0.310494 0.363727)
          translation=(-0.00197284 0.00026659 0.001333) quadrant=z dimensions=(0.0159959 0.010664 0.010664)
      WrapCylinder PEC12hum_l: xyz_body_rotation=(-1.55928 0.0774926 -0.925897)
          translation=(0.0010664 -0.0270865 0.00090644) quadrant=x radius=0.00479879 length=0.03732388
      WrapSphere PEC23hh_l: translation=(-0.00458552 0.00111972 0.00021328) quadrant=all radius=0.01066396
      WrapCylinder PEC3hum_l: xyz_body_rotation=(-1.44094 0.0561996 1.75196)
          translation=(0.00047988 -0.0293792 0.00021328) quadrant=-x radius=0.00426558 length=0.03732388
      WrapCylinder LAT_TMAJhh_l: xyz_body_rotation=(0.305084 0.018326 -0.686613)
          translation=(-0.0119436 0.00543862 -0.00501206) quadrant=-y radius=0.00373238 length=0.02399394
      WrapSphere LAT_TMAJ2hh_l: xyz_body_rotation=(0.127235 -0.276111 0.0197222)
          translation=(-0.00085312 0.00490541 -0.00277264) quadrant=z radius=0.01599594
      WrapCylinder CORBhum_l: xyz_body_rotation=(1.60832 -0.0959931 0.875283)
          translation=(0.00143965 -0.0640905 0.00314587) quadrant=x radius=0.00426558 length=0.02665992
      WrapEllipsoid TRIlonghh_l: xyz_body_rotation=(-3.00162 0.853466 2.57419)
          translation=(-0.00415894 -0.00218612 0.00074649) quadrant=-z dimensions=(0.018662 0.010664 0.010664)
      WrapCylinder TRI_l: xyz_body_rotation=(0.14015 0.00628319 0.154985) translation=(0.00149296 -0.155641 0.00634507)
          quadrant=all radius=0.00853117 length=0.02132794
      WrapEllipsoid ANC_l: xyz_body_rotation=(-0.00750492 0.196699 1.04929)
          translation=(0.00714486 -0.152548 0.00042656) quadrant=-x dimensions=(0.010664 0.010664 0.010664)
      WrapEllipsoid BIClong_l: xyz_body_rotation=(2.00434 1.00164 0.975465)
          translation=(0.00175955 0.00389235 -0.00015996) quadrant=-y dimensions=(0.01333 0.010664 0.010664)
      WrapEllipsoid Elbow_BIC_BRD_l: xyz_body_rotation=(0.128631 -0.137532 0.0307178)
          translation=(0.00101309 -0.154094 0.00746479) quadrant=x dimensions=(0.00799801 0.00799801 0.0533198)
      WrapEllipsoid Elbow_PT_ECRL_l: xyz_body_rotation=(0.161094 0.110828 0.61453)
          translation=(0.00159962 -0.153135 0.00367906) quadrant=x dimensions=(0.00959755 0.01333 0.018662)
    Body ulna_l: mass=0 mass_center=(0 0 0) inertia_xx=0 inertia_yy=0 inertia_zz=0 meshes=ulna_l.vtp
      CustomJoint elbow_l: parent_body=humerus_l location_in_parent=(0.0032525 -0.1548411 0.00655835) location=(0 0 0)
        Coordinate elbow_flexion_l: motion_type=rotational default_value=0 range=(0 2.268928) clamped=true
        SpatialTransform: axes_held_at_zero=(rotation2 rotation3 translation1 translation2 translation3)
          TransformAxis rotation1: coordinates=elbow_flexion_l axis=(-0.04940001 -0.03660001 0.9981083)
              LinearFunction(coefficients=1 0)
      WrapCylinder PQ2_l: xyz_body_rotation=(-1.39138 -0.0689405 1.52245) translation=(-0.00072059 -0.125623 -0.025701)
          quadrant=all radius=0.00420343 length=0.0060049
    Body radius_l: mass=0 mass_center=(0 0 0) inertia_xx=0 inertia_yy=0 inertia_zz=0 meshes=radius_l.vtp
      CustomJoint radioulnar_l: parent_body=ulna_l location_in_parent=(0.00024019 -0.00690744 -0.0120092)
          location=(0 0 0)
        Coordinate pro_sup_l: motion_type=rotational default_value=0 range=(-1.570796 1.770796) clamped=true
        SpatialTransform: axes_held_at_zero=(rotation2 rotation3 translation1 translation2 translation3)
          TransformAxis rotation1: coordinates=pro_sup_l axis=(0.01716099 -0.9926656 -0.119668)
              LinearFunction(coefficients=1 0)
      WrapCylinder SUP_l: xyz_body_rotation=(-1.44775 -0.304036 -2.44102)
          translation=(0.00270221 -0.0262414 -0.00354288) quadrant=-x radius=0.00480391 length=0.02401959
      WrapTorus ECU_l: xyz_body_rotation=(0.986635 0.148877 0.222704) translation=(-0.009788 -0.145138 -0.0209571)
          quadrant=all inner_radius=0.00360294 outer_radius=0.00540441
      WrapCylinder PQ1_l: xyz_body_rotation=(1.60762 0.0127409 -2.69025) translation=(0.0168738 -0.119257 -0.0172941)
          quadrant=all radius=0.0060049 length=0.0060049
    Body lunate_l: mass=0 mass_center=(0 0 0) inertia_xx=0 inertia_yy=0 inertia_zz=0 meshes=lunate_l.vtp
      CustomJoint radiocarpal_l: parent_body=radius_l location_in_parent=(0.01080882 -0.1453186 -0.01501225)
          location=(0 0 0)
        Coordinate deviation_l: motion_type=rotational default_value=0 range=(-0.7853982 0.7853982) clamped=true
        Coordinate flexion_l: motion_type=rotational default_value=0 range=(-0.7853982 0.7853982) clamped=true
        SpatialTransform: axes_held_at_zero=(rotation3 translation1 translation2 translation3)
          TransformAxis rotation1: coordinates=deviation_l axis=(0 0 1) LinearFunction(coefficients=1 0)
          TransformAxis rotation2: coordinates=flexion_l axis=(-1 0 0) LinearFunction(coefficients=1 0)
      WrapEllipsoid Extensor_ellipse_l: xyz_body_rotation=(0.250804 -0.285536 0.232827)
          translation=(0.00037992 -0.00732686 -0.00255082) quadrant=-z dimensions=(0.0271365 0.0108546 0.00705548)
      WrapTorus ECRL_l: xyz_body_rotation=(-1.53833 -0.234398 0.731118) translation=(0.0120486 -0.00521021 -0.0112888)
          quadrant=all inner_radius=0.00434185 outer_radius=0.00868367
      WrapTorus ECRB_l: xyz_body_rotation=(-1.31266 0.11781 -0.116239) translation=(0.0068384 -0.00515595 -0.0100948)
          quadrant=all inner_radius=0.00434185 outer_radius=0.00542731
      WrapTorus FCR_l: xyz_body_rotation=(1.55596 0.15324 -0.100007) translation=(0.00173674 -0.00244231 0.0103119)
          quadrant=all inner_radius=0.00054272 outer_radius=0.00135684
      WrapTorus FCU_l: xyz_body_rotation=(1.57376 0.0797616 0.39235) translation=(-0.00667559 -0.00672986 0.00928069)
          quadrant=all inner_radius=0.00369054 outer_radius=0.00434185
      WrapEllipsoid PL_l: xyz_body_rotation=(0.0315905 -0.0996583 0.0633554)
          translation=(0.00309358 -0.00976914 0.0022252) quadrant=z dimensions=(0.0135683 0.00759822 0.00651278)
      WrapEllipsoid FDS_l: xyz_body_rotation=(-0.00837758 0.0816814 -0.0171042)
          translation=(0.00065128 -0.00309358 0.00016282) quadrant=z dimensions=(0.0135683 0.00705548 0.00651278)
      WrapEllipsoid FDP_l: xyz_body_rotation=(1.46747 0.194604 0.121824)
          translation=(-0.00119401 -0.00374484 -0.00173674) quadrant=y dimensions=(0.0135683 0.00705548 0.00651278)
      WrapTorus EDCL_l: xyz_body_rotation=(-2.36318 -0.193033 -0.26913)
          translation=(-0.00694697 -0.00721831 -0.00803243) quadrant=all inner_radius=0.00434185
          outer_radius=0.00651278
      WrapTorus EDCR_l: xyz_body_rotation=(-1.98392 -0.100531 0.523075)
          translation=(-0.00531876 -0.00743541 -0.00900933) quadrant=all inner_radius=0.00488457
          outer_radius=0.00597005
      WrapTorus EDCM_l: xyz_body_rotation=(-1.99317 -0.19792 0.368264) translation=(-0.00037992 -0.00634994 -0.0103661)
          quadrant=all inner_radius=0.00488457 outer_radius=0.00651278
      WrapTorus EDCI_l: xyz_body_rotation=(-1.69768 -0.0897099 0.00767945)
          translation=(0.00488457 -0.00808668 -0.0114516) quadrant=all inner_radius=0.00488457 outer_radius=0.00651278
      WrapEllipsoid EDM_l: xyz_body_rotation=(-2.9627 -0.159349 0.117984)
          translation=(-0.00906361 -0.00119401 -0.0026051) quadrant=z dimensions=(0.00976914 0.00759822 0.00434185)
      WrapEllipsoid FPL_l: xyz_body_rotation=(0.16633 0.082205 -0.0659735)
          translation=(0.00922641 -0.0135683 0.00179102) quadrant=z dimensions=(0.00868367 0.00542731 0.00542731)
    Body scaphoid_l: mass=0 mass_center=(0 0 0) inertia_xx=0 inertia_yy=0 inertia_zz=0 meshes=scaphoid_l.vtp
      WeldJoint lun_scaph_l: parent_body=lunate_l location_in_parent=(0.00669999 -0.00242276 0.00068058)
          location=(0 0 0)
    Body pisiform_l: mass=0 mass_center=(0 0 0) inertia_xx=0 inertia_yy=0 inertia_zz=0 meshes=pisiform_l.vtp
      WeldJoint lun_pis_l: parent_body=lunate_l location_in_parent=(-0.00726608 -0.00536543 0.00574913)
          location=(0 0 0)
    Body triquetrum_l: mass=0 mass_center=(0 0 0) inertia_xx=0 inertia_yy=0 inertia_zz=0 meshes=triquetrum_l.vtp
      WeldJoint lun_triq_l: parent_body=lunate_l location_in_parent=(-0.00585279 -0.00406993 0.00069959)
          location=(0 0 0)
    Body capitate_l: mass=0 mass_center=(0 0 0) inertia_xx=0 inertia_yy=0 inertia_zz=0 meshes=capitate_l.vtp
      WeldJoint proximal_distal_l: parent_body=lunate_l location_in_parent=(0.00216658 -0.00817025 -0.00126293)
          location=(0 0 0)
    Body trapezium_l: mass=0 mass_center=(0 0 0) inertia_xx=0 inertia_yy=0 inertia_zz=0 meshes=trapezium_l.vtp
      WeldJoint cap_trpzm_l: parent_body=capitate_l location_in_parent=(0.00829996 -0.00247974 0.00559447)
          location=(0 0 0)
    Body trapezoid_l: mass=0 mass_center=(0 0 0) inertia_xx=0 inertia_yy=0 inertia_zz=0 meshes=trapezoid_l.vtp
      WeldJoint cap_trpzd_l: parent_body=capitate_l location_in_parent=(0.00496219 -0.00220457 0.00133729)
          location=(0 0 0)
    Body hamate_l: mass=0 mass_center=(0 0 0) inertia_xx=0 inertia_yy=0 inertia_zz=0 meshes=hamate_l.vtp
      WeldJoint cap_ham_l: parent_body=capitate_l location_in_parent=(-0.00595322 -0.00135411 0.00040704)
          location=(0 0 0)
    Body firstmc1_l: mass=0 mass_center=(0 0 0) inertia_xx=0 inertia_yy=0 inertia_zz=0
      CustomJoint CMC1a_l: parent_body=trapezium_l location_in_parent=(0 0 0) location=(0 0 0)
        Coordinate cmc_flexion_l: motion_type=rotational default_value=0 range=(-0.2617994 0.7853982) clamped=true
        SpatialTransform: axes_held_at_zero=(rotation2 rotation3 translation1 translation2 translation3)
          TransformAxis rotation1: coordinates=cmc_flexion_l axis=(0.04239899 0.6652858 0.7453838)
              LinearFunction(coefficients=1 0)
      WrapTorus APL_l: xyz_body_rotation=(1.60989 -0.247837 -0.0301942) translation=(0.00397057 0.0011137 0.0048906)
          active=false quadrant=all inner_radius=0.00193686 outer_radius=0.00387373
    Body firstmc_l: mass=0 mass_center=(0 0 0) inertia_xx=0 inertia_yy=0 inertia_zz=0 meshes=1mc_l.vtp
      CustomJoint CMC1b_l: parent_body=firstmc1_l location_in_parent=(0.00320801 -0.00240601 0.00111389)
          location=(0 0 0)
        Coordinate cmc_abduction_l: motion_type=rotational default_value=0 range=(-0.6981317 0.8726646) clamped=true
        SpatialTransform: axes_held_at_zero=(rotation2 rotation3 translation1 translation2 translation3)
          TransformAxis rotation1: coordinates=cmc_abduction_l axis=(-0.495557 -0.731736 0.467959)
              LinearFunction(coefficients=1 0)
      WrapCylinder MPthumb_l: xyz_body_rotation=(-0.321315 -0.11013 -0.834791)
          translation=(0.00857063 -0.0147686 0.00692429) quadrant=all radius=0.00411584 length=0.00968432
    Body secondmc_l: mass=0 mass_center=(0 0 0) inertia_xx=0 inertia_yy=0 inertia_zz=0 meshes=2mc_l.vtp
      WeldJoint CMC2_l: parent_body=capitate_l location_in_parent=(0.00857208 -0.02195995 -0.00293732) location=(0 0 0)
      WrapEllipsoid 2ndmcp_l: xyz_body_rotation=(-1.48667 1.29661 2.43072)
          translation=(0.00220916 -0.0113828 0.00022466) quadrant=-x dimensions=(0.00187216 0.00187216 0.011233)
    Body thirdmc_l: mass=0 mass_center=(0 0 0) inertia_xx=0 inertia_yy=0 inertia_zz=0 meshes=3mc_l.vtp
      WeldJoint CMC3_l: parent_body=capitate_l location_in_parent=(0.00027843 -0.02290502 -0.00430619) location=(0 0 0)
    Body fourthmc_l: mass=0 mass_center=(0 0 0) inertia_xx=0 inertia_yy=0 inertia_zz=0 meshes=4mc_l.vtp
      WeldJoint CMC4_l: parent_body=capitate_l location_in_parent=(-0.00703162 -0.02365218 -0.00205065)
          location=(0 0 0)
    Body fifthmc_l: mass=0 mass_center=(0 0 0) inertia_xx=0 inertia_yy=0 inertia_zz=0 meshes=5mc_l.vtp
      WeldJoint CMC5_l: parent_body=capitate_l location_in_parent=(-0.01278136 -0.02024554 0.00246217) location=(0 0 0)
    Body proximal_thumb_l: mass=0 mass_center=(0 0 0) inertia_xx=0 inertia_yy=0 inertia_zz=0 meshes=thumbprox_l.vtp
      CustomJoint MCP_l: parent_body=firstmc_l location_in_parent=(0.00798956 -0.01413911 0.00614956) location=(0 0 0)
        Coordinate mp_flexion_l: motion_type=rotational default_value=0 range=(-0.7807963 0) clamped=true
        SpatialTransform: axes_held_at_zero=(rotation2 rotation3 translation1 translation2 translation3)
          TransformAxis rotation1: coordinates=mp_flexion_l axis=(0.084295 0.203488 0.975442)
              LinearFunction(coefficients=1 0)
      WrapCylinder IPthumb_l: xyz_body_rotation=(-0.304734 -0.0129154 0.0879646)
          translation=(0.00583116 -0.0145538 0.00462637) quadrant=-x radius=0.00216862 length=0.00481915
    Body distal_thumb_l: mass=0 mass_center=(0 0 0) inertia_xx=0 inertia_yy=0 inertia_zz=0 meshes=thumbdist_l.vtp
      CustomJoint IP_l: parent_body=proximal_thumb_l location_in_parent=(0.0067468 -0.01248158 0.00486734)
          location=(0 0 0)
        Coordinate ip_flexion_l: motion_type=rotational default_value=0 range=(-1.22173 0) clamped=true
        SpatialTransform: axes_held_at_zero=(rotation2 rotation3 translation1 translation2 translation3)
          TransformAxis rotation1: coordinates=ip_flexion_l axis=(0.05010201 0.4796231 0.8760431)
              LinearFunction(coefficients=1 0)
    Body 2proxph_l: mass=0 mass_center=(0 0 0) inertia_xx=0 inertia_yy=0 inertia_zz=0 meshes=2proxph_l.vtp
      CustomJoint 2MCP_l: parent_body=secondmc_l location_in_parent=(0.00131089 -0.01057509 -0.00135545)
          orientation_in_parent=(0.15 -0.1 0.15) location=(0 0 0) orientation=(0.15 -0.1 0.15)
        Coordinate 2mcp_flexion_l: motion_type=rotational default_value=4e-8 range=(-0.3490659 1.745329) clamped=true
        Coordinate 2mcp_abduction_l: motion_type=rotational default_value=0 range=(-0.7906585 0.3490659) clamped=true
        SpatialTransform: axes_held_at_zero=(rotation3 translation1 translation2 translation3)
          TransformAxis rotation1: coordinates=2mcp_flexion_l axis=(-1 0 0) LinearFunction(coefficients=1 0)
          TransformAxis rotation2: coordinates=2mcp_abduction_l axis=(0 0 1) LinearFunction(coefficients=1 0)
      WrapCylinder Secondpm_l: xyz_body_rotation=(-0.741939 1.47393 0.709651)
          translation=(0.00457889 -0.0248481 -0.00372416) quadrant=all radius=0.00244208 length=0.00610518
    Body 2midph_l: mass=0 mass_center=(0 0 0) inertia_xx=0 inertia_yy=0 inertia_zz=0 meshes=2midph_l.vtp
      CustomJoint 2prox-midph_l: parent_body=2proxph_l location_in_parent=(0.00458927 -0.02519789 -0.00447266)
          orientation_in_parent=(0.15 -0.1 0.15) location=(0 0 0) orientation=(0.15 -0.1 0.15)
        Coordinate 2pm_flexion_l: motion_type=rotational default_value=0 range=(0 2.094395) clamped=true
        SpatialTransform: axes_held_at_zero=(rotation2 rotation3 translation1 translation2 translation3)
          TransformAxis rotation1: coordinates=2pm_flexion_l axis=(-1 0 0) LinearFunction(coefficients=1 0)
      WrapCylinder Secondmd_l: xyz_body_rotation=(-0.501782 1.41302 0.647343)
          translation=(0.00214799 -0.0144989 -0.000179) quadrant=x radius=0.00178999 length=0.00596664
    Body 2distph_l: mass=0 mass_center=(0 0 0) inertia_xx=0 inertia_yy=0 inertia_zz=0 meshes=2distph_l.vtp
      CustomJoint 2mid-distph_l: parent_body=2midph_l location_in_parent=(0.00198868 -0.01484976 -0.00072793)
          orientation_in_parent=(0.15 -0.1 0.15) location=(0 0 0) orientation=(0.15 -0.1 0.15)
        Coordinate 2md_flexion_l: motion_type=rotational default_value=0 range=(-0.3490659 1.745329) clamped=true
        SpatialTransform: axes_held_at_zero=(rotation2 rotation3 translation1 translation2 translation3)
          TransformAxis rotation1: coordinates=2md_flexion_l axis=(-1 0 0) LinearFunction(coefficients=1 0)
    Body 3proxph_l: mass=0 mass_center=(0 0 0) inertia_xx=0 inertia_yy=0 inertia_zz=0 meshes=3proxph_l.vtp
      CustomJoint 3MCP_l: parent_body=thirdmc_l location_in_parent=(7.653e-5 -0.00838338 -0.00056697)
          orientation_in_parent=(0.08 0 0.03) location=(0 0 0) orientation=(0.08 0 0.03)
        Coordinate 3mcp_flexion_l: motion_type=rotational default_value=0 range=(-0.8726646 1.570796) clamped=true
        Coordinate 3mcp_abduction_l: motion_type=rotational default_value=0 range=(-0.7490659 0.3490659) clamped=true
        SpatialTransform: axes_held_at_zero=(rotation3 translation1 translation2 translation3)
          TransformAxis rotation1: coordinates=3mcp_flexion_l axis=(-1 0 0) LinearFunction(coefficients=1 0)
          TransformAxis rotation2: coordinates=3mcp_abduction_l axis=(0 0 1) LinearFunction(coefficients=1 0)
    Body 3midph_l: mass=0 mass_center=(0 0 0) inertia_xx=0 inertia_yy=0 inertia_zz=0 meshes=3midph_l.vtp
      CustomJoint 3prox-midph_l: parent_body=3proxph_l location_in_parent=(0.00110792 -0.02968624 -0.00418325)
          orientation_in_parent=(0.08 0 0.03) location=(0 0 0) orientation=(0.08 0 0.03)
        Coordinate 3pm_flexion_l: motion_type=rotational default_value=0 range=(0 2.094395) clamped=true
        SpatialTransform: axes_held_at_zero=(rotation2 rotation3 translation1 translation2 translation3)
          TransformAxis rotation1: coordinates=3pm_flexion_l axis=(-1 0 0) LinearFunction(coefficients=1 0)
    Body 3distph_l: mass=0 mass_center=(0 0 0) inertia_xx=0 inertia_yy=0 inertia_zz=0 meshes=3distph_l.vtp
      CustomJoint 3mid-distph_l: parent_body=3midph_l location_in_parent=(0.00088987 -0.01893635 -0.00127386)
          orientation_in_parent=(0.08 0 0.03) location=(0 0 0) orientation=(0.08 0 0.03)
        Coordinate 3md_flexion_l: motion_type=rotational default_value=0 range=(-0.3490659 1.745329) clamped=true
        SpatialTransform: axes_held_at_zero=(rotation2 rotation3 translation1 translation2 translation3)
          TransformAxis rotation1: coordinates=3md_flexion_l axis=(-1 0 0) LinearFunction(coefficients=1 0)
    Body 4proxph_l: mass=0 mass_center=(0 0 0) inertia_xx=0 inertia_yy=0 inertia_zz=0 meshes=4proxph_l.vtp
      CustomJoint 4MCP_l: parent_body=fourthmc_l location_in_parent=(-0.00059812 -0.00774254 5.655e-5)
          orientation_in_parent=(0.05 0.1 -0.07) location=(0 0 0) orientation=(0.05 0.4 -0.07)
        Coordinate 4mcp_flexion_l: motion_type=rotational default_value=0 range=(-0.8726646 1.570796) clamped=true
        Coordinate 4mcp_abduction_l: motion_type=rotational default_value=0 range=(-0.7490659 0.3490659) clamped=true
        SpatialTransform: axes_held_at_zero=(rotation3 translation1 translation2 translation3)
          TransformAxis rotation1: coordinates=4mcp_flexion_l axis=(-1 0 0) LinearFunction(coefficients=1 0)
          TransformAxis rotation2: coordinates=4mcp_abduction_l axis=(0 0 1) LinearFunction(coefficients=1 0)
    Body 4midph_l: mass=0 mass_center=(0 0 0) inertia_xx=0 inertia_yy=0 inertia_zz=0 meshes=4midph_l.vtp
      CustomJoint 4prox-midph_l: parent_body=4proxph_l location_in_parent=(-0.0025305 -0.02887327 -0.00096471)
          orientation_in_parent=(0.05 0.4 -0.07) location=(0 0 0) orientation=(0.05 0.4 -0.07)
        Coordinate 4pm_flexion_l: motion_type=rotational default_value=0 range=(0 2.094395) clamped=true
        SpatialTransform: axes_held_at_zero=(rotation2 rotation3 translation1 translation2 translation3)
          TransformAxis rotation1: coordinates=4pm_flexion_l axis=(-1 0 0) LinearFunction(coefficients=1 0)
    Body 4distph_l: mass=0 mass_center=(0 0 0) inertia_xx=0 inertia_yy=0 inertia_zz=0 meshes=4distph_l.vtp
      CustomJoint 4mid-distph_l: parent_body=4midph_l location_in_parent=(-0.00176775 -0.01891271 -0.00042954)
          orientation_in_parent=(0.05 0.4 -0.07) location=(0 0 0) orientation=(0.05 0.4 -0.07)
        Coordinate 4md_flexion_l: motion_type=rotational default_value=0 range=(-0.3490659 1.745329) clamped=true
        SpatialTransform: axes_held_at_zero=(rotation2 rotation3 translation1 translation2 translation3)
          TransformAxis rotation1: coordinates=4md_flexion_l axis=(-1 0 0) LinearFunction(coefficients=1 0)
    Body 5proxph_l: mass=0 mass_center=(0 0 0) inertia_xx=0 inertia_yy=0 inertia_zz=0 meshes=5proxph_l.vtp
      CustomJoint 5MCP_l: parent_body=fifthmc_l location_in_parent=(-0.00068327 -0.00916895 0.00064005)
          orientation_in_parent=(0 0.2 -0.15) location=(0 0 0) orientation=(0 0.5 -0.15)
        Coordinate 5mcp_flexion_l: motion_type=rotational default_value=0 range=(-0.8726646 1.570796) clamped=true
        Coordinate 5mcp_abduction_l: motion_type=rotational default_value=0 range=(-0.4 0.3490659) clamped=true
        SpatialTransform: axes_held_at_zero=(rotation3 translation1 translation2 translation3)
          TransformAxis rotation1: coordinates=5mcp_flexion_l axis=(-1 0 0) LinearFunction(coefficients=1 0)
          TransformAxis rotation2: coordinates=5mcp_abduction_l axis=(0 0 1) LinearFunction(coefficients=1 0)
    Body 5midph_l: mass=0 mass_center=(0 0 0) inertia_xx=0 inertia_yy=0 inertia_zz=0 meshes=5midph_l.vtp
      CustomJoint 5prox-midph_l: parent_body=5proxph_l location_in_parent=(-0.00351272 -0.02366412 0.00191572)
          orientation_in_parent=(0 0.5 -0.15) location=(0 0 0) orientation=(0 0.5 -0.15)
        Coordinate 5pm_flexion_l: motion_type=rotational default_value=9.21e-6 range=(0 2.094395) clamped=true
        SpatialTransform: axes_held_at_zero=(rotation2 rotation3 translation1 translation2 translation3)
          TransformAxis rotation1: coordinates=5pm_flexion_l axis=(-1 0 0) LinearFunction(coefficients=1 0)
    Body 5distph_l: mass=0 mass_center=(0 0 0) inertia_xx=0 inertia_yy=0 inertia_zz=0 meshes=5distph_l.vtp
      CustomJoint 5mid-distph_l: parent_body=5midph_l location_in_parent=(-0.00191441 -0.0137876 0.00149565)
          orientation_in_parent=(0 0.5 -0.15) location=(0 0 0) orientation=(0 0.5 -0.15)
        Coordinate 5md_flexion_l: motion_type=rotational default_value=0 range=(-0.3490659 1.745329) clamped=true
        SpatialTransform: axes_held_at_zero=(rotation2 rotation3 translation1 translation2 translation3)
          TransformAxis rotation1: coordinates=5md_flexion_l axis=(-1 0 0) LinearFunction(coefficients=1 0)
    Body bicpt_l: mass=0 mass_center=(0 0 0) inertia_xx=0 inertia_yy=0 inertia_zz=0
      CustomJoint bicpt_l: parent_body=radius_l location_in_parent=(0 0 0) location=(0 0 0)
        Coordinate bicpt_tx_l: motion_type=translational default_value=-0.0001 range=(-99999.9 99999.9) clamped=false
        Coordinate bicpt_ty_l: motion_type=translational default_value=-0.0276 range=(-99999.9 99999.9) clamped=false
        Coordinate bicpt_tz_l: motion_type=translational default_value=-0.0043 range=(-99999.9 99999.9) clamped=false
        SpatialTransform: axes_held_at_zero=(rotation1 rotation2 rotation3)
          TransformAxis translation1: coordinates=bicpt_tx_l axis=(1 0 0) LinearFunction(coefficients=1 0)
          TransformAxis translation2: coordinates=bicpt_ty_l axis=(0 1 0) LinearFunction(coefficients=1 0)
          TransformAxis translation3: coordinates=bicpt_tz_l axis=(0 0 -1) LinearFunction(coefficients=1 0)
    Body bicpt2_l: mass=0 mass_center=(0 0 0) inertia_xx=0 inertia_yy=0 inertia_zz=0
      CustomJoint bicpt2_l: parent_body=radius_l location_in_parent=(0 0 0) location=(0 0 0)
        Coordinate bicpt2_tx_l: motion_type=translational default_value=0.0146695 range=(-99999.9 99999.9)
            clamped=false
        Coordinate bicpt2_ty_l: motion_type=translational default_value=-0.0102 range=(-99999.9 99999.9) clamped=false
        Coordinate bicpt2_tz_l: motion_type=translational default_value=-0.01061843 range=(-99999.9 99999.9)
            clamped=false
        SpatialTransform: axes_held_at_zero=(rotation1 rotation2 rotation3)
          TransformAxis translation1: coordinates=bicpt2_tx_l axis=(1 0 0) LinearFunction(coefficients=1 0)
          TransformAxis translation2: coordinates=bicpt2_ty_l axis=(0 1 0) LinearFunction(coefficients=1 0)
          TransformAxis translation3: coordinates=bicpt2_tz_l axis=(0 0 -1) LinearFunction(coefficients=1 0)
    Body ptpt_l: mass=0 mass_center=(0 0 0) inertia_xx=0 inertia_yy=0 inertia_zz=0
      CustomJoint ptpt_l: parent_body=ulna_l location_in_parent=(0 0 0) location=(0 0 0)
        Coordinate ptpt_tx_l: motion_type=translational default_value=0.00755 range=(-99999.9 99999.9) clamped=false
        Coordinate ptpt_ty_l: motion_type=translational default_value=-0.0649 range=(-99999.9 99999.9) clamped=false
        Coordinate ptpt_tz_l: motion_type=translational default_value=-5e-5 range=(-99999.9 99999.9) clamped=false
        SpatialTransform: axes_held_at_zero=(rotation1 rotation2 rotation3)
          TransformAxis translation1: coordinates=ptpt_tx_l axis=(1 0 0) LinearFunction(coefficients=1 0)
          TransformAxis translation2: coordinates=ptpt_ty_l axis=(0 1 0) LinearFunction(coefficients=1 0)
          TransformAxis translation3: coordinates=ptpt_tz_l axis=(0 0 -1) LinearFunction(coefficients=1 0)
    Body FCUpt_l: mass=0 mass_center=(0 0 0) inertia_xx=0 inertia_yy=0 inertia_zz=0
      CustomJoint FCUpt_l: parent_body=radius_l location_in_parent=(0 0 0) location=(0 0 0)
        Coordinate FCUpt_tx_l: motion_type=translational default_value=0.004 range=(-99999.9 99999.9) clamped=false
        Coordinate FCUpt_ty_l: motion_type=translational default_value=-0.1841 range=(-99999.9 99999.9) clamped=false
        Coordinate FCUpt_tz_l: motion_type=translational default_value=0.0005 range=(-99999.9 99999.9) clamped=false
        SpatialTransform: axes_held_at_zero=(rotation1 rotation2 rotation3)
          TransformAxis translation1: coordinates=FCUpt_tx_l axis=(1 0 0) LinearFunction(coefficients=1 0)
          TransformAxis translation2: coordinates=FCUpt_ty_l axis=(0 1 0) LinearFunction(coefficients=1 0)
          TransformAxis translation3: coordinates=FCUpt_tz_l axis=(0 0 -1) LinearFunction(coefficients=1 0)
    Body EDCpt_l: mass=0 mass_center=(0 0 0) inertia_xx=0 inertia_yy=0 inertia_zz=0
      CustomJoint EDCpt_l: parent_body=radius_l location_in_parent=(0 0 0) location=(0 0 0)
        Coordinate EDCpt_tx_l: motion_type=translational default_value=0 range=(-99999.9 99999.9) clamped=false
        Coordinate EDCpt_ty_l: motion_type=translational default_value=0 range=(-99999.9 99999.9) clamped=false
        Coordinate EDCpt_tz_l: motion_type=translational default_value=0 range=(-99999.9 99999.9) clamped=false
        SpatialTransform: axes_held_at_zero=(rotation1 rotation2 rotation3)
          TransformAxis translation1: coordinates=EDCpt_tx_l axis=(1 0 0) LinearFunction(coefficients=1 0)
          TransformAxis translation2: coordinates=EDCpt_ty_l axis=(0 1 0) LinearFunction(coefficients=1 0)
          TransformAxis translation3: coordinates=EDCpt_tz_l axis=(0 0 -1) LinearFunction(coefficients=1 0)
    Body APLpt_l: mass=0 mass_center=(0 0 0) inertia_xx=0 inertia_yy=0 inertia_zz=0
      CustomJoint APLpt_l: parent_body=capitate_l location_in_parent=(0 0 0) location=(0 0 0)
        Coordinate APLpt_tx_l: motion_type=translational default_value=0 range=(-99999.9 99999.9) clamped=false
        Coordinate APLpt_ty_l: motion_type=translational default_value=0 range=(-99999.9 99999.9) clamped=false
        Coordinate APLpt_tz_l: motion_type=translational default_value=0 range=(-99999.9 99999.9) clamped=false
        SpatialTransform: axes_held_at_zero=(rotation1 rotation2 rotation3)
          TransformAxis translation1: coordinates=APLpt_tx_l axis=(1 0 0) LinearFunction(coefficients=1 0)
          TransformAxis translation2: coordinates=APLpt_ty_l axis=(0 1 0) LinearFunction(coefficients=1 0)
          TransformAxis translation3: coordinates=APLpt_tz_l axis=(0 0 -1) LinearFunction(coefficients=1 0)
    Body FPLpt_l: mass=0 mass_center=(0 0 0) inertia_xx=0 inertia_yy=0 inertia_zz=0
      CustomJoint FPLpt_l: parent_body=capitate_l location_in_parent=(0 0 0) location=(0 0 0)
        Coordinate FPLpt_tx_l: motion_type=translational default_value=0 range=(-99999.9 99999.9) clamped=false
        Coordinate FPLpt_ty_l: motion_type=translational default_value=0 range=(-99999.9 99999.9) clamped=false
        Coordinate FPLpt_tz_l: motion_type=translational default_value=0 range=(-99999.9 99999.9) clamped=false
        SpatialTransform: axes_held_at_zero=(rotation1 rotation2 rotation3)
          TransformAxis translation1: coordinates=FPLpt_tx_l axis=(1 0 0) LinearFunction(coefficients=1 0)
          TransformAxis translation2: coordinates=FPLpt_ty_l axis=(0 1 0) LinearFunction(coefficients=1 0)
          TransformAxis translation3: coordinates=FPLpt_tz_l axis=(0 0 -1) LinearFunction(coefficients=1 0)
    Body FPLpt2_l: mass=0 mass_center=(0 0 0) inertia_xx=0 inertia_yy=0 inertia_zz=0
      CustomJoint FPLpt2_l: parent_body=capitate_l location_in_parent=(0 0 0) location=(0 0 0)
        Coordinate FPLpt2_tx_l: motion_type=translational default_value=0 range=(-99999.9 99999.9) clamped=false
        Coordinate FPLpt2_ty_l: motion_type=translational default_value=0 range=(-99999.9 99999.9) clamped=false
        Coordinate FPLpt2_tz_l: motion_type=translational default_value=0 range=(-99999.9 99999.9) clamped=false
        SpatialTransform: axes_held_at_zero=(rotation1 rotation2 rotation3)
          TransformAxis translation1: coordinates=FPLpt2_tx_l axis=(1 0 0) LinearFunction(coefficients=1 0)
          TransformAxis translation2: coordinates=FPLpt2_ty_l axis=(0 1 0) LinearFunction(coefficients=1 0)
          TransformAxis translation3: coordinates=FPLpt2_tz_l axis=(0 0 -1) LinearFunction(coefficients=1 0)
    Body PEC1pt2_l: mass=0 mass_center=(0 0 0) inertia_xx=0 inertia_yy=0 inertia_zz=0
      CustomJoint PEC1pt2_l: parent_body=humerus_l location_in_parent=(0 0 0) location=(0 0 0)
        Coordinate PEC1pt2_tx_l: motion_type=translational default_value=0 range=(-99999.9 99999.9) clamped=false
        Coordinate PEC1pt2_ty_l: motion_type=translational default_value=0 range=(-99999.9 99999.9) clamped=false
        Coordinate PEC1pt2_tz_l: motion_type=translational default_value=0 range=(-99999.9 99999.9) clamped=false
        SpatialTransform: axes_held_at_zero=(rotation1 rotation2 rotation3)
          TransformAxis translation1: coordinates=PEC1pt2_tx_l axis=(1 0 0) LinearFunction(coefficients=1 0)
          TransformAxis translation2: coordinates=PEC1pt2_ty_l axis=(0 1 0) LinearFunction(coefficients=1 0)
          TransformAxis translation3: coordinates=PEC1pt2_tz_l axis=(0 0 -1) LinearFunction(coefficients=1 0)
    Body PEC1pt3_l: mass=0 mass_center=(0 0 0) inertia_xx=0 inertia_yy=0 inertia_zz=0
      CustomJoint PEC1pt3_l: parent_body=thorax location_in_parent=(0 0 0) location=(0 0 0)
        Coordinate PEC1pt3_tx_l: motion_type=translational default_value=0 range=(-99999.9 99999.9) clamped=false
        Coordinate PEC1pt3_ty_l: motion_type=translational default_value=0 range=(-99999.9 99999.9) clamped=false
        Coordinate PEC1pt3_tz_l: motion_type=translational default_value=0 range=(-99999.9 99999.9) clamped=false
        SpatialTransform: axes_held_at_zero=(rotation1 rotation2 rotation3)
          TransformAxis translation1: coordinates=PEC1pt3_tx_l axis=(1 0 0) LinearFunction(coefficients=1 0)
          TransformAxis translation2: coordinates=PEC1pt3_ty_l axis=(0 1 0) LinearFunction(coefficients=1 0)
          TransformAxis translation3: coordinates=PEC1pt3_tz_l axis=(0 0 -1) LinearFunction(coefficients=1 0)
    Body PEC2pt2_l: mass=0 mass_center=(0 0 0) inertia_xx=0 inertia_yy=0 inertia_zz=0
      CustomJoint PEC2pt2_l: parent_body=humerus_l location_in_parent=(0 0 0) location=(0 0 0)
        Coordinate PEC2pt2_tx_l: motion_type=translational default_value=0 range=(-99999.9 99999.9) clamped=false
        Coordinate PEC2pt2_ty_l: motion_type=translational default_value=0 range=(-99999.9 99999.9) clamped=false
        Coordinate PEC2pt2_tz_l: motion_type=translational default_value=0 range=(-99999.9 99999.9) clamped=false
        SpatialTransform: axes_held_at_zero=(rotation1 rotation2 rotation3)
          TransformAxis translation1: coordinates=PEC2pt2_tx_l axis=(1 0 0) LinearFunction(coefficients=1 0)
          TransformAxis translation2: coordinates=PEC2pt2_ty_l axis=(0 1 0) LinearFunction(coefficients=1 0)
          TransformAxis translation3: coordinates=PEC2pt2_tz_l axis=(0 0 -1) LinearFunction(coefficients=1 0)
    Body PEC2pt3_l: mass=0 mass_center=(0 0 0) inertia_xx=0 inertia_yy=0 inertia_zz=0
      CustomJoint PEC2pt3_l: parent_body=thorax location_in_parent=(0 0 0) location=(0 0 0)
        Coordinate PEC2pt3_tx_l: motion_type=translational default_value=0 range=(-99999.9 99999.9) clamped=false
        Coordinate PEC2pt3_ty_l: motion_type=translational default_value=0 range=(-99999.9 99999.9) clamped=false
        Coordinate PEC2pt3_tz_l: motion_type=translational default_value=0 range=(-99999.9 99999.9) clamped=false
        SpatialTransform: axes_held_at_zero=(rotation1 rotation2 rotation3)
          TransformAxis translation1: coordinates=PEC2pt3_tx_l axis=(1 0 0) LinearFunction(coefficients=1 0)
          TransformAxis translation2: coordinates=PEC2pt3_ty_l axis=(0 1 0) LinearFunction(coefficients=1 0)
          TransformAxis translation3: coordinates=PEC2pt3_tz_l axis=(0 0 -1) LinearFunction(coefficients=1 0)
    Body PEC3pt2_l: mass=0 mass_center=(0 0 0) inertia_xx=0 inertia_yy=0 inertia_zz=0
      CustomJoint PEC3pt2_l: parent_body=humerus_l location_in_parent=(0 0 0) location=(0 0 0)
        Coordinate PEC3pt2_tx_l: motion_type=translational default_value=0 range=(-99999.9 99999.9) clamped=false
        Coordinate PEC3pt2_ty_l: motion_type=translational default_value=0 range=(-99999.9 99999.9) clamped=false
        Coordinate PEC3pt2_tz_l: motion_type=translational default_value=0 range=(-99999.9 99999.9) clamped=false
        SpatialTransform: axes_held_at_zero=(rotation1 rotation2 rotation3)
          TransformAxis translation1: coordinates=PEC3pt2_tx_l axis=(1 0 0) LinearFunction(coefficients=1 0)
          TransformAxis translation2: coordinates=PEC3pt2_ty_l axis=(0 1 0) LinearFunction(coefficients=1 0)
          TransformAxis translation3: coordinates=PEC3pt2_tz_l axis=(0 0 -1) LinearFunction(coefficients=1 0)
    Body PEC3pt3_l: mass=0 mass_center=(0 0 0) inertia_xx=0 inertia_yy=0 inertia_zz=0
      CustomJoint PEC3pt3_l: parent_body=thorax location_in_parent=(0 0 0) location=(0 0 0)
        Coordinate PEC3pt3_tx_l: motion_type=translational default_value=0 range=(-99999.9 99999.9) clamped=false
        Coordinate PEC3pt3_ty_l: motion_type=translational default_value=0.00022532 range=(-99999.9 99999.9)
            clamped=false
        Coordinate PEC3pt3_tz_l: motion_type=translational default_value=0 range=(-99999.9 99999.9) clamped=false
        SpatialTransform: axes_held_at_zero=(rotation1 rotation2 rotation3)
          TransformAxis translation1: coordinates=PEC3pt3_tx_l axis=(1 0 0) LinearFunction(coefficients=1 0)
          TransformAxis translation2: coordinates=PEC3pt3_ty_l axis=(0 1 0) LinearFunction(coefficients=1 0)
          TransformAxis translation3: coordinates=PEC3pt3_tz_l axis=(0 0 -1) LinearFunction(coefficients=1 0)
    Body DELT2pt2a_l: mass=0 mass_center=(0 0 0) inertia_xx=0 inertia_yy=0 inertia_zz=0
      CustomJoint DELT2pt2a_l: parent_body=humerus_l location_in_parent=(0 0 0) location=(0 0 0)
        Coordinate DELT2pt2a_tx_l: motion_type=translational default_value=0 range=(-99999.9 99999.9) clamped=false
        Coordinate DELT2pt2a_ty_l: motion_type=translational default_value=0 range=(-99999.9 99999.9) clamped=false
        Coordinate DELT2pt2a_tz_l: motion_type=translational default_value=0 range=(-99999.9 99999.9) clamped=false
        SpatialTransform: axes_held_at_zero=(rotation1 rotation2 rotation3)
          TransformAxis translation1: coordinates=DELT2pt2a_tx_l axis=(1 0 0) LinearFunction(coefficients=1 0)
          TransformAxis translation2: coordinates=DELT2pt2a_ty_l axis=(0 1 0) LinearFunction(coefficients=1 0)
          TransformAxis translation3: coordinates=DELT2pt2a_tz_l axis=(0 0 -1) LinearFunction(coefficients=1 0)
    Body DELT2pt2_l: mass=0 mass_center=(0 0 0) inertia_xx=0 inertia_yy=0 inertia_zz=0
      CustomJoint DELT2pt2_l: parent_body=DELT2pt2a_l location_in_parent=(0 0 0) location=(0 0 0)
        Coordinate DELT2pt2_tx_l: motion_type=translational default_value=-0.00043991 range=(-99999.9 99999.9)
            clamped=false
        Coordinate DELT2pt2_ty_l: motion_type=translational default_value=0 range=(-99999.9 99999.9) clamped=false
        Coordinate DELT2pt2_tz_l: motion_type=translational default_value=0 range=(-99999.9 99999.9) clamped=false
        SpatialTransform: axes_held_at_zero=(rotation1 rotation2 rotation3)
          TransformAxis translation1: coordinates=DELT2pt2_tx_l axis=(1 0 0) LinearFunction(coefficients=1 0)
          TransformAxis translation2: coordinates=DELT2pt2_ty_l axis=(0 1 0) LinearFunction(coefficients=1 0)
          TransformAxis translation3: coordinates=DELT2pt2_tz_l axis=(0 0 -1) LinearFunction(coefficients=1 0)
    Body LAT1pt2_l: mass=0 mass_center=(0 0 0) inertia_xx=0 inertia_yy=0 inertia_zz=0
      CustomJoint LAT1pt2_l: parent_body=scapula_l location_in_parent=(0 0 0) location=(0 0 0)
        Coordinate LAT1pt2_tx_l: motion_type=translational default_value=0 range=(-99999.9 99999.9) clamped=false
        Coordinate LAT1pt2_ty_l: motion_type=translational default_value=0 range=(-99999.9 99999.9) clamped=false
        Coordinate LAT1pt2_tz_l: motion_type=translational default_value=0 range=(-99999.9 99999.9) clamped=false
        SpatialTransform: axes_held_at_zero=(rotation1 rotation2 rotation3)
          TransformAxis translation1: coordinates=LAT1pt2_tx_l axis=(1 0 0) LinearFunction(coefficients=1 0)
          TransformAxis translation2: coordinates=LAT1pt2_ty_l axis=(0 1 0) LinearFunction(coefficients=1 0)
          TransformAxis translation3: coordinates=LAT1pt2_tz_l axis=(0 0 -1) LinearFunction(coefficients=1 0)
    Body LAT1pt3_l: mass=0 mass_center=(0 0 0) inertia_xx=0 inertia_yy=0 inertia_zz=0
      CustomJoint LAT1pt3_l: parent_body=scapula_l location_in_parent=(0 0 0) location=(0 0 0)
        Coordinate LAT1pt3_tx_l: motion_type=translational default_value=0 range=(-99999.9 99999.9) clamped=false
        Coordinate LAT1pt3_ty_l: motion_type=translational default_value=0 range=(-99999.9 99999.9) clamped=false
        Coordinate LAT1pt3_tz_l: motion_type=translational default_value=0 range=(-99999.9 99999.9) clamped=false
        SpatialTransform: axes_held_at_zero=(rotation1 rotation2 rotation3)
          TransformAxis translation1: coordinates=LAT1pt3_tx_l axis=(1 0 0) LinearFunction(coefficients=1 0)
          TransformAxis translation2: coordinates=LAT1pt3_ty_l axis=(0 1 0) LinearFunction(coefficients=1 0)
          TransformAxis translation3: coordinates=LAT1pt3_tz_l axis=(0 0 -1) LinearFunction(coefficients=1 0)
    Body LAT2pt2_l: mass=0 mass_center=(0 0 0) inertia_xx=0 inertia_yy=0 inertia_zz=0
      CustomJoint LAT2pt2_l: parent_body=scapula_l location_in_parent=(0 0 0) location=(0 0 0)
        Coordinate LAT2pt2_tx_l: motion_type=translational default_value=0 range=(-99999.9 99999.9) clamped=false
        Coordinate LAT2pt2_ty_l: motion_type=translational default_value=0 range=(-99999.9 99999.9) clamped=false
        Coordinate LAT2pt2_tz_l: motion_type=translational default_value=0 range=(-99999.9 99999.9) clamped=false
        SpatialTransform: axes_held_at_zero=(rotation1 rotation2 rotation3)
          TransformAxis translation1: coordinates=LAT2pt2_tx_l axis=(1 0 0) LinearFunction(coefficients=1 0)
          TransformAxis translation2: coordinates=LAT2pt2_ty_l axis=(0 1 0) LinearFunction(coefficients=1 0)
          TransformAxis translation3: coordinates=LAT2pt2_tz_l axis=(0 0 -1) LinearFunction(coefficients=1 0)
    Body LAT2pt3_l: mass=0 mass_center=(0 0 0) inertia_xx=0 inertia_yy=0 inertia_zz=0
      CustomJoint LAT2pt3_l: parent_body=scapula_l location_in_parent=(0 0 0) location=(0 0 0)
        Coordinate LAT2pt3_tx_l: motion_type=translational default_value=0 range=(-99999.9 99999.9) clamped=false
        Coordinate LAT2pt3_ty_l: motion_type=translational default_value=0 range=(-99999.9 99999.9) clamped=false
        Coordinate LAT2pt3_tz_l: motion_type=translational default_value=0 range=(-99999.9 99999.9) clamped=false
        SpatialTransform: axes_held_at_zero=(rotation1 rotation2 rotation3)
          TransformAxis translation1: coordinates=LAT2pt3_tx_l axis=(1 0 0) LinearFunction(coefficients=1 0)
          TransformAxis translation2: coordinates=LAT2pt3_ty_l axis=(0 1 0) LinearFunction(coefficients=1 0)
          TransformAxis translation3: coordinates=LAT2pt3_tz_l axis=(0 0 -1) LinearFunction(coefficients=1 0)
    Body LAT3pt2_l: mass=0 mass_center=(0 0 0) inertia_xx=0 inertia_yy=0 inertia_zz=0
      CustomJoint LAT3pt2_l: parent_body=scapula_l location_in_parent=(0 0 0) location=(0 0 0)
        Coordinate LAT3pt2_tx_l: motion_type=translational default_value=0 range=(-99999.9 99999.9) clamped=false
        Coordinate LAT3pt2_ty_l: motion_type=translational default_value=0 range=(-99999.9 99999.9) clamped=false
        Coordinate LAT3pt2_tz_l: motion_type=translational default_value=0 range=(-99999.9 99999.9) clamped=false
        SpatialTransform: axes_held_at_zero=(rotation1 rotation2 rotation3)
          TransformAxis translation1: coordinates=LAT3pt2_tx_l axis=(1 0 0) LinearFunction(coefficients=1 0)
          TransformAxis translation2: coordinates=LAT3pt2_ty_l axis=(0 1 0) LinearFunction(coefficients=1 0)
          TransformAxis translation3: coordinates=LAT3pt2_tz_l axis=(0 0 -1) LinearFunction(coefficients=1 0)
    Body LAT3pt3_l: mass=0 mass_center=(0 0 0) inertia_xx=0 inertia_yy=0 inertia_zz=0
      CustomJoint LAT3pt3_l: parent_body=scapula_l location_in_parent=(0 0 0) location=(0 0 0)
        Coordinate LAT3pt3_tx_l: motion_type=translational default_value=0 range=(-99999.9 99999.9) clamped=false
        Coordinate LAT3pt3_ty_l: motion_type=translational default_value=0 range=(-99999.9 99999.9) clamped=false
        Coordinate LAT3pt3_tz_l: motion_type=translational default_value=0 range=(-99999.9 99999.9) clamped=false
        SpatialTransform: axes_held_at_zero=(rotation1 rotation2 rotation3)
          TransformAxis translation1: coordinates=LAT3pt3_tx_l axis=(1 0 0) LinearFunction(coefficients=1 0)
          TransformAxis translation2: coordinates=LAT3pt3_ty_l axis=(0 1 0) LinearFunction(coefficients=1 0)
          TransformAxis translation3: coordinates=LAT3pt3_tz_l axis=(0 0 -1) LinearFunction(coefficients=1 0)
  ForceSet:
    Schutte1993Muscle_Deprecated [values shared by the 50 below unless stated]: min_control=0.01 max_control=1
        optimal_force=1 max_contraction_velocity=0 time_scale=0.1 activation1=7.667 activation2=1.459854 damping=0.05
      tendon_force_length_curve: SimmSpline: x=(-10 -0.002 -0.001 0 0.00131 0.00281 0.00431 0.00581 0.00731 0.00881 0.0103 0.0118 0.0123 9.2 9.201 9.202 20)
          y=(0 0 0 0 0.0108 0.0257 0.0435 0.0652 0.0915 0.123 0.161 0.208 0.227 345 345 345 345)
      active_force_length_curve: SimmSpline: x=(-35 0 0.401 0.402 0.4035 0.52725 0.62875 0.71875 0.86125 1.045 1.2175 1.43875 1.61875 1.62 1.621 2.2 35)
          y=(0 0 0 0 0 0.226667 0.636667 0.856667 0.95 0.993333 0.77 0.246667 0 0 0 0 0)
      passive_force_length_curve: SimmSpline: x=(-35 0.998 0.999 1.15 1.25 1.35 1.45 1.55 1.65 1.75 1.7501 1.7502 35)
          y=(0 0 0 0 0.035 0.12 0.26 0.55 1.17 2 2 2 2)
    Schutte1993Muscle_Deprecated DELT1_l: max_isometric_force=1142.6 optimal_fiber_length=0.05315574
        tendon_slack_length=0.05065044 pennation_angle_at_optimal=0.3839724 [radians]
      PathPoint P1: humerus_l (0.00477746 -0.0633601 -0.00311922)
      PathPoint P2: humerus_l (0.00865384 -0.0588279 -0.00219679)
      PathPoint P3: scapula_l (0.0239232 -0.017897 -0.00054484)
      PathPoint P4: clavicle_l (-0.00770474 0.00608674 -0.0441426)
      PathWrap: wrap_object=delt2hum_l method=hybrid
      PathWrap: wrap_object=DELT1hh_l method=hybrid range=(2 3)
    Schutte1993Muscle_Deprecated DELT2_l: max_isometric_force=1142.6 optimal_fiber_length=0.05836523
        tendon_slack_length=0.05928565 pennation_angle_at_optimal=0.2617994
      PathPoint P1: humerus_l (0.00245805 -0.0725738 -0.00298591)
      PathPoint P2: DELT2pt2_l (0.0149692 0.00294431 -0.0264547)
      PathPoint P3: scapula_l (2.752e-5 0.001618 -0.012289)
      PathPoint P4: scapula_l (-0.00593264 -0.00018711 -0.00341209)
      PathWrap: wrap_object=Deltoid2_l method=hybrid
      PathWrap: wrap_object=delt2hum_l method=hybrid
      PathWrap: wrap_object=TMAJ_LAT_PEC_CORBhh_l method=hybrid
    Schutte1993Muscle_Deprecated DELT3_l: max_isometric_force=259.88 optimal_fiber_length=0.07431027
        tendon_slack_length=0.02065684 pennation_angle_at_optimal=0.3141593
      PathPoint P1: scapula_l (-0.0306703 0.00067142 0.0138245)
      PathPoint P2: scapula_l (-0.039883 -0.0180786 -0.00678566)
      PathPoint P3: humerus_l (0.00109839 -0.0405338 -0.00557193)
      PathWrap: wrap_object=Delt3_l method=hybrid
      PathWrap: wrap_object=delt3hum_l method=hybrid
      PathWrap: wrap_object=TMAJ_LAT_PEC_CORBhh_l method=hybrid
    Schutte1993Muscle_Deprecated SUPSP_l: max_isometric_force=487.82 optimal_fiber_length=0.03741702
        tendon_slack_length=0.02167114 pennation_angle_at_optimal=0.1221731
      PathPoint P1: humerus_l (0.001365 0.00566792 -0.0138259)
      PathPoint P2: scapula_l (-0.0105555 0.00069893 0.0069948)
      PathPoint P3: scapula_l (-0.0242149 -0.00832111 0.0322223)
      PathWrap: wrap_object=SUPSP_l method=hybrid
    Schutte1993Muscle_Deprecated INFSP_l: max_isometric_force=1210.84 optimal_fiber_length=0.04131902
        tendon_slack_length=0.01685597 pennation_angle_at_optimal=0.3228859
      PathPoint P1: humerus_l (-0.00472947 0.00258069 -0.0130527)
      PathPoint P2: scapula_l (-0.040626 -0.0301365 0.0263116)
      PathWrap: wrap_object=INFSP_l method=hybrid
      PathWrap: wrap_object=INFSP_and_TMIN_hum_head_l method=hybrid
    Schutte1993Muscle_Deprecated SUBSC_l: max_isometric_force=1377.81 optimal_fiber_length=0.04813157
        tendon_slack_length=0.01819406 pennation_angle_at_optimal=0.3490659
      PathPoint P1: humerus_l (0.00748079 0.00447886 0.00709689)
      PathPoint P2: scapula_l (-0.0100767 -0.0287442 0.0135218)
      PathPoint P3: scapula_l (-0.0398775 -0.0216998 0.0356344)
      PathWrap: wrap_object=SUBSCAP_l method=hybrid
    Schutte1993Muscle_Deprecated TMIN_l: max_isometric_force=354.25 optimal_fiber_length=0.04060711
        tendon_slack_length=0.03907269 pennation_angle_at_optimal=0.418879
      PathPoint P1: humerus_l (-0.00058651 -0.00673964 -0.0114958)
      PathPoint P2: scapula_l (-0.0521335 -0.0439775 0.0260695)
      PathPoint P3: scapula_l (-0.0530691 -0.044693 0.0291569)
      PathWrap: wrap_object=TMIN_l method=hybrid range=(1 2)
      PathWrap: wrap_object=INFSP_and_TMIN_hum_head_l method=hybrid range=(1 2)
      PathWrap: wrap_object=TMINhum_l method=hybrid range=(1 2)
    Schutte1993Muscle_Deprecated TMAJ_l: max_isometric_force=425.39 optimal_fiber_length=0.0891516
        tendon_slack_length=0.01097925 pennation_angle_at_optimal=0.2792527
      PathPoint P1: humerus_l (0.00532132 -0.0288941 0.00302856)
      PathPoint P2: scapula_l (-0.0564867 -0.0567894 0.0320792)
      PathPoint P3: scapula_l (-0.057725 -0.0599593 0.0391676)
      PathWrap: wrap_object=TMAJ_LAThum_l method=hybrid
      PathWrap: wrap_object=LAT_TMAJhh_l method=hybrid range=(1 2)
      PathWrap: wrap_object=LAT_TMAJ2hh_l method=hybrid
    Schutte1993Muscle_Deprecated PECM1_l: max_isometric_force=364.41 optimal_fiber_length=0.0792979
        tendon_slack_length=0.00153977 pennation_angle_at_optimal=0.296706
      PathPoint P1: humerus_l (0.00623311 -0.0223464 -0.00415895)
      PathPoint P2: PEC1pt2_l (0.00888796 -0.0222612 0.00317546)
      PathPoint P3: PEC1pt3_l (0.00527223 -0.00830461 -0.0696948)
      PathPoint P4: clavicle_l (0.00176659 -7.155e-5 -0.0281388)
      PathWrap: wrap_object=Thorax_l method=hybrid
      PathWrap: wrap_object=PEC12hum_l method=hybrid range=(2 3)
      PathWrap: wrap_object=PEC1hh_l method=hybrid
    Schutte1993Muscle_Deprecated PECM2_l: max_isometric_force=515.41 optimal_fiber_length=0.07625215
        tendon_slack_length=0.04899958 pennation_angle_at_optimal=0.4363323
      PathPoint P1: humerus_l (0.00679296 -0.0228689 -0.00418561)
      PathPoint P2: PEC2pt2_l (0.00799642 -0.0251395 0.00378082)
      PathPoint P3: PEC2pt3_l (0.0111058 -0.0229216 -0.0698379)
      PathPoint P4: thorax (0.017011 -0.0215843 -0.0534103)
      PathPoint P5: thorax (0.0152388 -0.0247542 -0.0124982)
      PathWrap: wrap_object=Thorax method=hybrid
      PathWrap: wrap_object=PEC12hum_l method=hybrid range=(2 3)
      PathWrap: wrap_object=TMAJ_LAT_PEC_CORBhh_l method=hybrid
      PathWrap: wrap_object=PEC23hh_l method=hybrid
    Schutte1993Muscle_Deprecated PECM3_l: max_isometric_force=390.55 optimal_fiber_length=0.07627309
        tendon_slack_length=0.07269348 pennation_angle_at_optimal=0.4363323
      PathPoint P1: humerus_l (0.00676631 -0.0233275 -0.00399899)
      PathPoint P2: PEC3pt2_l (0.00684071 -0.0283809 0.0099446)
      PathPoint P3: PEC3pt3_l (0.0164221 -0.039074 -0.0633439)
      PathPoint P4: thorax (0.0288927 -0.046322 -0.0491727)
      PathPoint P5: thorax (0.0315013 -0.0641364 -0.0208413)
      PathWrap: wrap_object=Thorax method=hybrid
      PathWrap: wrap_object=PEC3hum_l method=hybrid range=(2 3)
      PathWrap: wrap_object=PEC23hh_l method=hybrid
    Schutte1993Muscle_Deprecated LAT1_l: max_isometric_force=389.1 optimal_fiber_length=0.1396444
        tendon_slack_length=0.06597374 pennation_angle_at_optimal=0.4363323
      PathPoint P1: humerus_l (0.00559859 -0.0182088 0.00348179)
      PathPoint P2: LAT1pt2_l (-0.0437354 -0.0472245 0.0120414)
      PathPoint P3: LAT1pt3_l (-0.0617204 -0.0538175 0.029289)
      PathPoint P4: thorax (-0.065094 -0.0556832 -0.0182492)
      PathPoint P5: thorax (-0.0527114 -0.0645216 -0.00485398)
      PathWrap: wrap_object=TMAJ_LAThum_l method=hybrid
      PathWrap: wrap_object=LAT_TMAJhh_l method=hybrid range=(1 2)
      PathWrap: wrap_object=LAT_TMAJ2hh_l method=hybrid
    Schutte1993Muscle_Deprecated LAT2_l: max_isometric_force=389.1 optimal_fiber_length=0.1278289
        tendon_slack_length=0.09708179 pennation_angle_at_optimal=0.3316126
      PathPoint P1: humerus_l (0.00516138 -0.0217065 0.00325784)
      PathPoint P2: LAT2pt2_l (-0.0420458 -0.0562445 0.0099501)
      PathPoint P3: LAT2pt3_l (-0.055331 -0.0768767 0.0289368)
      PathPoint P4: thorax (-0.0604932 -0.0930512 -0.0158387)
      PathPoint P5: thorax (-0.0395473 -0.103563 -0.00448526)
      PathWrap: wrap_object=TMAJ_LAThum_l method=hybrid
      PathWrap: wrap_object=LAT_TMAJhh_l method=hybrid range=(1 2)
      PathWrap: wrap_object=LAT_TMAJ2hh_l method=hybrid
    Schutte1993Muscle_Deprecated LAT3_l: max_isometric_force=281.66 optimal_fiber_length=0.1536114
        tendon_slack_length=0.07727383 pennation_angle_at_optimal=0.3665191
      PathPoint P1: humerus_l (0.00644104 -0.0209121 0.00221811)
      PathPoint P2: LAT3pt2_l (-0.0312482 -0.0732115 0.0117222)
      PathPoint P3: LAT3pt3_l (-0.0520014 -0.0966008 0.0253486)
      PathPoint P4: thorax (-0.0614012 -0.106694 -0.0304447)
      PathPoint P5: thorax (-0.0391676 -0.136803 -0.00499156)
      PathWrap: wrap_object=TMAJ_LAThum_l method=hybrid
      PathWrap: wrap_object=LAT_TMAJhh_l method=hybrid range=(1 2)
      PathWrap: wrap_object=LAT_TMAJ2hh_l method=hybrid
    Schutte1993Muscle_Deprecated CORB_l: max_isometric_force=242.46 optimal_fiber_length=0.04998372
        tendon_slack_length=0.05202168 pennation_angle_at_optimal=0
      PathPoint P1: scapula_l (0.00687923 -0.0227124 0.014595)
      PathPoint P2: scapula_l (0.00265814 -0.0382925 0.0086018)
      PathPoint P3: humerus_l (0.00396167 -0.0802358 0.00416962)
      PathWrap: wrap_object=CORBhum_l method=hybrid
      PathWrap: wrap_object=TMAJ_LAT_PEC_CORBhh_l method=hybrid
    Schutte1993Muscle_Deprecated TRIlong_l: max_isometric_force=798.52 optimal_fiber_length=0.07158765
        tendon_slack_length=0.07639576 pennation_angle_at_optimal=0.2094395
      PathPoint P1: scapula_l (-0.036 -0.031 0.013)
      PathPoint P2: humerus_l (-0.014471 -0.0610033 0.00354)
      PathPoint P3: humerus_l (-0.0169771 -0.1207 0.00648904)
      PathPoint P4: humerus_l (-0.00929365 -0.142668 0.00644104)
      PathPoint P5: ulna_l (-0.0131507 0.00628113 0.00046838)
      PathWrap: wrap_object=TRI_l method=hybrid
      PathWrap: wrap_object=TRIlonghh_l method=hybrid
    Schutte1993Muscle_Deprecated TRIlat_l: max_isometric_force=624.3 optimal_fiber_length=0.06018466
        tendon_slack_length=0.05182861 pennation_angle_at_optimal=0.1570796
      PathPoint P1: humerus_l (-0.00319386 -0.0674284 -0.0022821)
      PathPoint P2: humerus_l (-0.0124982 -0.0774632 -0.00494809)
      PathPoint P3: humerus_l (-0.0169771 -0.1207 0.00648904)
      PathPoint P4: humerus_l (-0.00929365 -0.142668 0.00644104)
      PathPoint P5: ulna_l (-0.0131507 0.00628113 0.00046838)
      PathWrap: wrap_object=TRI_l method=hybrid
    Schutte1993Muscle_Deprecated TRImed_l: max_isometric_force=624.3 optimal_fiber_length=0.06014508
        tendon_slack_length=0.04798923 pennation_angle_at_optimal=0.1570796
      PathPoint P1: humerus_l (-0.0044682 -0.0730216 0.00483078)
      PathPoint P2: humerus_l (-0.0138685 -0.0807211 0.00575855)
      PathPoint P3: humerus_l (-0.0169771 -0.1207 0.00648904)
      PathPoint P4: humerus_l (-0.00929365 -0.142668 0.00644104)
      PathPoint P5: ulna_l (-0.0131507 0.00628113 0.00046838)
      PathWrap: wrap_object=TRI_l method=hybrid
    Schutte1993Muscle_Deprecated ANC_l: max_isometric_force=350 optimal_fiber_length=0.01536386
        tendon_slack_length=0.01024256 pennation_angle_at_optimal=0
      PathPoint P1: humerus_l (-0.003967 -0.15121 -0.00522001)
      PathPoint P2: ulna_l (-0.0152044 -0.00074461 -0.00360295)
      PathWrap: wrap_object=ANC_l method=hybrid
    Schutte1993Muscle_Deprecated SUP_l: max_isometric_force=476 optimal_fiber_length=0.01981618
        tendon_slack_length=0.01681372 pennation_angle_at_optimal=0
      PathPoint P1: radius_l (0.00598088 -0.0366059 -0.00045037)
      PathPoint P2: radius_l (0.00721189 -0.0310453 0.00064252)
      PathPoint P3: ulna_l (-0.00816667 -0.0203206 -0.0120879)
      PathWrap: wrap_object=SUP_l method=hybrid
    Schutte1993Muscle_Deprecated BIClong_l: max_isometric_force=624.3 optimal_fiber_length=0.0634431
        tendon_slack_length=0.1493134 pennation_angle_at_optimal=0
      PathPoint P1: scapula_l (-0.017187 -0.0129495 0.00718191)
      PathPoint P2: scapula_l (-0.0115241 -0.00720393 0.00253706)
      PathPoint P3: humerus_l (0.0113625 0.00956026 -0.00548129)
      PathPoint P4: humerus_l (0.0126795 -0.00272465 -0.00640372)
      PathPoint P5: humerus_l (0.00717153 -0.0150735 -0.00072516)
      PathPoint P6: humerus_l (0.00569458 -0.0412483 0.00087978)
      PathPoint P7: humerus_l (0.00908039 -0.0646504 -0.00012797)
      PathPoint P8: humerus_l (0.0121569 -0.0935231 0.00335916)
      PathPoint P9: bicpt2_l (0 0 0)
      ConditionalPathPoint P10: bicpt_l (0 0 0) range=(-0.638791 1.5708) coordinate=pro_sup_l
      PathPoint P11: radius_l (-0.00120098 -0.0225184 0.00120098)
      PathWrap: wrap_object=Elbow_BIC_BRD_l method=hybrid
      PathWrap: wrap_object=BIClong_l method=hybrid range=(2 3)
    Schutte1993Muscle_Deprecated BICshort_l: max_isometric_force=435.56 optimal_fiber_length=0.07270654
        tendon_slack_length=0.10584 pennation_angle_at_optimal=0
      PathPoint P1: scapula_l (0.00697829 -0.0216338 0.0144464)
      PathPoint P2: scapula_l (0.00051182 -0.0368947 0.00876687)
      PathPoint P3: humerus_l (0.00595584 -0.0403952 0.00587052)
      PathPoint P4: humerus_l (0.00908039 -0.0646504 0.00575321)
      PathPoint P5: humerus_l (0.0121569 -0.0935231 0.00335916)
      PathPoint P6: bicpt2_l (0 0 0)
      ConditionalPathPoint P7: bicpt_l (0 0 0) range=(-0.638791 1.5708) coordinate=pro_sup_l
      PathPoint P8: radius_l (-0.00120098 -0.0225184 0.00120098)
      PathWrap: wrap_object=Elbow_BIC_BRD_l method=hybrid
    Schutte1993Muscle_Deprecated BRA_l: max_isometric_force=987.26 optimal_fiber_length=0.04671219
        tendon_slack_length=0.02912707 pennation_angle_at_optimal=0
      PathPoint P1: humerus_l (0.00362576 -0.0927234 0.00191953)
      ConditionalPathPoint P2: humerus_l (0.0100988 -0.152276 0.00589185) range=(0 0.813149) coordinate=elbow_flexion_l
      ConditionalPathPoint P3: ulna_l (0.00299044 -0.00878518 -0.00076863) range=(0 0.813149)
          coordinate=elbow_flexion_l
      PathPoint P4: ulna_l (-0.00192156 -0.0143517 -0.00054044)
    Schutte1993Muscle_Deprecated BRD_l: max_isometric_force=261.33 optimal_fiber_length=0.1004652
        tendon_slack_length=0.07741525 pennation_angle_at_optimal=0
      PathPoint P1: humerus_l (-0.00522535 -0.106443 -0.00118904)
      PathPoint P2: radius_l (0.0214795 -0.0765144 -0.0139013)
      PathPoint P3: radius_l (0.0251605 -0.132708 -0.013451)
      PathWrap: wrap_object=Elbow_BIC_BRD_l method=hybrid
    Schutte1993Muscle_Deprecated ECRL_l: max_isometric_force=304.89 optimal_fiber_length=0.04771557
        tendon_slack_length=0.1319542 pennation_angle_at_optimal=0
      PathPoint P1: humerus_l (-0.00389235 -0.139112 -0.00485212)
      PathPoint P2: radius_l (0.0191857 -0.080844 -0.0166876)
      PathPoint P3: radius_l (0.0254788 -0.14222 -0.0217377)
      PathPoint P4: secondmc_l (0.00124659 0.00821048 -0.0004005)
      PathWrap: wrap_object=Elbow_PT_ECRL_l method=hybrid
      PathWrap: wrap_object=ECRL_l method=hybrid
    Schutte1993Muscle_Deprecated ECRB_l: max_isometric_force=100.52 optimal_fiber_length=0.03561575
        tendon_slack_length=0.1353399 pennation_angle_at_optimal=0.1553343
      PathPoint P1: humerus_l (0.00719286 -0.154884 -0.00905371)
      PathPoint P2: radius_l (0.0174442 -0.0785801 -0.0143217)
      PathPoint P3: radius_l (0.0213114 -0.136942 -0.0236413)
      PathPoint P4: thirdmc_l (0.0018336 0.0113098 -0.00045435)
      PathWrap: wrap_object=ECRB_l method=hybrid
    Schutte1993Muscle_Deprecated ECU_l: max_isometric_force=93.17 optimal_fiber_length=0.03747329
        tendon_slack_length=0.1376631 pennation_angle_at_optimal=0.06108652
      PathPoint P1: humerus_l (0.00044256 -0.154388 -0.0100242)
      PathPoint P2: ulna_l (-0.00835282 -0.0192217 -0.0176964)
      PathPoint P3: ulna_l (-0.0102384 -0.0325946 -0.017222)
      PathPoint P4: ulna_l (-0.0107668 -0.0574849 -0.0196841)
      PathPoint P5: radius_l (-0.00853296 -0.136287 -0.0209031)
      PathPoint P6: fifthmc_l (-0.00027816 0.00942558 -0.00134063)
      PathWrap: wrap_object=ECU_l method=hybrid
    Schutte1993Muscle_Deprecated FCR_l: max_isometric_force=73.96 optimal_fiber_length=0.0372176
        tendon_slack_length=0.1446034 pennation_angle_at_optimal=0.05410521
      PathPoint P1: humerus_l (0.00404166 -0.148261 0.019755)
      PathPoint P2: radius_l (0.0126703 -0.131766 -0.00076262)
      PathPoint P3: secondmc_l (-0.00172719 0.00960225 0.00461088)
      PathWrap: wrap_object=Elbow_PT_ECRL_l method=hybrid
      PathWrap: wrap_object=FCR_l method=hybrid
    Schutte1993Muscle_Deprecated FCU_l: max_isometric_force=128.93 optimal_fiber_length=0.03147563
        tendon_slack_length=0.1638712 pennation_angle_at_optimal=0.2111848
      PathPoint P1: humerus_l (0.00116772 -0.147909 0.0206881)
      PathPoint P2: FCUpt_l (0.00329706 0 0)
      PathPoint P3: radius_l (0.00649731 -0.134071 -0.00581875)
      PathPoint P4: fifthmc_l (0.00070225 0.00776572 0.00150481)
      PathWrap: wrap_object=FCU_l method=hybrid
      PathWrap: wrap_object=Elbow_PT_ECRL_l method=hybrid
    Schutte1993Muscle_Deprecated PL_l: max_isometric_force=26.72 optimal_fiber_length=0.03761445
        tendon_slack_length=0.1588297 pennation_angle_at_optimal=0.06981317
      PathPoint P1: humerus_l (0.00243673 -0.146731 0.0206081)
      PathPoint P2: radius_l (0.0151984 -0.143607 0.00165736)
      PathPoint P3: capitate_l (0.00497682 -0.010301 0.0095195)
      PathPoint P4: thirdmc_l (0.00072614 0.00335887 0.00099387)
      PathWrap: wrap_object=PL_l method=hybrid
      PathWrap: wrap_object=Elbow_PT_ECRL_l method=hybrid
    Schutte1993Muscle_Deprecated PT_l: max_isometric_force=566.22 optimal_fiber_length=0.02956768
        tendon_slack_length=0.05889497 pennation_angle_at_optimal=0.1745329
      PathPoint P1: humerus_l (0.00191953 -0.14711 0.0194618)
      PathPoint P2: ulna_l (0.00508014 -0.0202545 0.00859902)
      PathPoint P3: ptpt_l (0.00278658 -0.00015614 0.00128519)
      ConditionalPathPoint P4: radius_l (0.0141716 -0.0560858 -0.00564461) range=(-1.5708 0.509636)
          coordinate=pro_sup_l
      PathPoint P5: radius_l (0.0152525 -0.0653333 -0.0118897)
      PathWrap: wrap_object=Elbow_PT_ECRL_l method=hybrid
    Schutte1993Muscle_Deprecated PQ_l: max_isometric_force=75.48 optimal_fiber_length=0.01693382
        tendon_slack_length=0.00300245 pennation_angle_at_optimal=0.1745329
      PathPoint P1: radius_l (0.0194859 -0.120086 -0.0117816)
      PathPoint P2: ulna_l (0.00115894 -0.125935 -0.0218098)
      PathWrap: wrap_object=PQ2_l method=hybrid
      PathWrap: wrap_object=PQ1_l method=hybrid
    Schutte1993Muscle_Deprecated FDSL_l: max_isometric_force=16.55 optimal_fiber_length=0.03050725
        tendon_slack_length=0.2004001 pennation_angle_at_optimal=0.08726646
      PathPoint P1: humerus_l (0.00224478 -0.147152 0.0206028)
      PathPoint P2: radius_l (0.00826875 -0.1124 -0.001231)
      PathPoint P3: capitate_l (-0.00127542 -0.00756022 0.00746797)
      PathPoint P4: fourthmc_l (-0.00116659 0.00335694 0.00481317)
      PathPoint P5: fifthmc_l (-0.00014591 -0.00897413 0.00345193)
      PathPoint P6: 5proxph_l (-0.00214928 -0.023742 0.00277477)
      PathPoint P7: 5midph_l (-0.00173369 -0.0132228 0.00233383)
      PathWrap: wrap_object=FDS_l method=hybrid
      PathWrap: wrap_object=Elbow_PT_ECRL_l method=hybrid
    Schutte1993Muscle_Deprecated FDSR_l: max_isometric_force=57.9 optimal_fiber_length=0.04419252
        tendon_slack_length=0.196945 pennation_angle_at_optimal=0.06981317
      PathPoint P1: humerus_l (0.00255404 -0.148656 0.0198937)
      PathPoint P2: radius_l (0.00943371 -0.112087 -0.00160331)
      PathPoint P3: capitate_l (-0.00044505 -0.0072943 0.00737572)
      PathPoint P4: thirdmc_l (-0.00370774 0.00220678 0.0044014)
      PathPoint P5: fourthmc_l (-0.00115072 -0.0092613 0.00304348)
      PathPoint P6: 4proxph_l (-0.00123368 -0.0283102 0.00073161)
      PathPoint P7: 4midph_l (-1.526e-5 -0.0190813 -0.00022125)
      PathWrap: wrap_object=FDS_l method=hybrid
      PathWrap: wrap_object=Elbow_PT_ECRL_l method=hybrid
    Schutte1993Muscle_Deprecated FDSM_l: max_isometric_force=91.03 optimal_fiber_length=0.04434961
        tendon_slack_length=0.1746747 pennation_angle_at_optimal=0.1221731
      PathPoint P1: ulna_l (-0.00401728 -0.0162913 0.00114693)
      PathPoint P2: radius_l (0.0114033 -0.112328 -0.00254608)
      PathPoint P3: capitate_l (0.00369055 -0.0074734 0.00759279)
      PathPoint P4: thirdmc_l (0.00051925 0.00259216 0.00386188)
      PathPoint P5: thirdmc_l (0.00106688 -0.0100523 0.00074234)
      PathPoint P6: 3proxph_l (0.0016921 -0.0289201 -0.00280002)
      PathPoint P7: 3midph_l (0.00101048 -0.0180778 -0.00043678)
      PathWrap: wrap_object=FDS_l method=hybrid
    Schutte1993Muscle_Deprecated FDSI_l: max_isometric_force=61.24 optimal_fiber_length=0.04870158
        tendon_slack_length=0.1603944 pennation_angle_at_optimal=0.1047198
      PathPoint P1: ulna_l (-0.00405931 -0.0169278 0.00082267)
      PathPoint P2: radius_l (0.0128805 -0.111829 -0.0033147)
      PathPoint P3: capitate_l (0.00482487 -0.00741369 0.00752767)
      PathPoint P4: secondmc_l (-0.0020376 -0.00012515 0.00239809)
      PathPoint P5: secondmc_l (0.00152195 -0.0110441 0.00289869)
      PathPoint P6: 2proxph_l (0.00260691 -0.0205561 -0.0027107)
      PathPoint P7: 2midph_l (0.00136039 -0.0124583 0.00017303)
      PathWrap: wrap_object=FDS_l method=hybrid
      PathWrap: wrap_object=2ndmcp_l method=hybrid
    Schutte1993Muscle_Deprecated FDPL_l: max_isometric_force=79.65 optimal_fiber_length=0.04432958
        tendon_slack_length=0.1668426 pennation_angle_at_optimal=0.1396263
      PathPoint P1: ulna_l (-0.00377108 -0.0192998 -0.00152525)
      PathPoint P2: radius_l (0.00846091 -0.111187 -0.00517022)
      PathPoint P3: capitate_l (-0.00047761 -0.00557383 0.00644766)
      PathPoint P4: fourthmc_l (-0.00272205 0.00353152 0.00245619)
      PathPoint P5: fifthmc_l (-0.00084362 -0.00856371 0.00321938)
      PathPoint P6: 5proxph_l (-0.00326053 -0.0230566 0.00397918)
      PathPoint P7: 5distph_l (-0.00014537 -0.00196701 0.00074956)
      PathWrap: wrap_object=FDP_l method=hybrid
    Schutte1993Muscle_Deprecated FDPR_l: max_isometric_force=64.08 optimal_fiber_length=0.04816651
        tendon_slack_length=0.1702125 pennation_angle_at_optimal=0.1221731
      PathPoint P1: ulna_l (-0.00301446 -0.0202605 -0.00163934)
      PathPoint P2: radius_l (0.00948774 -0.111865 -0.00482193)
      PathPoint P3: capitate_l (0.00057527 -0.00638795 0.00642591)
      PathPoint P4: thirdmc_l (-0.00421887 0.00191876 0.00326151)
      PathPoint P5: fourthmc_l (-0.00114674 -0.00911447 0.00241652)
      PathPoint P6: 4proxph_l (-0.00218047 -0.0287047 0.00053795)
      PathPoint P7: 4distph_l (6.379e-5 -0.00421034 0.00042103)
      PathWrap: wrap_object=FDP_l method=hybrid
    Schutte1993Muscle_Deprecated FDPM_l: max_isometric_force=81.65 optimal_fiber_length=0.04959957
        tendon_slack_length=0.174044 pennation_angle_at_optimal=0.1047198
      PathPoint P1: ulna_l (-0.00313456 -0.0199783 -0.00126103)
      PathPoint P2: radius_l (0.0114453 -0.111955 -0.00471385)
      PathPoint P3: capitate_l (0.00181814 -0.00694696 0.00620883)
      PathPoint P4: thirdmc_l (-0.00051925 0.00247048 0.00339945)
      PathPoint P5: thirdmc_l (0.00013793 -0.00952085 0.00122914)
      PathPoint P6: 3proxph_l (0.00068489 -0.0290947 -0.00197411)
      PathPoint P7: 3distph_l (0.00017271 -0.00379225 0.00169713)
      PathWrap: wrap_object=FDP_l method=hybrid
    Schutte1993Muscle_Deprecated FDPI_l: max_isometric_force=68.27 optimal_fiber_length=0.04386566
        tendon_slack_length=0.1718901 pennation_angle_at_optimal=0.1221731
      PathPoint P1: ulna_l (-0.00388517 -0.0190716 -0.00168137)
      PathPoint P2: radius_l (0.0124902 -0.111451 -0.00549449)
      PathPoint P3: capitate_l (0.00486285 -0.00633909 0.0065779)
      PathPoint P4: secondmc_l (-0.00216276 0.00331924 0.00124159)
      PathPoint P5: secondmc_l (0.00210267 -0.0113245 0.00249819)
      PathPoint P6: 2proxph_l (0.00354711 -0.0217039 -0.00186818)
      PathPoint P7: 2distph_l (0.00038011 -0.00380108 0.00248722)
      PathWrap: wrap_object=FDP_l method=hybrid
      PathWrap: wrap_object=2ndmcp_l method=hybrid
    Schutte1993Muscle_Deprecated EDCL_l: max_isometric_force=13.11 optimal_fiber_length=0.03862037
        tendon_slack_length=0.1761683 pennation_angle_at_optimal=0.03490659
      PathPoint P1: humerus_l (-0.00021328 -0.153727 -0.00997082)
      PathPoint P2: EDCpt_l (0.00078073 -0.0233497 -0.00843783)
      PathPoint P3: radius_l (0.00596287 -0.133933 -0.0217257)
      PathPoint P4: fifthmc_l (-0.00217968 -0.00873243 -0.00203833)
      PathPoint P5: 5proxph_l (-0.00476436 -0.021972 0.00059222)
      PathPoint P6: 5distph_l (-0.00064508 0.00030891 -0.00052242)
      PathWrap: wrap_object=EDCL_l method=hybrid range=(3 4)
    Schutte1993Muscle_Deprecated EDCR_l: max_isometric_force=34.04 optimal_fiber_length=0.02484687
        tendon_slack_length=0.1297911 pennation_angle_at_optimal=0.05235988
      PathPoint P1: humerus_l (-0.00083179 -0.154287 -0.00950161)
      PathPoint P2: EDCpt_l (0.00156145 -0.0239682 -0.00932064)
      PathPoint P3: radius_l (0.00529632 -0.134306 -0.025725)
      PathPoint P4: fourthmc_l (-0.0013412 -0.00924543 -0.00203558)
      PathPoint P5: 4proxph_l (-0.00391624 -0.0277436 -0.00296228)
      PathPoint P6: 4distph_l (-0.00109086 -0.00239224 -0.00153741)
      PathWrap: wrap_object=EDCR_l method=hybrid range=(3 4)
    Schutte1993Muscle_Deprecated EDCM_l: max_isometric_force=35.32 optimal_fiber_length=0.05163921
        tendon_slack_length=0.2389382 pennation_angle_at_optimal=0.05235988
      PathPoint P1: humerus_l (0.00027193 -0.154542 -0.0103921)
      PathPoint P2: EDCpt_l (0.00189776 -0.02371 -0.00917651)
      PathPoint P3: radius_l (0.00864706 -0.134047 -0.0253587)
      PathPoint P4: thirdmc_l (0.00053141 -0.00950055 -0.00309924)
      PathPoint P5: 3proxph_l (0.00120193 -0.0284635 -0.00673482)
      PathPoint P6: 3distph_l (0.00057823 -0.00834295 -0.0015094)
      PathWrap: wrap_object=EDCM_l method=hybrid range=(3 4)
    Schutte1993Muscle_Deprecated EDCI_l: max_isometric_force=18.26 optimal_fiber_length=0.04115927
        tendon_slack_length=0.1893326 pennation_angle_at_optimal=0.05235988
      PathPoint P1: humerus_l (0.00034659 -0.154084 -0.00996549)
      PathPoint P2: EDCpt_l (0.00136927 -0.0235298 -0.00890626)
      PathPoint P3: radius_l (0.00920552 -0.133993 -0.0251966)
      PathPoint P4: secondmc_l (0.00237302 -0.013297 -0.00647328)
      PathPoint P5: 2proxph_l (0.00117219 -0.00672181 -0.00623339)
      PathPoint P6: 2proxph_l (0.0047071 -0.0255868 -0.00854115)
      PathPoint P7: 2midph_l (0.0007339 -0.0056146 -0.00346662)
      PathPoint P8: 2midph_l (0.00155133 -0.0116887 -0.00216589)
      PathPoint P9: 2distph_l (0.00020659 -0.00305736 -0.00188401)
      PathWrap: wrap_object=EDCI_l method=hybrid range=(3 4)
      PathWrap: wrap_object=Secondpm_l method=hybrid range=(6 7)
      PathWrap: wrap_object=Secondmd_l method=hybrid range=(8 9)
    Schutte1993Muscle_Deprecated EDM_l: max_isometric_force=25.25 optimal_fiber_length=0.04003488
        tendon_slack_length=0.1909812 pennation_angle_at_optimal=0.05235988
      PathPoint P1: humerus_l (0.00047454 -0.154196 -0.00984819)
      PathPoint P2: ulna_l (-0.00586679 -0.0234612 -0.0185251)
      PathPoint P3: ulna_l (-0.0045337 -0.0496425 -0.0218939)
      PathPoint P4: radius_l (0.00272623 -0.135957 -0.022086)
      PathPoint P5: fifthmc_l (0.00059736 0.0111082 -0.00362067)
      PathPoint P6: fifthmc_l (-0.00244873 -0.00842693 -0.00144096)
      PathPoint P7: 5proxph_l (-0.00359324 -0.0215395 -9.982e-5)
      PathPoint P8: 5distph_l (-0.00102666 -0.00151729 -0.00028165)
      PathWrap: wrap_object=EDM_l method=hybrid range=(4 5)
    Schutte1993Muscle_Deprecated EIP_l: max_isometric_force=21.7 optimal_fiber_length=0.0341717
        tendon_slack_length=0.1079106 pennation_angle_at_optimal=0.1047198
      PathPoint P1: ulna_l (-0.00236593 -0.0999936 -0.02211)
      PathPoint P2: ulna_l (0.00102684 -0.1049 -0.0243138)
      PathPoint P3: radius_l (0.00646127 -0.13681 -0.0220019)
      PathPoint P4: secondmc_l (-0.0054119 0.00764978 -0.00340936)
      PathPoint P5: secondmc_l (0.00220782 -0.0130266 -0.00643321)
      PathPoint P6: 2proxph_l (0.00104398 -0.00630665 -0.0057816)
      PathPoint P7: 2proxph_l (0.0043591 -0.0252327 -0.00862662)
      PathPoint P8: 2midph_l (0.00068616 -0.005364 -0.00356209)
      PathPoint P9: 2midph_l (0.00175419 -0.0121898 -0.00224942)
      PathPoint P10: 2distph_l (0.00096807 -0.00688039 -0.00143786)
      PathWrap: wrap_object=Extensor_ellipse_l method=hybrid
      PathWrap: wrap_object=Secondpm_l method=hybrid range=(7 8)
      PathWrap: wrap_object=Secondmd_l method=hybrid range=(9 10)
    Schutte1993Muscle_Deprecated EPL_l: max_isometric_force=39.46 optimal_fiber_length=0.03029257
        tendon_slack_length=0.1236947 pennation_angle_at_optimal=0.1047198
      PathPoint P1: ulna_l (-0.00847893 -0.0582836 -0.0177265)
      PathPoint P2: radius_l (0.00074461 -0.082075 -0.0136311)
      PathPoint P3: radius_l (0.0162252 -0.131339 -0.0229868)
      PathPoint P4: radius_l (0.0203086 -0.136635 -0.0276646)
      PathPoint P5: radius_l (0.0254247 -0.142742 -0.0250584)
      PathPoint P6: capitate_l (0.0131775 7.599e-5 -0.00329979)
      PathPoint P7: trapezium_l (0.00439068 -0.00249657 -0.00538387)
      PathPoint P8: firstmc_l (0.00317645 -0.00208214 -0.00383499)
      PathPoint P9: firstmc_l (0.0104833 -0.011718 0.00258087)
      PathPoint P10: proximal_thumb_l (0.00552756 -0.00174452 -0.00075179)
      PathPoint P11: proximal_thumb_l (0.00925757 -0.0127707 0.00500227)
      PathPoint P12: distal_thumb_l (0.00268676 -0.00353287 0.00229587)
      PathWrap: wrap_object=MPthumb_l method=hybrid
    Schutte1993Muscle_Deprecated EPB_l: max_isometric_force=14.2 optimal_fiber_length=0.03787871
        tendon_slack_length=0.06481467 pennation_angle_at_optimal=0.1256637
      PathPoint P1: radius_l (0.0115534 -0.088242 -0.0126944)
      PathPoint P2: radius_l (0.0136671 -0.0952197 -0.0160031)
      PathPoint P3: radius_l (0.0230048 -0.118429 -0.0230228)
      PathPoint P4: radius_l (0.0314357 -0.141782 -0.0162072)
      PathPoint P5: capitate_l (0.0169495 0.00138939 0.00177473)
      PathPoint P6: firstmc1_l (0.00698724 -0.0016318 0.00196107)
      PathPoint P7: firstmc_l (0.010522 -0.0111515 0.0055249)
      PathPoint P8: proximal_thumb_l (0.00446735 -0.00297822 0.00268426)
      PathWrap: wrap_object=MPthumb_l method=hybrid
    Schutte1993Muscle_Deprecated FPL_l: max_isometric_force=77.2 optimal_fiber_length=0.03184601
        tendon_slack_length=0.1118072 pennation_angle_at_optimal=0.1221731
      PathPoint P1: radius_l (0.00583076 -0.0567944 -0.0106227)
      PathPoint P2: radius_l (0.00995612 -0.0812163 -0.0114994)
      PathPoint P3: radius_l (0.0112232 -0.10768 -0.0119377)
      PathPoint P4: radius_l (0.0228186 -0.13914 -0.00948774)
      PathPoint P5: FPLpt_l (0.012597 0.00594462 0.0104267)
      PathPoint P6: FPLpt2_l (0.0083845 -0.0148751 0.0140797)
      PathPoint P7: firstmc_l (-0.00294404 -0.00786367 0.00455163)
      PathPoint P8: firstmc_l (0.00100716 -0.0111224 0.0046291)
      PathPoint P9: proximal_thumb_l (-0.00216861 -0.00887686 0.00244812)
      PathPoint P10: proximal_thumb_l (0.00284329 -0.0125394 0.00536852)
      PathPoint P11: distal_thumb_l (0.00119742 -0.0055764 0.00203858)
      PathWrap: wrap_object=FPL_l method=hybrid
      PathWrap: wrap_object=IPthumb_l method=hybrid
      PathWrap: wrap_object=MPthumb_l method=hybrid
    Schutte1993Muscle_Deprecated APL_l: max_isometric_force=59.53 optimal_fiber_length=0.04280713
        tendon_slack_length=0.07774925 pennation_angle_at_optimal=0.1308997
      PathPoint P1: radius_l (0.00692966 -0.0569084 -0.0100942)
      PathPoint P2: radius_l (0.0181948 -0.0838885 -0.0210592)
      PathPoint P3: radius_l (0.0239776 -0.0965108 -0.0204167)
      PathPoint P4: radius_l (0.0264035 -0.107157 -0.0188193)
      PathPoint P5: radius_l (0.033057 -0.138617 -0.0142196)
      PathPoint P6: APLpt_l (0.0228147 0.00427311 0.00502126)
      PathPoint P7: firstmc1_l (0.00512302 0.00320551 0.0029973)
      PathPoint P8: firstmc_l (0.00304572 0.00156401 0.00285203)
      PathPoint P9: firstmc_l (0.00400446 -0.0028375 0.00292467)
      PathWrap: wrap_object=APL_l method=hybrid range=(5 6)
  MarkerSet:
    Marker Wrist_L: lunate_l (0 0 0)
    Marker Thumb_MCP_L: firstmc1_l (0 0 0)
    Marker Thumb_PIP_L: proximal_thumb_l (0 0 0)
    Marker Thumb_DIP_L: distal_thumb_l (0 0 0)
    Marker Thumb_TIP_L: distal_thumb_l (0.0036406 -0.00759107 0.00318146)
    Marker Index_MCP_L: 2proxph_l (0 0 0)
    Marker Index_PIP_L: 2midph_l (0 0 0)
    Marker Index_DIP_L: 2distph_l (0 0 0)
    Marker Little_PIP_L: 5midph_l (0 0 0)
    Marker Ring_PIP_L: 4midph_l (0 0 0)
    Marker Middle_PIP_L: 3midph_l (0 0 0)
    Marker Middle_MCP_L: 3proxph_l (0 0 0)
    Marker Ring_MCP_L: 4proxph_l (0 0 0)
    Marker Little_MCP_L: 5proxph_l (0 0 0)
    Marker Middle_DIP_L: 3distph_l (0 0 0)
    Marker Ring_DIP_L: 4distph_l (0 0 0)
    Marker Little_DIP_L: 5distph_l (0 0 0)
    Marker Index_TIP_L: 2distph_l (0.00139244 -0.0103364 -0.00093022)
    Marker Middle_TIP_L: 3distph_l (0.00079439 -0.0139604 -0.00068913)
    Marker Ring_TIP_L: 4distph_l (-0.00150248 -0.0127572 -0.00199878)
    Marker Little_TIP_L: 5distph_l (-0.00174837 -0.00981224 0.00081439)
    Marker Elbow_L: ulna_l (0 0 0)
    Marker Shoulder_L: humphant1_l (0 0 0)
    Marker Point_E1_L: ulna_l (0 0 0.019375)
    Marker Point_W1_L: lunate_l (0.0156034 0 0)
