# OpenSim document version 30000
Model Zara61:
  length_units: meters
  force_units: N
  gravity: 0 -9.80665 0
  credits:
    Menegolo Andrea IMPORTANT NOTE: The geometry files included in the ULB_Project.zip file have similar names but different reference frames from the ones included in the OpenSim distribution. Please, include the Geometry directory from this model in the front of your GeometryPath.
  publications:
    Delp, S.L., Loan, J.P., Hoy, M.G., Zajac, F.E., Topp E.L., Rosen, J.M.: An interactive graphics-based model of the lower extremity to study orthopaedic surgical procedures, IEEE Transactions on Biomedical Engineering, vol. 37, pp. 757-767, 1990. Yamaguchi G.T., Zajac F.E.: A planar model of the knee joint to characterize the knee extensor mechanism." J . Biomecl7. vol. 21. pp. 1-10. 1989. Anderson F.C., Pandy M.G.: A dynamic optimization solution for vertical jumping in three dimensions. Computer Methods in Biomechanics and Biomedical Engineering 2:201-231, 1999. Anderson F.C., Pandy M.G.: Dynamic optimization of human walking. Journal of Biomechanical Engineering 123:381-390, 2001. Delp SL, Anderson FC, Arnold AS, Loan P, Habib A, John CT, Guendelman E, Thelen DG (in press). OpenSim: Open-source Software to Create and Analyze Dynamic Simulations of Movement. IEEE Transactions on Biomedical Engineering. (2007) Holzbaur KR, Murray WM, Delp SL.: A model of the upper extremity for simulating musculoskeletal surgery and analyzing neuromuscular control., Ann Biomed Eng. 2005 Jun;33(6):829-40. (2005)
  BodySet:
    Body ground: mass=0 mass_center=(0 0 0) inertia_xx=0 inertia_yy=0 inertia_zz=0
    Body ulna_l: mass=0 mass_center=(0 0 0) inertia_xx=0 inertia_yy=0 inertia_zz=0 meshes=ulna_l.vtp
      CustomJoint elbow: parent_body=ground location_in_parent=(0 0 0) location=(0 0 0)
        Coordinate floatyaw: motion_type=rotational default_value=0 range=(-3.141593 3.141593) clamped=true
        Coordinate floatroll: motion_type=rotational default_value=0 range=(-3.141593 3.141593) clamped=true
        Coordinate floatpitch: motion_type=rotational default_value=0 range=(-3.141593 3.141593) clamped=true
        Coordinate floatx: motion_type=translational default_value=0 range=(-5 5) clamped=true
        Coordinate floaty: motion_type=translational default_value=0 range=(-5 5) clamped=true
        Coordinate floatz: motion_type=translational default_value=0 range=(-5 5) clamped=true
        SpatialTransform:
          TransformAxis rotation1: coordinates=floatyaw axis=(1 0 0) LinearFunction(coefficients=1 0)
          TransformAxis rotation2: coordinates=floatroll axis=(0 1 0) LinearFunction(coefficients=1 0)
          TransformAxis rotation3: coordinates=floatpitch axis=(0 0 1) LinearFunction(coefficients=1 0)
          TransformAxis translation1: coordinates=floatx axis=(1 0 0) LinearFunction(coefficients=1 0)
          TransformAxis translation2: coordinates=floaty axis=(0 1 0) LinearFunction(coefficients=1 0)
          TransformAxis translation3: coordinates=floatz axis=(0 0 1) LinearFunction(coefficients=1 0)
    Body radius_l: mass=0 mass_center=(0 0 0) inertia_xx=0 inertia_yy=0 inertia_zz=0 meshes=radius_l.vtp
      CustomJoint radioulnar_l: parent_body=ulna_l location_in_parent=(0.00024019 -0.00690744 -0.0120092)
          location=(0 0 0)
        Coordinate pro_sup_l: motion_type=rotational default_value=1.570796 range=(-2.094395 3.141593) clamped=true
            locked=true
          # fairly confident in this default posture, but know that it's an assumption
          # given confidence in initial posture, it's easy to set the natural pro-sup range (with a little bit of extra range, 180 degrees pronation, 120 degrees supination)
        SpatialTransform: axes_held_at_zero=(rotation2 rotation3 translation1 translation2 translation3)
          TransformAxis rotation1: coordinates=pro_sup_l axis=(0.01716099 -0.9926656 -0.119668)
              LinearFunction(coefficients=1 0)
    Body lunate_l: mass=0 mass_center=(0 0 0) inertia_xx=0 inertia_yy=0 inertia_zz=0 meshes=Geometry/lunate_l.vtp
      CustomJoint radiocarpal_l: parent_body=radius_l location_in_parent=(0.01080882 -0.1453186 -0.01501225)
          location=(0 0 0)
        Coordinate deviation_l: motion_type=rotational default_value=0 range=(-1.570796 1.570796) clamped=true
            locked=true
          # not as confident in this posture. Might be more external deviation than usual.
          # larger than natural deviation range (180 degs total) to deal with uncertainty. But not gonna go full 360 degrees to prevent weird things where the model tries to fit a backwards or upside-down hand to the data points, plus this coordinate isn't *super* important. (tends not to be specifically targeted by objects and have little effect on marker positions AND to have a naturally low ROM anyway).
        Coordinate flexion_l: motion_type=rotational default_value=0 range=(-3.141593 3.141593) clamped=true
            locked=true
        SpatialTransform: axes_held_at_zero=(rotation3 translation1 translation2 translation3)
          TransformAxis rotation1: coordinates=deviation_l axis=(0 0 1) LinearFunction(coefficients=1 0)
          TransformAxis rotation2: coordinates=flexion_l axis=(-1 0 0) LinearFunction(coefficients=1 0)
    Body scaphoid_l: mass=0 mass_center=(0 0 0) inertia_xx=0 inertia_yy=0 inertia_zz=0 meshes=Geometry/scaphoid_l.vtp
      WeldJoint lun_scaph_l: parent_body=lunate_l location_in_parent=(0.00669999 -0.00242276 0.00068058)
          location=(0 0 0)
    Body pisiform_l: mass=0 mass_center=(0 0 0) inertia_xx=0 inertia_yy=0 inertia_zz=0 meshes=Geometry/pisiform_l.vtp
      WeldJoint lun_pis_l: parent_body=lunate_l location_in_parent=(-0.00726608 -0.00536543 0.00574913)
          location=(0 0 0)
    Body triquetrum_l: mass=0 mass_center=(0 0 0) inertia_xx=0 inertia_yy=0 inertia_zz=0
        meshes=Geometry/triquetrum_l.vtp
      WeldJoint lun_triq_l: parent_body=lunate_l location_in_parent=(-0.00585279 -0.00406993 0.00069959)
          location=(0 0 0)
    Body capitate_l: mass=0 mass_center=(0 0 0) inertia_xx=0 inertia_yy=0 inertia_zz=0 meshes=Geometry/capitate_l.vtp
      WeldJoint proximal_distal_l: parent_body=lunate_l location_in_parent=(0.00216658 -0.00817025 -0.00126293)
          location=(0 0 0)
    Body trapezium_l: mass=0 mass_center=(0 0 0) inertia_xx=0 inertia_yy=0 inertia_zz=0 meshes=Geometry/trapezium_l.vtp
      WeldJoint cap_trpzm_l: parent_body=capitate_l location_in_parent=(0.00829996 -0.00247974 0.00559447)
          location=(0 0 0)
    Body trapezoid_l: mass=0 mass_center=(0 0 0) inertia_xx=0 inertia_yy=0 inertia_zz=0 meshes=Geometry/trapezoid_l.vtp
      WeldJoint cap_trpzd_l: parent_body=capitate_l location_in_parent=(0.00496219 -0.00220457 0.00133729)
          location=(0 0 0)
    Body hamate_l: mass=0 mass_center=(0 0 0) inertia_xx=0 inertia_yy=0 inertia_zz=0 meshes=Geometry/hamate_l.vtp
      WeldJoint cap_ham_l: parent_body=capitate_l location_in_parent=(-0.00595322 -0.00135411 0.00040704)
          location=(0 0 0)
    Body firstmc1_l: mass=0 mass_center=(0 0 0) inertia_xx=0 inertia_yy=0 inertia_zz=0
      CustomJoint CMC1a_l: parent_body=trapezium_l location_in_parent=(0 0 0) location=(0 0 0)
        Coordinate cmc_flexion_l: motion_type=rotational default_value=0 range=(-0.2617994 0.7853982) clamped=true
        SpatialTransform: axes_held_at_zero=(rotation2 rotation3 translation1 translation2 translation3)
          TransformAxis rotation1: coordinates=cmc_flexion_l axis=(0.04239899 0.6652858 0.7453838)
              LinearFunction(coefficients=1 0)
    Body firstmc_l: mass=0 mass_center=(0 0 0) inertia_xx=0 inertia_yy=0 inertia_zz=0 meshes=Geometry/1mc_l.vtp
      CustomJoint CMC1b_l: parent_body=firstmc1_l location_in_parent=(0.00320801 -0.00240601 0.00111389)
          location=(0 0 0)
        Coordinate cmc_abduction_l: motion_type=rotational default_value=0 range=(-0.6981317 0.8726646) clamped=true
        SpatialTransform: axes_held_at_zero=(rotation2 rotation3 translation1 translation2 translation3)
          TransformAxis rotation1: coordinates=cmc_abduction_l axis=(-0.495557 -0.731736 0.467959)
              LinearFunction(coefficients=1 0)
    Body secondmc_l: mass=0 mass_center=(0 0 0) inertia_xx=0 inertia_yy=0 inertia_zz=0 meshes=Geometry/2mc_l.vtp
      WeldJoint CMC2_l: parent_body=capitate_l location_in_parent=(0.00857208 -0.02195995 -0.00293732) location=(0 0 0)
    Body thirdmc_l: mass=0 mass_center=(0 0 0) inertia_xx=0 inertia_yy=0 inertia_zz=0 meshes=Geometry/3mc_l.vtp
      WeldJoint CMC3_l: parent_body=capitate_l location_in_parent=(0.00027843 -0.02290502 -0.00430619) location=(0 0 0)
    Body fourthmc_l: mass=0 mass_center=(0 0 0) inertia_xx=0 inertia_yy=0 inertia_zz=0 meshes=Geometry/4mc_l.vtp
      WeldJoint CMC4_l: parent_body=capitate_l location_in_parent=(-0.00703162 -0.02365218 -0.00205065)
          location=(0 0 0)
    Body fifthmc_l: mass=0 mass_center=(0 0 0) inertia_xx=0 inertia_yy=0 inertia_zz=0 meshes=Geometry/5mc_l.vtp
      WeldJoint CMC5_l: parent_body=capitate_l location_in_parent=(-0.01278136 -0.02024554 0.00246217) location=(0 0 0)
    Body proximal_thumb_l: mass=0 mass_center=(0 0 0) inertia_xx=0 inertia_yy=0 inertia_zz=0
        meshes=Geometry/thumbprox_l.vtp
      CustomJoint MCP_l: parent_body=firstmc_l location_in_parent=(0.00798956 -0.01413911 0.00614956) location=(0 0 0)
        Coordinate mp_flexion_l: motion_type=rotational default_value=0 range=(-0.7807963 0) clamped=true
        SpatialTransform: axes_held_at_zero=(rotation2 rotation3 translation1 translation2 translation3)
          TransformAxis rotation1: coordinates=mp_flexion_l axis=(0.084295 0.203488 0.975442)
              LinearFunction(coefficients=1 0)
    Body distal_thumb_l: mass=0 mass_center=(0 0 0) inertia_xx=0 inertia_yy=0 inertia_zz=0
        meshes=Geometry/thumbdist_l.vtp
      CustomJoint IP_l: parent_body=proximal_thumb_l location_in_parent=(0.0067468 -0.01248158 0.00486734)
          location=(0 0 0)
        Coordinate ip_flexion_l: motion_type=rotational default_value=0 range=(-1.22173 0) clamped=true
        SpatialTransform: axes_held_at_zero=(rotation2 rotation3 translation1 translation2 translation3)
          TransformAxis rotation1: coordinates=ip_flexion_l axis=(0.05010201 0.4796231 0.8760431)
              LinearFunction(coefficients=1 0)
    Body 2proxph_l: mass=0 mass_center=(0 0 0) inertia_xx=0 inertia_yy=0 inertia_zz=0 meshes=Geometry/2proxph_l.vtp
      CustomJoint 2MCP_l: parent_body=secondmc_l location_in_parent=(0.00131089 -0.01057509 -0.00135545)
          orientation_in_parent=(0.15 -0.1 0.15) location=(0 0 0) orientation=(0.15 -0.1 0.15)
        Coordinate 2mcp_flexion_l: motion_type=rotational default_value=4e-8 range=(-0.3490659 1.745329) clamped=true
        Coordinate 2mcp_abduction_l: motion_type=rotational default_value=0 range=(0 0.3490659) clamped=true
        SpatialTransform: axes_held_at_zero=(rotation3 translation1 translation2 translation3)
          TransformAxis rotation1: coordinates=2mcp_flexion_l axis=(-1 0 0) LinearFunction(coefficients=1 0)
          TransformAxis rotation2: coordinates=2mcp_abduction_l axis=(0 0 1) LinearFunction(coefficients=1 0)
    Body 2midph_l: mass=0 mass_center=(0 0 0) inertia_xx=0 inertia_yy=0 inertia_zz=0 meshes=Geometry/2midph_l.vtp
      CustomJoint 2prox-midph_l: parent_body=2proxph_l location_in_parent=(0.00458927 -0.02519789 -0.00447266)
          orientation_in_parent=(0.15 -0.1 0.15) location=(0 0 0) orientation=(0.15 -0.1 0.15)
        Coordinate 2pm_flexion_l: motion_type=rotational default_value=0 range=(0 2.094395) clamped=true
        SpatialTransform: axes_held_at_zero=(rotation2 rotation3 translation1 translation2 translation3)
          TransformAxis rotation1: coordinates=2pm_flexion_l axis=(-1 0 0) LinearFunction(coefficients=1 0)
    Body 2distph_l: mass=0 mass_center=(0 0 0) inertia_xx=0 inertia_yy=0 inertia_zz=0 meshes=Geometry/2distph_l.vtp
      CustomJoint 2mid-distph_l: parent_body=2midph_l location_in_parent=(0.00198868 -0.01484976 -0.00072793)
          orientation_in_parent=(0.15 -0.1 0.15) location=(0 0 0) orientation=(0.15 -0.1 0.15)
        Coordinate 2md_flexion_l: motion_type=rotational default_value=0 range=(-0.3490659 1.745329) clamped=true
        SpatialTransform: axes_held_at_zero=(rotation2 rotation3 translation1 translation2 translation3)
          TransformAxis rotation1: coordinates=2md_flexion_l axis=(-1 0 0) LinearFunction(coefficients=1 0)
    Body 3proxph_l: mass=0 mass_center=(0 0 0) inertia_xx=0 inertia_yy=0 inertia_zz=0 meshes=Geometry/3proxph_l.vtp
      CustomJoint 3MCP_l: parent_body=thirdmc_l location_in_parent=(7.653e-5 -0.00838338 -0.00056697)
          orientation_in_parent=(0.08 0 0.03) location=(0 0 0) orientation=(0.08 0 0.03)
        Coordinate 3mcp_flexion_l: motion_type=rotational default_value=0 range=(-0.8726646 1.570796) clamped=true
        Coordinate 3mcp_abduction_l: motion_type=rotational default_value=0 range=(0 0.17) clamped=true
        SpatialTransform: axes_held_at_zero=(rotation3 translation1 translation2 translation3)
          TransformAxis rotation1: coordinates=3mcp_flexion_l axis=(-1 0 0) LinearFunction(coefficients=1 0)
          TransformAxis rotation2: coordinates=3mcp_abduction_l axis=(0 0 1) LinearFunction(coefficients=1 0)
    Body 3midph_l: mass=0 mass_center=(0 0 0) inertia_xx=0 inertia_yy=0 inertia_zz=0 meshes=Geometry/3midph_l.vtp
      CustomJoint 3prox-midph_l: parent_body=3proxph_l location_in_parent=(0.00110792 -0.02968624 -0.00418325)
          orientation_in_parent=(0.08 0 0.03) location=(0 0 0) orientation=(0.08 0 0.03)
        Coordinate 3pm_flexion_l: motion_type=rotational default_value=0 range=(0 2.094395) clamped=true
        SpatialTransform: axes_held_at_zero=(rotation2 rotation3 translation1 translation2 translation3)
          TransformAxis rotation1: coordinates=3pm_flexion_l axis=(-1 0 0) LinearFunction(coefficients=1 0)
    Body 3distph_l: mass=0 mass_center=(0 0 0) inertia_xx=0 inertia_yy=0 inertia_zz=0 meshes=Geometry/3distph_l.vtp
      CustomJoint 3mid-distph_l: parent_body=3midph_l location_in_parent=(0.00088987 -0.01893635 -0.00127386)
          orientation_in_parent=(0.08 0 0.03) location=(0 0 0) orientation=(0.08 0 0.03)
        Coordinate 3md_flexion_l: motion_type=rotational default_value=0 range=(-0.3490659 1.745329) clamped=true
        SpatialTransform: axes_held_at_zero=(rotation2 rotation3 translation1 translation2 translation3)
          TransformAxis rotation1: coordinates=3md_flexion_l axis=(-1 0 0) LinearFunction(coefficients=1 0)
    Body 4proxph_l: mass=0 mass_center=(0 0 0) inertia_xx=0 inertia_yy=0 inertia_zz=0 meshes=Geometry/4proxph_l.vtp
      CustomJoint 4MCP_l: parent_body=fourthmc_l location_in_parent=(-0.00059812 -0.00774254 5.655e-5)
          orientation_in_parent=(0.05 0.1 -0.07) location=(0 0 0) orientation=(0.05 0.4 -0.07)
        Coordinate 4mcp_flexion_l: motion_type=rotational default_value=0 range=(-0.8726646 1.570796) clamped=true
        Coordinate 4mcp_abduction_l: motion_type=rotational default_value=0 range=(-0.17 0) clamped=true
        SpatialTransform: axes_held_at_zero=(rotation3 translation1 translation2 translation3)
          TransformAxis rotation1: coordinates=4mcp_flexion_l axis=(-1 0 0) LinearFunction(coefficients=1 0)
          TransformAxis rotation2: coordinates=4mcp_abduction_l axis=(0 0 1) LinearFunction(coefficients=1 0)
    Body 4midph_l: mass=0 mass_center=(0 0 0) inertia_xx=0 inertia_yy=0 inertia_zz=0 meshes=Geometry/4midph_l.vtp
      CustomJoint 4prox-midph_l: parent_body=4proxph_l location_in_parent=(-0.0025305 -0.02887327 -0.00096471)
          orientation_in_parent=(0.05 0.4 -0.07) location=(0 0 0) orientation=(0.05 0.4 -0.07)
        Coordinate 4pm_flexion_l: motion_type=rotational default_value=0 range=(0 2.094395) clamped=true
        SpatialTransform: axes_held_at_zero=(rotation2 rotation3 translation1 translation2 translation3)
          TransformAxis rotation1: coordinates=4pm_flexion_l axis=(-1 0 0) LinearFunction(coefficients=1 0)
    Body 4distph_l: mass=0 mass_center=(0 0 0) inertia_xx=0 inertia_yy=0 inertia_zz=0 meshes=Geometry/4distph_l.vtp
      CustomJoint 4mid-distph_l: parent_body=4midph_l location_in_parent=(-0.00176775 -0.01891271 -0.00042954)
          orientation_in_parent=(0.05 0.4 -0.07) location=(0 0 0) orientation=(0.05 0.4 -0.07)
        Coordinate 4md_flexion_l: motion_type=rotational default_value=0 range=(-0.3490659 1.745329) clamped=true
        SpatialTransform: axes_held_at_zero=(rotation2 rotation3 translation1 translation2 translation3)
          TransformAxis rotation1: coordinates=4md_flexion_l axis=(-1 0 0) LinearFunction(coefficients=1 0)
    Body 5proxph_l: mass=0 mass_center=(0 0 0) inertia_xx=0 inertia_yy=0 inertia_zz=0 meshes=Geometry/5proxph_l.vtp
      CustomJoint 5MCP_l: parent_body=fifthmc_l location_in_parent=(-0.00068327 -0.00916895 0.00064005)
          orientation_in_parent=(0 0.2 -0.15) location=(0 0 0) orientation=(0 0.5 -0.15)
        Coordinate 5mcp_flexion_l: motion_type=rotational default_value=0 range=(-0.8726646 1.570796) clamped=true
        Coordinate 5mcp_abduction_l: motion_type=rotational default_value=0 range=(-0.3490659 0) clamped=true
        SpatialTransform: axes_held_at_zero=(rotation3 translation1 translation2 translation3)
          TransformAxis rotation1: coordinates=5mcp_flexion_l axis=(-1 0 0) LinearFunction(coefficients=1 0)
          TransformAxis rotation2: coordinates=5mcp_abduction_l axis=(0 0 1) LinearFunction(coefficients=1 0)
    Body 5midph_l: mass=0 mass_center=(0 0 0) inertia_xx=0 inertia_yy=0 inertia_zz=0 meshes=Geometry/5midph_l.vtp
      CustomJoint 5prox-midph_l: parent_body=5proxph_l location_in_parent=(-0.00351272 -0.02366412 0.00191572)
          orientation_in_parent=(0 0.5 -0.15) location=(0 0 0) orientation=(0 0.5 -0.15)
        Coordinate 5pm_flexion_l: motion_type=rotational default_value=9.21e-6 range=(0 2.094395) clamped=true
        SpatialTransform: axes_held_at_zero=(rotation2 rotation3 translation1 translation2 translation3)
          TransformAxis rotation1: coordinates=5pm_flexion_l axis=(-1 0 0) LinearFunction(coefficients=1 0)
    Body 5distph_l: mass=0 mass_center=(0 0 0) inertia_xx=0 inertia_yy=0 inertia_zz=0 meshes=Geometry/5distph_l.vtp
      CustomJoint 5mid-distph_l: parent_body=5midph_l location_in_parent=(-0.00191441 -0.0137876 0.00149565)
          orientation_in_parent=(0 0.5 -0.15) location=(0 0 0) orientation=(0 0.5 -0.15)
        Coordinate 5md_flexion_l: motion_type=rotational default_value=0 range=(-0.3490659 1.745329) clamped=true
        SpatialTransform: axes_held_at_zero=(rotation2 rotation3 translation1 translation2 translation3)
          TransformAxis rotation1: coordinates=5md_flexion_l axis=(-1 0 0) LinearFunction(coefficients=1 0)
  MarkerSet:
    Marker Wrist_L: lunate_l (0 0 0)
    Marker Thumb_MCP_L: firstmc1_l (0 0 0)
    Marker Thumb_PIP_L: proximal_thumb_l (0 0 0)
    Marker Thumb_DIP_L: distal_thumb_l (0 0 0)
    Marker Thumb_TIP_L: distal_thumb_l (0.0036406 -0.00759107 0.00318146)
    Marker Index_MCP_L: 2proxph_l (0 0 0)
    Marker Index_PIP_L: 2midph_l (0 0 0)
    Marker Index_DIP_L: 2distph_l (0 0 0)
    Marker Little_PIP_L: 5midph_l (0 0 0)
    Marker Ring_PIP_L: 4midph_l (0 0 0)
    Marker Middle_PIP_L: 3midph_l (0 0 0)
    Marker Middle_MCP_L: 3proxph_l (0 0 0)
    Marker Ring_MCP_L: 4proxph_l (0 0 0)
    Marker Little_MCP_L: 5proxph_l (0 0 0)
    Marker Middle_DIP_L: 3distph_l (0 0 0)
    Marker Ring_DIP_L: 4distph_l (0 0 0)
    Marker Little_DIP_L: 5distph_l (0 0 0)
    Marker Index_TIP_L: 2distph_l (0.00139244 -0.0103364 -0.00093022)
    Marker Middle_TIP_L: 3distph_l (0.00079439 -0.0139604 -0.00068913)
    Marker Ring_TIP_L: 4distph_l (-0.00150248 -0.0127572 -0.00199878)
    Marker Little_TIP_L: 5distph_l (-0.00174837 -0.00981224 0.00081439)
