# OpenSim document version 40000
Model Zara61-scaled:
  gravity: 0 -9.80665 0
  length_units: meters
  force_units: N
  credits:
    Menegolo Andrea IMPORTANT NOTE: The geometry files included in the ULB_Project.zip file have similar names but different reference frames from the ones included in the OpenSim distribution. Please, include the Geometry directory from this model in the front of your GeometryPath.
  publications:
    Delp, S.L., Loan, J.P., Hoy, M.G., Zajac, F.E., Topp E.L., Rosen, J.M.: An interactive graphics-based model of the lower extremity to study orthopaedic surgical procedures, IEEE Transactions on Biomedical Engineering, vol. 37, pp. 757-767, 1990. Yamaguchi G.T., Zajac F.E.: A planar model of the knee joint to characterize the knee extensor mechanism." J . Biomecl7. vol. 21. pp. 1-10. 1989. Anderson F.C., Pandy M.G.: A dynamic optimization solution for vertical jumping in three dimensions. Computer Methods in Biomechanics and Biomedical Engineering 2:201-231, 1999. Anderson F.C., Pandy M.G.: Dynamic optimization of human walking. Journal of Biomechanical Engineering 123:381-390, 2001. Delp SL, Anderson FC, Arnold AS, Loan P, Habib A, John CT, Guendelman E, Thelen DG (in press). OpenSim: Open-source Software to Create and Analyze Dynamic Simulations of Movement. IEEE Transactions on Biomedical Engineering. (2007) Holzbaur KR, Murray WM, Delp SL.: A model of the upper extremity for simulating musculoskeletal surgery and analyzing neuromuscular control., Ann Biomed Eng. 2005 Jun;33(6):829-40. (2005)
  Ground: meshes=treadmill.vtp
  BodySet:
    Body thorax: mass=0 [kg] mass_center=(0 0 0) inertia=(0 0 0 0 0 0)
        meshes=(thorax.vtp hat_skull.vtp hat_jaw.vtp hat_spine.vtp)
      WrapEllipsoid Thorax: xyz_body_rotation=(0.0434587 -0.3319616 0.1898918)
          translation=(-0.04020746 -0.1326013 0.07385256) quadrant=all dimensions=(0.104164 0.140622 0.0833315)
      WrapEllipsoid Thorax_l: xyz_body_rotation=(-0.0434587 0.3319616 0.1898918)
          translation=(-0.04020746 -0.1326013 -0.07385256) quadrant=all dimensions=(0.104164 0.140622 0.0833315)
    Body clavicle_l: mass=0 mass_center=(0 0 0) inertia=(0 0 0 0 0 0) meshes=clavicle_l.vtp
    Body clavphant_l: mass=0 mass_center=(0 0 0) inertia=(0 0 0 0 0 0)
    Body scapula_l: mass=0 mass_center=(0 0 0) inertia=(0 0 0 0 0 0) meshes=scapula_l.vtp
      WrapEllipsoid Deltoid2_l: active=false xyz_body_rotation=(-3.130423 1.548805 -1.314233)
          translation=(-0.006041536 -0.03937414 -0.009999777) quadrant=-y dimensions=(0.0312493 0.0416658 0.0364575)
      WrapTorus Delt3_l: active=false xyz_body_rotation=(-0.6209881 -0.32882 -0.5607743)
          translation=(-0.101352 -0.04458237 0.03854083) quadrant=all inner_radius=0.04166576 outer_radius=0.06249864
      WrapTorus INFSP_l: xyz_body_rotation=(-0.02530727 -0.5883505 0.1518436)
          translation=(-0.05843623 -0.02072872 0.01166641) quadrant=all inner_radius=0.008333151
          outer_radius=0.01979124
      WrapEllipsoid TMIN_l: xyz_body_rotation=(2.097537 0.2808235 -1.763481)
          translation=(-0.04354073 -0.05406132 0.03739502) quadrant=x dimensions=(0.0312493 0.0312493 0.0520822)
      WrapCylinder TRIlongglen_l: xyz_body_rotation=(-1.375319 0.2946116 2.435956)
          translation=(-0.03739502 -0.03218679 0.01374971) quadrant=x radius=0.003124923 length=0.03124933
    Body scapphant_l: mass=0 mass_center=(0 0 0) inertia=(0 0 0 0 0 0)
    Body humphant_l: mass=0 mass_center=(0 0 0) inertia=(0 0 0 0 0 0)
    Body humphant1_l: mass=0 mass_center=(0 0 0) inertia=(0 0 0 0 0 0)
    Body humerus_l: mass=0 mass_center=(0 0 0) inertia=(0 0 0 0 0 0) meshes=humerus_l.vtp
      WrapEllipsoid DELT1hh_l: xyz_body_rotation=(-0.05846853 -1.004612 0.5703736)
          translation=(-0.007630095 -0.006971391 0.01438192) quadrant=-z dimensions=(0.0164678 0.0548928 0.0274464)
      WrapCylinder delt2hum_l: xyz_body_rotation=(-1.680927 0.02495821 0.05166175)
          translation=(0.0009331796 -0.05258726 -0.0006038118) quadrant=all radius=0.005159914 length=0.02744638
      WrapEllipsoid delt3hum_l: xyz_body_rotation=(-1.727352 -0.07592182 -2.743134)
          translation=(0.001042976 -0.03249652 -0.0006038118) quadrant=x dimensions=(0.00548926 0.00548926 0.0274464)
      WrapEllipsoid SUPSP_l: xyz_body_rotation=(-0.03804818 -0.00855211 -1.306728)
          translation=(0.0001097858 0.004226734 -0.002360385) quadrant=all dimensions=(0.0109785 0.0109785 0.0109785)
      WrapEllipsoid INFSP_and_TMIN_hum_head_l: xyz_body_rotation=(0.2865831 0.00907571 -0.06841691)
          translation=(-0.0001646788 0.001427226 -0.002085921) quadrant=all dimensions=(0.0109785 0.0137232 0.0109785)
      WrapEllipsoid SUBSCAP_l: xyz_body_rotation=(0.9245009 -0.288852 0.381529)
          translation=(-0.001372323 0.0003842504 0.002470181) quadrant=all dimensions=(0.0109785 0.00933177 0.01537)
      WrapCylinder TMINhum_l: xyz_body_rotation=(-1.753532 -0.06928957 2.746276)
          translation=(-0.0007685112 -0.02497621 0) quadrant=x radius=0.003842484 length=0.03842492
      WrapSphere TMAJ_LAT_PEC_CORBhh_l: translation=(0.0003842504 0 -0.003293555) quadrant=all radius=0.01646781
      WrapCylinder TMAJ_LAThum_l: xyz_body_rotation=(-1.536413 0.06370452 1.41424)
          translation=(0.0003842504 -0.02431749 0.0030191) quadrant=-x radius=0.003842484 length=0.02195711
      WrapEllipsoid PEC1hh_l: xyz_body_rotation=(0.6204646 0.3104941 0.3637266)
          translation=(-0.002031038 0.0002744543 0.001372323) quadrant=z dimensions=(0.0164678 0.0109785 0.0109785)
      WrapCylinder PEC12hum_l: xyz_body_rotation=(-1.559277 0.07749262 -0.9258972)
          translation=(0.001097858 -0.02788553 0.0009331796) quadrant=x radius=0.004940353 length=0.03842492
      WrapSphere PEC23hh_l: translation=(-0.004720791 0.001152751 0.0002195717) quadrant=all radius=0.01097854
      WrapCylinder PEC3hum_l: xyz_body_rotation=(-1.440944 0.0561996 1.751961)
          translation=(0.0004940363 -0.03024592 0.0002195717) quadrant=-x radius=0.004391413 length=0.03842492
      WrapCylinder LAT_TMAJhh_l: xyz_body_rotation=(0.3050835 0.01832596 -0.6866125)
          translation=(-0.01229597 0.005599057 -0.005159914) quadrant=-y radius=0.003842484 length=0.02470175
      WrapSphere LAT_TMAJ2hh_l: xyz_body_rotation=(0.1272345 -0.2761111 0.01972222)
          translation=(-0.0008782867 0.005050118 -0.002854432) quadrant=z radius=0.01646781
      WrapCylinder CORBhum_l: xyz_body_rotation=(1.608321 -0.09599311 0.8752826)
          translation=(0.001482119 -0.0659811 0.003238672) quadrant=x radius=0.004391413 length=0.02744638
      WrapEllipsoid TRIlonghh_l: xyz_body_rotation=(-3.001617 0.853466 2.574186)
          translation=(-0.004281627 -0.00225061 0.0007685112) quadrant=-z dimensions=(0.0192125 0.0109785 0.0109785)
      WrapCylinder TRI_l: xyz_body_rotation=(0.1401499 0.00628319 0.1549852)
          translation=(0.001537002 -0.1602319 0.006532247) quadrant=all radius=0.008782836 length=0.02195711
      WrapEllipsoid ANC_l: xyz_body_rotation=(-0.00750492 0.1966986 1.049292)
          translation=(0.007355631 -0.1570482 0.0004391434) quadrant=-x dimensions=(0.0109785 0.0109785 0.0109785)
      WrapEllipsoid BIClong_l: xyz_body_rotation=(2.004336 1.001644 0.9754645)
          translation=(0.001811456 0.004007173 -0.0001646788) quadrant=-y dimensions=(0.0137232 0.0109785 0.0109785)
      WrapEllipsoid Elbow_BIC_BRD_l: xyz_body_rotation=(0.1286308 -0.1375319 0.03071779)
          translation=(0.001042976 -0.1586401 0.007684999) quadrant=x dimensions=(0.00823395 0.00823395 0.0548928)
      WrapEllipsoid Elbow_PT_ECRL_l: xyz_body_rotation=(0.1610939 0.1108284 0.6145304)
          translation=(0.001646808 -0.157652 0.003787591) quadrant=x dimensions=(0.00988067 0.0137232 0.0192125)
    Body ulna_l: mass=0 mass_center=(0 0 0) inertia=(0 0 0 0 0 0) meshes=ulna_l.vtp
      WrapCylinder PQ2_l: xyz_body_rotation=(-1.391376 -0.06894051 1.522451)
          translation=(-0.0007743073 -0.1349872 -0.02761689) quadrant=all radius=0.00451678 length=0.006452543
    Body radius_l: mass=0 mass_center=(0 0 0) inertia=(0 0 0 0 0 0) meshes=radius_l.vtp
      WrapCylinder SUP_l: xyz_body_rotation=(-1.447751 -0.3040364 -2.441017)
          translation=(0.00290365 -0.02819761 -0.003806989) quadrant=-x radius=0.005162024 length=0.02581016
      WrapTorus ECU_l: xyz_body_rotation=(0.9866346 0.1488766 0.222704) translation=(-0.01051766 -0.155958 -0.02251937)
          quadrant=all inner_radius=0.003871526 outer_radius=0.005807289
      WrapCylinder PQ1_l: xyz_body_rotation=(1.607623 0.0127409 -2.690251)
          translation=(0.01813164 -0.1281475 -0.01858332) quadrant=all radius=0.006452543 length=0.006452543
    Body lunate_l: mass=0 mass_center=(0 0 0) inertia=(0 0 0 0 0 0) meshes=lunate_l.vtp
      WrapEllipsoid Extensor_ellipse_l: xyz_body_rotation=(0.2508038 -0.2855359 0.2328269)
          translation=(0.0004144727 -0.007993218 -0.00278281) quadrant=-z dimensions=(0.0296045 0.0118418 0.00769716)
      WrapTorus ECRL_l: xyz_body_rotation=(-1.538333 -0.2343977 0.7311184)
          translation=(0.0131444 -0.005684064 -0.01231547) quadrant=all inner_radius=0.004736729
          outer_radius=0.009473426
      WrapTorus ECRB_l: xyz_body_rotation=(-1.312662 0.1178097 -0.1162389)
          translation=(0.007460334 -0.00562487 -0.01101287) quadrant=all inner_radius=0.004736729
          outer_radius=0.005920909
      WrapTorus FCR_l: xyz_body_rotation=(1.555961 0.1532399 -0.1000074)
          translation=(0.001894692 -0.002664431 0.0112497) quadrant=all inner_radius=0.0005920789
          outer_radius=0.001480241
      WrapTorus FCU_l: xyz_body_rotation=(1.573763 0.07976155 0.39235)
          translation=(-0.007282717 -0.007341922 0.01012474) quadrant=all inner_radius=0.004026184
          outer_radius=0.004736729
      WrapEllipsoid PL_l: xyz_body_rotation=(0.03159046 -0.0996583 0.06335545)
          translation=(0.003374933 -0.01065762 0.002427576) quadrant=z dimensions=(0.0148022 0.00828926 0.0071051)
      WrapEllipsoid FDS_l: xyz_body_rotation=(-0.00837758 0.08168141 -0.01710423)
          translation=(0.0007105121 -0.003374933 0.000177628) quadrant=z dimensions=(0.0148022 0.00769716 0.0071051)
      WrapEllipsoid FDP_l: xyz_body_rotation=(1.467473 0.1946042 0.121824)
          translation=(-0.001302602 -0.004085423 -0.001894692) quadrant=y dimensions=(0.0148022 0.00769716 0.0071051)
      WrapTorus EDCL_l: xyz_body_rotation=(-2.363176 -0.1930334 -0.2691298)
          translation=(-0.007578778 -0.007874795 -0.008762957) quadrant=all inner_radius=0.004736729
          outer_radius=0.007105099
      WrapTorus EDCR_l: xyz_body_rotation=(-1.983916 -0.100531 0.5230752)
          translation=(-0.005802487 -0.00811164 -0.009828704) quadrant=all inner_radius=0.005328808
          outer_radius=0.00651301
      WrapTorus EDCM_l: xyz_body_rotation=(-1.993166 -0.1979203 0.3682645)
          translation=(-0.0004144727 -0.00692745 -0.01130892) quadrant=all inner_radius=0.005328808
          outer_radius=0.007105099
      WrapTorus EDCI_l: xyz_body_rotation=(-1.697682 -0.08970992 0.00767945)
          translation=(0.005328808 -0.008822141 -0.0124931) quadrant=all inner_radius=0.005328808
          outer_radius=0.007105099
      WrapEllipsoid EDM_l: xyz_body_rotation=(-2.962696 -0.1593486 0.1179843)
          translation=(-0.00988792 -0.001302602 -0.002842027) quadrant=z dimensions=(0.0106576 0.00828926 0.00473673)
      WrapEllipsoid FPL_l: xyz_body_rotation=(0.1663299 0.08220501 -0.06597345)
          translation=(0.01006553 -0.01480225 0.001953908) quadrant=z dimensions=(0.00947343 0.00592091 0.00592091)
    Body scaphoid_l: mass=0 mass_center=(0 0 0) inertia=(0 0 0 0 0 0) meshes=scaphoid_l.vtp
    Body pisiform_l: mass=0 mass_center=(0 0 0) inertia=(0 0 0 0 0 0) meshes=pisiform_l.vtp
    Body triquetrum_l: mass=0 mass_center=(0 0 0) inertia=(0 0 0 0 0 0) meshes=triquetrum_l.vtp
    Body capitate_l: mass=0 mass_center=(0 0 0) inertia=(0 0 0 0 0 0) meshes=capitate_l.vtp
    Body trapezium_l: mass=0 mass_center=(0 0 0) inertia=(0 0 0 0 0 0) meshes=trapezium_l.vtp
    Body trapezoid_l: mass=0 mass_center=(0 0 0) inertia=(0 0 0 0 0 0) meshes=trapezoid_l.vtp
    Body hamate_l: mass=0 mass_center=(0 0 0) inertia=(0 0 0 0 0 0) meshes=hamate_l.vtp
    Body firstmc1_l: mass=0 mass_center=(0 0 0) inertia=(0 0 0 0 0 0)
      WrapTorus APL_l: active=false xyz_body_rotation=(1.609892 -0.2478367 -0.0301942)
          translation=(0.003922462 0.001100206 0.004831344) quadrant=all inner_radius=0.001913393
          outer_radius=0.003826795
    Body firstmc_l: mass=0 mass_center=(0 0 0) inertia=(0 0 0 0 0 0) meshes=1mc_l.vtp
      WrapCylinder MPthumb_l: xyz_body_rotation=(-0.3213151 -0.1101303 -0.834791)
          translation=(0.008466786 -0.01458965 0.006840394) quadrant=all radius=0.004065972 length=0.009566983
    Body secondmc_l: mass=0 mass_center=(0 0 0) inertia=(0 0 0 0 0 0) meshes=2mc_l.vtp
      WrapEllipsoid 2ndmcp_l: xyz_body_rotation=(-1.486671 1.296605 2.43072)
          translation=(0.002323772 -0.01197331 0.0002363154) quadrant=-x dimensions=(0.00196929 0.00196929 0.0118158)
    Body thirdmc_l: mass=0 mass_center=(0 0 0) inertia=(0 0 0 0 0 0) meshes=3mc_l.vtp
    Body fourthmc_l: mass=0 mass_center=(0 0 0) inertia=(0 0 0 0 0 0) meshes=4mc_l.vtp
    Body fifthmc_l: mass=0 mass_center=(0 0 0) inertia=(0 0 0 0 0 0) meshes=5mc_l.vtp
    Body proximal_thumb_l: mass=0 mass_center=(0 0 0) inertia=(0 0 0 0 0 0) meshes=thumbprox_l.vtp
      WrapCylinder IPthumb_l: xyz_body_rotation=(-0.3047345 -0.01291544 0.08796459)
          translation=(0.008220538 -0.02051738 0.006522073) quadrant=-x radius=0.003057234 length=0.006793847
    Body distal_thumb_l: mass=0 mass_center=(0 0 0) inertia=(0 0 0 0 0 0) meshes=thumbdist_l.vtp
    Body 2proxph_l: mass=0 mass_center=(0 0 0) inertia=(0 0 0 0 0 0) meshes=2proxph_l.vtp
      WrapCylinder Secondpm_l: xyz_body_rotation=(-0.7419395 1.473931 0.7096509)
          translation=(0.004578888 -0.02484804 -0.003724158) quadrant=all radius=0.002442079 length=0.006105177
    Body 2midph_l: mass=0 mass_center=(0 0 0) inertia=(0 0 0 0 0 0) meshes=2midph_l.vtp
      WrapCylinder Secondmd_l: xyz_body_rotation=(-0.5017822 1.413019 0.6473426)
          translation=(0.002147989 -0.01449893 -0.0001789999) quadrant=x radius=0.001789989 length=0.005966636
    Body 2distph_l: mass=0 mass_center=(0 0 0) inertia=(0 0 0 0 0 0) meshes=2distph_l.vtp
    Body 3proxph_l: mass=0 mass_center=(0 0 0) inertia=(0 0 0 0 0 0) meshes=3proxph_l.vtp
    Body 3midph_l: mass=0 mass_center=(0 0 0) inertia=(0 0 0 0 0 0) meshes=3midph_l.vtp
    Body 3distph_l: mass=0 mass_center=(0 0 0) inertia=(0 0 0 0 0 0) meshes=3distph_l.vtp
    Body 4proxph_l: mass=0 mass_center=(0 0 0) inertia=(0 0 0 0 0 0) meshes=4proxph_l.vtp
    Body 4midph_l: mass=0 mass_center=(0 0 0) inertia=(0 0 0 0 0 0) meshes=4midph_l.vtp
    Body 4distph_l: mass=0 mass_center=(0 0 0) inertia=(0 0 0 0 0 0) meshes=4distph_l.vtp
    Body 5proxph_l: mass=0 mass_center=(0 0 0) inertia=(0 0 0 0 0 0) meshes=5proxph_l.vtp
    Body 5midph_l: mass=0 mass_center=(0 0 0) inertia=(0 0 0 0 0 0) meshes=5midph_l.vtp
    Body 5distph_l: mass=0 mass_center=(0 0 0) inertia=(0 0 0 0 0 0) meshes=5distph_l.vtp
    Body bicpt_l: mass=0 mass_center=(0 0 0) inertia=(0 0 0 0 0 0)
    Body bicpt2_l: mass=0 mass_center=(0 0 0) inertia=(0 0 0 0 0 0)
    Body ptpt_l: mass=0 mass_center=(0 0 0) inertia=(0 0 0 0 0 0)
    Body FCUpt_l: mass=0 mass_center=(0 0 0) inertia=(0 0 0 0 0 0)
    Body EDCpt_l: mass=0 mass_center=(0 0 0) inertia=(0 0 0 0 0 0)
    Body APLpt_l: mass=0 mass_center=(0 0 0) inertia=(0 0 0 0 0 0)
    Body FPLpt_l: mass=0 mass_center=(0 0 0) inertia=(0 0 0 0 0 0)
    Body FPLpt2_l: mass=0 mass_center=(0 0 0) inertia=(0 0 0 0 0 0)
    Body PEC1pt2_l: mass=0 mass_center=(0 0 0) inertia=(0 0 0 0 0 0)
    Body PEC1pt3_l: mass=0 mass_center=(0 0 0) inertia=(0 0 0 0 0 0)
    Body PEC2pt2_l: mass=0 mass_center=(0 0 0) inertia=(0 0 0 0 0 0)
    Body PEC2pt3_l: mass=0 mass_center=(0 0 0) inertia=(0 0 0 0 0 0)
    Body PEC3pt2_l: mass=0 mass_center=(0 0 0) inertia=(0 0 0 0 0 0)
    Body PEC3pt3_l: mass=0 mass_center=(0 0 0) inertia=(0 0 0 0 0 0)
    Body DELT2pt2a_l: mass=0 mass_center=(0 0 0) inertia=(0 0 0 0 0 0)
    Body DELT2pt2_l: mass=0 mass_center=(0 0 0) inertia=(0 0 0 0 0 0)
    Body LAT1pt2_l: mass=0 mass_center=(0 0 0) inertia=(0 0 0 0 0 0)
    Body LAT1pt3_l: mass=0 mass_center=(0 0 0) inertia=(0 0 0 0 0 0)
    Body LAT2pt2_l: mass=0 mass_center=(0 0 0) inertia=(0 0 0 0 0 0)
    Body LAT2pt3_l: mass=0 mass_center=(0 0 0) inertia=(0 0 0 0 0 0)
    Body LAT3pt2_l: mass=0 mass_center=(0 0 0) inertia=(0 0 0 0 0 0)
    Body LAT3pt3_l: mass=0 mass_center=(0 0 0) inertia=(0 0 0 0 0 0)
  JointSet:
    WeldJoint back: socket_parent_frame=ground_offset socket_child_frame=thorax_offset
      PhysicalOffsetFrame ground_offset: socket_parent=/ground translation=(-0.00297992 -0.375882 0.172006) [meters]
      PhysicalOffsetFrame thorax_offset: socket_parent=/bodyset/thorax translation=(-0.02135368 -0.3942623 0)
    WeldJoint sternoclavicular_l: socket_parent_frame=thorax_offset socket_child_frame=clavicle_l_offset
      PhysicalOffsetFrame thorax_offset: socket_parent=/bodyset/thorax
          translation=(0.006588406 0.007218594 -0.02652547)
      PhysicalOffsetFrame clavicle_l_offset: socket_parent=/bodyset/clavicle_l translation=(0 0 0)
    WeldJoint unrotscap_l: socket_parent_frame=clavicle_l_offset socket_child_frame=clavphant_l_offset
      PhysicalOffsetFrame clavicle_l_offset: socket_parent=/bodyset/clavicle_l
          translation=(-0.01492672 0.02090584 -0.1411794)
      PhysicalOffsetFrame clavphant_l_offset: socket_parent=/bodyset/clavphant_l translation=(0 0 0)
    WeldJoint acromioclavicular_l: socket_parent_frame=clavphant_l_offset socket_child_frame=scapula_l_offset
      PhysicalOffsetFrame clavphant_l_offset: socket_parent=/bodyset/clavphant_l translation=(0 0 0)
      PhysicalOffsetFrame scapula_l_offset: socket_parent=/bodyset/scapula_l translation=(0 0 0)
    WeldJoint unrothum_l: socket_parent_frame=scapula_l_offset socket_child_frame=scapphant_l_offset
      PhysicalOffsetFrame scapula_l_offset: socket_parent=/bodyset/scapula_l
          translation=(-0.009947695 -0.03541592 -0.009374788)
      PhysicalOffsetFrame scapphant_l_offset: socket_parent=/bodyset/scapphant_l translation=(0 0 0)
    WeldJoint shoulder0_l: socket_parent_frame=ground_offset socket_child_frame=humphant_l_offset
      PhysicalOffsetFrame ground_offset: socket_parent=/ground translation=(0 0 0)
      PhysicalOffsetFrame humphant_l_offset: socket_parent=/bodyset/humphant_l translation=(0 0 0)
    WeldJoint shoulder1_l: socket_parent_frame=humphant_l_offset socket_child_frame=humphant1_l_offset
      PhysicalOffsetFrame humphant_l_offset: socket_parent=/bodyset/humphant_l translation=(0 0 0)
      PhysicalOffsetFrame humphant1_l_offset: socket_parent=/bodyset/humphant1_l translation=(0 0 0)
    CustomJoint shoulder_l: socket_parent_frame=humphant1_l_offset socket_child_frame=humerus_l_offset
      Coordinate shoulder_elev_l: default_value=-0.2353032 range=(-1.047198 1.570796) clamped=true
      Coordinate shoulder_add_l: default_value=-0.1585083 range=(-1.919862 0.7853982) clamped=true
      Coordinate shoulder_rot_l: default_value=-0.2005781 range=(-0.8726646 1.570796) clamped=true
      PhysicalOffsetFrame humphant1_l_offset: socket_parent=/bodyset/humphant1_l translation=(0 0 0)
      PhysicalOffsetFrame humerus_l_offset: socket_parent=/bodyset/humerus_l translation=(0 0 0)
      SpatialTransform: axes_held_at_zero=(translation1 translation2 translation3)
        TransformAxis rotation1: coordinates=shoulder_elev_l axis=(0 0 1) LinearFunction(coefficients=1 0)
        TransformAxis rotation2: coordinates=shoulder_add_l axis=(-1 0 0) LinearFunction(coefficients=1 0)
        TransformAxis rotation3: coordinates=shoulder_rot_l axis=(0 -1 0) LinearFunction(coefficients=1 0)
    CustomJoint elbow_l: socket_parent_frame=humerus_l_offset socket_child_frame=ulna_l_offset
      Coordinate elbow_flexion_l: default_value=1.738953 range=(0 2.268928) clamped=true
      PhysicalOffsetFrame humerus_l_offset: socket_parent=/bodyset/humerus_l
          translation=(0.003348448 -0.1594088 0.006751819)
      PhysicalOffsetFrame ulna_l_offset: socket_parent=/bodyset/ulna_l translation=(0 0 0)
      SpatialTransform: axes_held_at_zero=(rotation2 rotation3 translation1 translation2 translation3)
        TransformAxis rotation1: coordinates=elbow_flexion_l axis=(-0.04940001 -0.03660001 0.9981083)
            LinearFunction(coefficients=1 0)
    CustomJoint radioulnar_l: socket_parent_frame=ulna_l_offset socket_child_frame=radius_l_offset
      Coordinate pro_sup_l: default_value=0.9428648 range=(-1.570796 1.770796) clamped=true
      PhysicalOffsetFrame ulna_l_offset: socket_parent=/bodyset/ulna_l
          translation=(0.0002580953 -0.007422364 -0.01290444)
      PhysicalOffsetFrame radius_l_offset: socket_parent=/bodyset/radius_l translation=(0 0 0)
      SpatialTransform: axes_held_at_zero=(rotation2 rotation3 translation1 translation2 translation3)
        TransformAxis rotation1: coordinates=pro_sup_l axis=(0.01716099 -0.9926656 -0.119668)
            LinearFunction(coefficients=1 0)
    CustomJoint radiocarpal_l: socket_parent_frame=radius_l_offset socket_child_frame=lunate_l_offset
      Coordinate deviation_l: default_value=0.09830971 range=(-0.7853982 0.7853982) clamped=true
      Coordinate flexion_l: default_value=-0.04261244 range=(-0.7853982 0.7853982) clamped=true
      PhysicalOffsetFrame radius_l_offset: socket_parent=/bodyset/radius_l
          translation=(0.01161456 -0.156152 -0.0161313)
      PhysicalOffsetFrame lunate_l_offset: socket_parent=/bodyset/lunate_l translation=(0 0 0)
      SpatialTransform: axes_held_at_zero=(rotation3 translation1 translation2 translation3)
        TransformAxis rotation1: coordinates=deviation_l axis=(0 0 1) LinearFunction(coefficients=1 0)
        TransformAxis rotation2: coordinates=flexion_l axis=(-1 0 0) LinearFunction(coefficients=1 0)
    WeldJoint lun_scaph_l: socket_parent_frame=lunate_l_offset socket_child_frame=scaphoid_l_offset
      PhysicalOffsetFrame lunate_l_offset: socket_parent=/bodyset/lunate_l
          translation=(0.007309336 -0.002643103 0.0007424769)
      PhysicalOffsetFrame scaphoid_l_offset: socket_parent=/bodyset/scaphoid_l translation=(0 0 0)
    WeldJoint lun_pis_l: socket_parent_frame=lunate_l_offset socket_child_frame=pisiform_l_offset
      PhysicalOffsetFrame lunate_l_offset: socket_parent=/bodyset/lunate_l
          translation=(-0.00792691 -0.005853401 0.006271998)
      PhysicalOffsetFrame pisiform_l_offset: socket_parent=/bodyset/pisiform_l translation=(0 0 0)
    WeldJoint lun_triq_l: socket_parent_frame=lunate_l_offset socket_child_frame=triquetrum_l_offset
      PhysicalOffsetFrame lunate_l_offset: socket_parent=/bodyset/lunate_l
          translation=(-0.006385085 -0.004440079 0.0007632158)
      PhysicalOffsetFrame triquetrum_l_offset: socket_parent=/bodyset/triquetrum_l translation=(0 0 0)
    WeldJoint proximal_distal_l: socket_parent_frame=lunate_l_offset socket_child_frame=capitate_l_offset
      PhysicalOffsetFrame lunate_l_offset: socket_parent=/bodyset/lunate_l
          translation=(0.002363625 -0.008913312 -0.00137779)
      PhysicalOffsetFrame capitate_l_offset: socket_parent=/bodyset/capitate_l translation=(0 0 0)
    WeldJoint cap_trpzm_l: socket_parent_frame=capitate_l_offset socket_child_frame=trapezium_l_offset
      PhysicalOffsetFrame capitate_l_offset: socket_parent=/bodyset/capitate_l
          translation=(0.009054819 -0.002705266 0.006103272)
      PhysicalOffsetFrame trapezium_l_offset: socket_parent=/bodyset/trapezium_l translation=(0 0 0)
    WeldJoint cap_trpzd_l: socket_parent_frame=capitate_l_offset socket_child_frame=trapezoid_l_offset
      PhysicalOffsetFrame capitate_l_offset: socket_parent=/bodyset/capitate_l
          translation=(0.005413488 -0.00240507 0.001458913)
      PhysicalOffsetFrame trapezoid_l_offset: socket_parent=/bodyset/trapezoid_l translation=(0 0 0)
    WeldJoint cap_ham_l: socket_parent_frame=capitate_l_offset socket_child_frame=hamate_l_offset
      PhysicalOffsetFrame capitate_l_offset: socket_parent=/bodyset/capitate_l
          translation=(-0.006494649 -0.001477263 0.0004440592)
      PhysicalOffsetFrame hamate_l_offset: socket_parent=/bodyset/hamate_l translation=(0 0 0)
    CustomJoint CMC1a_l: socket_parent_frame=trapezium_l_offset socket_child_frame=firstmc1_l_offset
      Coordinate cmc_flexion_l: default_value=-0.07012942 range=(-0.2617994 0.7853982) clamped=true
      PhysicalOffsetFrame trapezium_l_offset: socket_parent=/bodyset/trapezium_l translation=(0 0 0)
      PhysicalOffsetFrame firstmc1_l_offset: socket_parent=/bodyset/firstmc1_l translation=(0 0 0)
      SpatialTransform: axes_held_at_zero=(rotation2 rotation3 translation1 translation2 translation3)
        TransformAxis rotation1: coordinates=cmc_flexion_l axis=(0.04239899 0.6652858 0.7453838)
            LinearFunction(coefficients=1 0)
    CustomJoint CMC1b_l: socket_parent_frame=firstmc1_l_offset socket_child_frame=firstmc_l_offset
      Coordinate cmc_abduction_l: default_value=0.2882108 range=(-0.6981317 0.8726646) clamped=true
      PhysicalOffsetFrame firstmc1_l_offset: socket_parent=/bodyset/firstmc1_l
          translation=(0.003169141 -0.002376858 0.001100394)
      PhysicalOffsetFrame firstmc_l_offset: socket_parent=/bodyset/firstmc_l translation=(0 0 0)
      SpatialTransform: axes_held_at_zero=(rotation2 rotation3 translation1 translation2 translation3)
        TransformAxis rotation1: coordinates=cmc_abduction_l axis=(-0.495557 -0.731736 0.467959)
            LinearFunction(coefficients=1 0)
    WeldJoint CMC2_l: socket_parent_frame=capitate_l_offset socket_child_frame=secondmc_l_offset
      PhysicalOffsetFrame capitate_l_offset: socket_parent=/bodyset/capitate_l
          translation=(0.009351687 -0.02395709 -0.003204461)
      PhysicalOffsetFrame secondmc_l_offset: socket_parent=/bodyset/secondmc_l translation=(0 0 0)
    WeldJoint CMC3_l: socket_parent_frame=capitate_l_offset socket_child_frame=thirdmc_l_offset
      PhysicalOffsetFrame capitate_l_offset: socket_parent=/bodyset/capitate_l
          translation=(0.0003037524 -0.02498815 -0.004697826)
      PhysicalOffsetFrame thirdmc_l_offset: socket_parent=/bodyset/thirdmc_l translation=(0 0 0)
    WeldJoint CMC4_l: socket_parent_frame=capitate_l_offset socket_child_frame=fourthmc_l_offset
      PhysicalOffsetFrame capitate_l_offset: socket_parent=/bodyset/capitate_l
          translation=(-0.007671127 -0.0258033 -0.002237151)
      PhysicalOffsetFrame fourthmc_l_offset: socket_parent=/bodyset/fourthmc_l translation=(0 0 0)
    WeldJoint CMC5_l: socket_parent_frame=capitate_l_offset socket_child_frame=fifthmc_l_offset
      PhysicalOffsetFrame capitate_l_offset: socket_parent=/bodyset/capitate_l
          translation=(-0.01394383 -0.02208677 0.002686098)
      PhysicalOffsetFrame fifthmc_l_offset: socket_parent=/bodyset/fifthmc_l translation=(0 0 0)
    CustomJoint MCP_l: socket_parent_frame=firstmc_l_offset socket_child_frame=proximal_thumb_l_offset
      Coordinate mp_flexion_l: default_value=-0.0002950929 range=(-0.7807963 0) clamped=true
      PhysicalOffsetFrame firstmc_l_offset: socket_parent=/bodyset/firstmc_l
          translation=(0.007892757 -0.01396779 0.006075051)
      PhysicalOffsetFrame proximal_thumb_l_offset: socket_parent=/bodyset/proximal_thumb_l translation=(0 0 0)
      SpatialTransform: axes_held_at_zero=(rotation2 rotation3 translation1 translation2 translation3)
        TransformAxis rotation1: coordinates=mp_flexion_l axis=(0.084295 0.203488 0.975442)
            LinearFunction(coefficients=1 0)
    CustomJoint IP_l: socket_parent_frame=proximal_thumb_l_offset socket_child_frame=distal_thumb_l_offset
      Coordinate ip_flexion_l: default_value=-0.009296298 range=(-1.22173 0) clamped=true
      PhysicalOffsetFrame proximal_thumb_l_offset: socket_parent=/bodyset/proximal_thumb_l
          translation=(0.009511371 -0.01759606 0.006861783)
      PhysicalOffsetFrame distal_thumb_l_offset: socket_parent=/bodyset/distal_thumb_l translation=(0 0 0)
      SpatialTransform: axes_held_at_zero=(rotation2 rotation3 translation1 translation2 translation3)
        TransformAxis rotation1: coordinates=ip_flexion_l axis=(0.05010201 0.4796231 0.8760431)
            LinearFunction(coefficients=1 0)
    CustomJoint 2MCP_l: socket_parent_frame=secondmc_l_offset socket_child_frame=2proxph_l_offset
      Coordinate 2mcp_flexion_l: default_value=0.6330025 range=(-0.3490659 1.745329) clamped=true
      Coordinate 2mcp_abduction_l: default_value=-0.08656302 range=(-0.7906585 0.3490659) clamped=true
      PhysicalOffsetFrame secondmc_l_offset: socket_parent=/bodyset/secondmc_l
          translation=(0.001378899 -0.01112374 -0.001425771) orientation=(0.15 -0.1 0.15) [radians]
      PhysicalOffsetFrame 2proxph_l_offset: socket_parent=/bodyset/2proxph_l translation=(0 0 0)
          orientation=(0.15 -0.1 0.15)
      SpatialTransform: axes_held_at_zero=(rotation3 translation1 translation2 translation3)
        TransformAxis rotation1: coordinates=2mcp_flexion_l axis=(-1 0 0) LinearFunction(coefficients=1 0)
        TransformAxis rotation2: coordinates=2mcp_abduction_l axis=(0 0 1) LinearFunction(coefficients=1 0)
    CustomJoint 2prox-midph_l: socket_parent_frame=2proxph_l_offset socket_child_frame=2midph_l_offset
      Coordinate 2pm_flexion_l: default_value=0.2793852 range=(0 2.094395) clamped=true
      PhysicalOffsetFrame 2proxph_l_offset: socket_parent=/bodyset/2proxph_l
          translation=(0.004589268 -0.02519789 -0.004472658) orientation=(0.15 -0.1 0.15)
      PhysicalOffsetFrame 2midph_l_offset: socket_parent=/bodyset/2midph_l translation=(0 0 0)
          orientation=(0.15 -0.1 0.15)
      SpatialTransform: axes_held_at_zero=(rotation2 rotation3 translation1 translation2 translation3)
        TransformAxis rotation1: coordinates=2pm_flexion_l axis=(-1 0 0) LinearFunction(coefficients=1 0)
    CustomJoint 2mid-distph_l: socket_parent_frame=2midph_l_offset socket_child_frame=2distph_l_offset
      Coordinate 2md_flexion_l: default_value=0.09010732 range=(-0.3490659 1.745329) clamped=true
      PhysicalOffsetFrame 2midph_l_offset: socket_parent=/bodyset/2midph_l
          translation=(0.001988679 -0.01484979 -0.0007279295) orientation=(0.15 -0.1 0.15)
      PhysicalOffsetFrame 2distph_l_offset: socket_parent=/bodyset/2distph_l translation=(0 0 0)
          orientation=(0.15 -0.1 0.15)
      SpatialTransform: axes_held_at_zero=(rotation2 rotation3 translation1 translation2 translation3)
        TransformAxis rotation1: coordinates=2md_flexion_l axis=(-1 0 0) LinearFunction(coefficients=1 0)
    CustomJoint 3MCP_l: socket_parent_frame=thirdmc_l_offset socket_child_frame=3proxph_l_offset
      Coordinate 3mcp_flexion_l: default_value=0.2439234 range=(-0.8726646 1.570796) clamped=true
      Coordinate 3mcp_abduction_l: default_value=-0.2071703 range=(-0.7490659 0.3490659) clamped=true
      PhysicalOffsetFrame thirdmc_l_offset: socket_parent=/bodyset/thirdmc_l
          translation=(8.997348e-5 -0.009856029 -0.0006665656) orientation=(0.08 0 0.03)
      PhysicalOffsetFrame 3proxph_l_offset: socket_parent=/bodyset/3proxph_l translation=(0 0 0)
          orientation=(0.08 0 0.03)
      SpatialTransform: axes_held_at_zero=(rotation3 translation1 translation2 translation3)
        TransformAxis rotation1: coordinates=3mcp_flexion_l axis=(-1 0 0) LinearFunction(coefficients=1 0)
        TransformAxis rotation2: coordinates=3mcp_abduction_l axis=(0 0 1) LinearFunction(coefficients=1 0)
    CustomJoint 3prox-midph_l: socket_parent_frame=3proxph_l_offset socket_child_frame=3midph_l_offset
      Coordinate 3pm_flexion_l: default_value=0.4096283 range=(0 2.094395) clamped=true
      PhysicalOffsetFrame 3proxph_l_offset: socket_parent=/bodyset/3proxph_l
          translation=(0.001107922 -0.02968624 -0.004183256) orientation=(0.08 0 0.03)
      PhysicalOffsetFrame 3midph_l_offset: socket_parent=/bodyset/3midph_l translation=(0 0 0)
          orientation=(0.08 0 0.03)
      SpatialTransform: axes_held_at_zero=(rotation2 rotation3 translation1 translation2 translation3)
        TransformAxis rotation1: coordinates=3pm_flexion_l axis=(-1 0 0) LinearFunction(coefficients=1 0)
    CustomJoint 3mid-distph_l: socket_parent_frame=3midph_l_offset socket_child_frame=3distph_l_offset
      Coordinate 3md_flexion_l: default_value=0.1957034 range=(-0.3490659 1.745329) clamped=true
      PhysicalOffsetFrame 3midph_l_offset: socket_parent=/bodyset/3midph_l
          translation=(0.000889864 -0.01893627 -0.001273851) orientation=(0.08 0 0.03)
      PhysicalOffsetFrame 3distph_l_offset: socket_parent=/bodyset/3distph_l translation=(0 0 0)
          orientation=(0.08 0 0.03)
      SpatialTransform: axes_held_at_zero=(rotation2 rotation3 translation1 translation2 translation3)
        TransformAxis rotation1: coordinates=3md_flexion_l axis=(-1 0 0) LinearFunction(coefficients=1 0)
    CustomJoint 4MCP_l: socket_parent_frame=fourthmc_l_offset socket_child_frame=4proxph_l_offset
      Coordinate 4mcp_flexion_l: default_value=0.03667292 range=(-0.8726646 1.570796) clamped=true
      Coordinate 4mcp_abduction_l: default_value=-0.1111365 range=(-0.7490659 0.3490659) clamped=true
      PhysicalOffsetFrame fourthmc_l_offset: socket_parent=/bodyset/fourthmc_l
          translation=(-0.0006789601 -0.008788999 6.419313e-5) orientation=(0.05 0.1 -0.07)
      PhysicalOffsetFrame 4proxph_l_offset: socket_parent=/bodyset/4proxph_l translation=(0 0 0)
          orientation=(0.05 0.4 -0.07)
      SpatialTransform: axes_held_at_zero=(rotation3 translation1 translation2 translation3)
        TransformAxis rotation1: coordinates=4mcp_flexion_l axis=(-1 0 0) LinearFunction(coefficients=1 0)
        TransformAxis rotation2: coordinates=4mcp_abduction_l axis=(0 0 1) LinearFunction(coefficients=1 0)
    CustomJoint 4prox-midph_l: socket_parent_frame=4proxph_l_offset socket_child_frame=4midph_l_offset
      Coordinate 4pm_flexion_l: default_value=0.4905912 range=(0 2.094395) clamped=true
      PhysicalOffsetFrame 4proxph_l_offset: socket_parent=/bodyset/4proxph_l
          translation=(-0.002530497 -0.02887327 -0.0009647089) orientation=(0.05 0.4 -0.07)
      PhysicalOffsetFrame 4midph_l_offset: socket_parent=/bodyset/4midph_l translation=(0 0 0)
          orientation=(0.05 0.4 -0.07)
      SpatialTransform: axes_held_at_zero=(rotation2 rotation3 translation1 translation2 translation3)
        TransformAxis rotation1: coordinates=4pm_flexion_l axis=(-1 0 0) LinearFunction(coefficients=1 0)
    CustomJoint 4mid-distph_l: socket_parent_frame=4midph_l_offset socket_child_frame=4distph_l_offset
      Coordinate 4md_flexion_l: default_value=0.2136603 range=(-0.3490659 1.745329) clamped=true
      PhysicalOffsetFrame 4midph_l_offset: socket_parent=/bodyset/4midph_l
          translation=(-0.001767756 -0.01891276 -0.0004295414) orientation=(0.05 0.4 -0.07)
      PhysicalOffsetFrame 4distph_l_offset: socket_parent=/bodyset/4distph_l translation=(0 0 0)
          orientation=(0.05 0.4 -0.07)
      SpatialTransform: axes_held_at_zero=(rotation2 rotation3 translation1 translation2 translation3)
        TransformAxis rotation1: coordinates=4md_flexion_l axis=(-1 0 0) LinearFunction(coefficients=1 0)
    CustomJoint 5MCP_l: socket_parent_frame=fifthmc_l_offset socket_child_frame=5proxph_l_offset
      Coordinate 5mcp_flexion_l: default_value=-0.2606492 range=(-0.8726646 1.570796) clamped=true
      Coordinate 5mcp_abduction_l: default_value=-0.4 range=(-0.4 0.3490659) clamped=true
      PhysicalOffsetFrame fifthmc_l_offset: socket_parent=/bodyset/fifthmc_l
          translation=(-0.0007544342 -0.01012392 0.0007067127) orientation=(0 0.2 -0.15)
      PhysicalOffsetFrame 5proxph_l_offset: socket_parent=/bodyset/5proxph_l translation=(0 0 0)
          orientation=(0 0.5 -0.15)
      SpatialTransform: axes_held_at_zero=(rotation3 translation1 translation2 translation3)
        TransformAxis rotation1: coordinates=5mcp_flexion_l axis=(-1 0 0) LinearFunction(coefficients=1 0)
        TransformAxis rotation2: coordinates=5mcp_abduction_l axis=(0 0 1) LinearFunction(coefficients=1 0)
    CustomJoint 5prox-midph_l: socket_parent_frame=5proxph_l_offset socket_child_frame=5midph_l_offset
      Coordinate 5pm_flexion_l: default_value=0.2993574 range=(0 2.094395) clamped=true
      PhysicalOffsetFrame 5proxph_l_offset: socket_parent=/bodyset/5proxph_l
          translation=(-0.003512721 -0.02366411 0.00191572) orientation=(0 0.5 -0.15)
      PhysicalOffsetFrame 5midph_l_offset: socket_parent=/bodyset/5midph_l translation=(0 0 0)
          orientation=(0 0.5 -0.15)
      SpatialTransform: axes_held_at_zero=(rotation2 rotation3 translation1 translation2 translation3)
        TransformAxis rotation1: coordinates=5pm_flexion_l axis=(-1 0 0) LinearFunction(coefficients=1 0)
    CustomJoint 5mid-distph_l: socket_parent_frame=5midph_l_offset socket_child_frame=5distph_l_offset
      Coordinate 5md_flexion_l: default_value=0.08310938 range=(-0.3490659 1.745329) clamped=true
      PhysicalOffsetFrame 5midph_l_offset: socket_parent=/bodyset/5midph_l
          translation=(-0.001914408 -0.01378759 0.001495649) orientation=(0 0.5 -0.15)
      PhysicalOffsetFrame 5distph_l_offset: socket_parent=/bodyset/5distph_l translation=(0 0 0)
          orientation=(0 0.5 -0.15)
      SpatialTransform: axes_held_at_zero=(rotation2 rotation3 translation1 translation2 translation3)
        TransformAxis rotation1: coordinates=5md_flexion_l axis=(-1 0 0) LinearFunction(coefficients=1 0)
    CustomJoint bicpt_l: socket_parent_frame=radius_l_offset socket_child_frame=bicpt_l_offset
      Coordinate bicpt_tx_l: default_value=-0.0001 range=(-99999.9 99999.9) clamped=false
      Coordinate bicpt_ty_l: default_value=-0.0276 range=(-99999.9 99999.9) clamped=false
      Coordinate bicpt_tz_l: default_value=-0.0043 range=(-99999.9 99999.9) clamped=false
      PhysicalOffsetFrame radius_l_offset: socket_parent=/bodyset/radius_l translation=(0 0 0)
      PhysicalOffsetFrame bicpt_l_offset: socket_parent=/bodyset/bicpt_l translation=(0 0 0)
      SpatialTransform: axes_held_at_zero=(rotation1 rotation2 rotation3)
        TransformAxis translation1: coordinates=bicpt_tx_l axis=(1 0 0) LinearFunction(coefficients=1 0)
        TransformAxis translation2: coordinates=bicpt_ty_l axis=(0 1 0) LinearFunction(coefficients=1 0)
        TransformAxis translation3: coordinates=bicpt_tz_l axis=(0 0 -1) LinearFunction(coefficients=1 0)
    CustomJoint bicpt2_l: socket_parent_frame=radius_l_offset socket_child_frame=bicpt2_l_offset
      Coordinate bicpt2_tx_l: default_value=0.0146695 range=(-99999.9 99999.9) clamped=false
      Coordinate bicpt2_ty_l: default_value=-0.0102 range=(-99999.9 99999.9) clamped=false
      Coordinate bicpt2_tz_l: default_value=-0.01061843 range=(-99999.9 99999.9) clamped=false
      PhysicalOffsetFrame radius_l_offset: socket_parent=/bodyset/radius_l translation=(0 0 0)
      PhysicalOffsetFrame bicpt2_l_offset: socket_parent=/bodyset/bicpt2_l translation=(0 0 0)
      SpatialTransform: axes_held_at_zero=(rotation1 rotation2 rotation3)
        TransformAxis translation1: coordinates=bicpt2_tx_l axis=(1 0 0) LinearFunction(coefficients=1 0)
        TransformAxis translation2: coordinates=bicpt2_ty_l axis=(0 1 0) LinearFunction(coefficients=1 0)
        TransformAxis translation3: coordinates=bicpt2_tz_l axis=(0 0 -1) LinearFunction(coefficients=1 0)
    CustomJoint ptpt_l: socket_parent_frame=ulna_l_offset socket_child_frame=ptpt_l_offset
      Coordinate ptpt_tx_l: default_value=0.00755 range=(-99999.9 99999.9) clamped=false
      Coordinate ptpt_ty_l: default_value=-0.0649 range=(-99999.9 99999.9) clamped=false
      Coordinate ptpt_tz_l: default_value=-5e-5 range=(-99999.9 99999.9) clamped=false
      PhysicalOffsetFrame ulna_l_offset: socket_parent=/bodyset/ulna_l translation=(0 0 0)
      PhysicalOffsetFrame ptpt_l_offset: socket_parent=/bodyset/ptpt_l translation=(0 0 0)
      SpatialTransform: axes_held_at_zero=(rotation1 rotation2 rotation3)
        TransformAxis translation1: coordinates=ptpt_tx_l axis=(1 0 0) LinearFunction(coefficients=1 0)
        TransformAxis translation2: coordinates=ptpt_ty_l axis=(0 1 0) LinearFunction(coefficients=1 0)
        TransformAxis translation3: coordinates=ptpt_tz_l axis=(0 0 -1) LinearFunction(coefficients=1 0)
    CustomJoint FCUpt_l: socket_parent_frame=radius_l_offset socket_child_frame=FCUpt_l_offset
      Coordinate FCUpt_tx_l: default_value=0.004 range=(-99999.9 99999.9) clamped=false
      Coordinate FCUpt_ty_l: default_value=-0.1841 range=(-99999.9 99999.9) clamped=false
      Coordinate FCUpt_tz_l: default_value=0.0005 range=(-99999.9 99999.9) clamped=false
      PhysicalOffsetFrame radius_l_offset: socket_parent=/bodyset/radius_l translation=(0 0 0)
      PhysicalOffsetFrame FCUpt_l_offset: socket_parent=/bodyset/FCUpt_l translation=(0 0 0)
      SpatialTransform: axes_held_at_zero=(rotation1 rotation2 rotation3)
        TransformAxis translation1: coordinates=FCUpt_tx_l axis=(1 0 0) LinearFunction(coefficients=1 0)
        TransformAxis translation2: coordinates=FCUpt_ty_l axis=(0 1 0) LinearFunction(coefficients=1 0)
        TransformAxis translation3: coordinates=FCUpt_tz_l axis=(0 0 -1) LinearFunction(coefficients=1 0)
    CustomJoint EDCpt_l: socket_parent_frame=radius_l_offset socket_child_frame=EDCpt_l_offset
      Coordinate EDCpt_tx_l: default_value=0 range=(-99999.9 99999.9) clamped=false
      Coordinate EDCpt_ty_l: default_value=0 range=(-99999.9 99999.9) clamped=false
      Coordinate EDCpt_tz_l: default_value=0 range=(-99999.9 99999.9) clamped=false
      PhysicalOffsetFrame radius_l_offset: socket_parent=/bodyset/radius_l translation=(0 0 0)
      PhysicalOffsetFrame EDCpt_l_offset: socket_parent=/bodyset/EDCpt_l translation=(0 0 0)
      SpatialTransform: axes_held_at_zero=(rotation1 rotation2 rotation3)
        TransformAxis translation1: coordinates=EDCpt_tx_l axis=(1 0 0) LinearFunction(coefficients=1 0)
        TransformAxis translation2: coordinates=EDCpt_ty_l axis=(0 1 0) LinearFunction(coefficients=1 0)
        TransformAxis translation3: coordinates=EDCpt_tz_l axis=(0 0 -1) LinearFunction(coefficients=1 0)
    CustomJoint APLpt_l: socket_parent_frame=capitate_l_offset socket_child_frame=APLpt_l_offset
      Coordinate APLpt_tx_l: default_value=0 range=(-99999.9 99999.9) clamped=false
      Coordinate APLpt_ty_l: default_value=0 range=(-99999.9 99999.9) clamped=false
      Coordinate APLpt_tz_l: default_value=0 range=(-99999.9 99999.9) clamped=false
      PhysicalOffsetFrame capitate_l_offset: socket_parent=/bodyset/capitate_l translation=(0 0 0)
      PhysicalOffsetFrame APLpt_l_offset: socket_parent=/bodyset/APLpt_l translation=(0 0 0)
      SpatialTransform: axes_held_at_zero=(rotation1 rotation2 rotation3)
        TransformAxis translation1: coordinates=APLpt_tx_l axis=(1 0 0) LinearFunction(coefficients=1 0)
        TransformAxis translation2: coordinates=APLpt_ty_l axis=(0 1 0) LinearFunction(coefficients=1 0)
        TransformAxis translation3: coordinates=APLpt_tz_l axis=(0 0 -1) LinearFunction(coefficients=1 0)
    CustomJoint FPLpt_l: socket_parent_frame=capitate_l_offset socket_child_frame=FPLpt_l_offset
      Coordinate FPLpt_tx_l: default_value=0 range=(-99999.9 99999.9) clamped=false
      Coordinate FPLpt_ty_l: default_value=0 range=(-99999.9 99999.9) clamped=false
      Coordinate FPLpt_tz_l: default_value=0 range=(-99999.9 99999.9) clamped=false
      PhysicalOffsetFrame capitate_l_offset: socket_parent=/bodyset/capitate_l translation=(0 0 0)
      PhysicalOffsetFrame FPLpt_l_offset: socket_parent=/bodyset/FPLpt_l translation=(0 0 0)
      SpatialTransform: axes_held_at_zero=(rotation1 rotation2 rotation3)
        TransformAxis translation1: coordinates=FPLpt_tx_l axis=(1 0 0) LinearFunction(coefficients=1 0)
        TransformAxis translation2: coordinates=FPLpt_ty_l axis=(0 1 0) LinearFunction(coefficients=1 0)
        TransformAxis translation3: coordinates=FPLpt_tz_l axis=(0 0 -1) LinearFunction(coefficients=1 0)
    CustomJoint FPLpt2_l: socket_parent_frame=capitate_l_offset socket_child_frame=FPLpt2_l_offset
      Coordinate FPLpt2_tx_l: default_value=0 range=(-99999.9 99999.9) clamped=false
      Coordinate FPLpt2_ty_l: default_value=0 range=(-99999.9 99999.9) clamped=false
      Coordinate FPLpt2_tz_l: default_value=0 range=(-99999.9 99999.9) clamped=false
      PhysicalOffsetFrame capitate_l_offset: socket_parent=/bodyset/capitate_l translation=(0 0 0)
      PhysicalOffsetFrame FPLpt2_l_offset: socket_parent=/bodyset/FPLpt2_l translation=(0 0 0)
      SpatialTransform: axes_held_at_zero=(rotation1 rotation2 rotation3)
        TransformAxis translation1: coordinates=FPLpt2_tx_l axis=(1 0 0) LinearFunction(coefficients=1 0)
        TransformAxis translation2: coordinates=FPLpt2_ty_l axis=(0 1 0) LinearFunction(coefficients=1 0)
        TransformAxis translation3: coordinates=FPLpt2_tz_l axis=(0 0 -1) LinearFunction(coefficients=1 0)
    CustomJoint PEC1pt2_l: socket_parent_frame=humerus_l_offset socket_child_frame=PEC1pt2_l_offset
      Coordinate PEC1pt2_tx_l: default_value=0 range=(-99999.9 99999.9) clamped=false
      Coordinate PEC1pt2_ty_l: default_value=0 range=(-99999.9 99999.9) clamped=false
      Coordinate PEC1pt2_tz_l: default_value=0 range=(-99999.9 99999.9) clamped=false
      PhysicalOffsetFrame humerus_l_offset: socket_parent=/bodyset/humerus_l translation=(0 0 0)
      PhysicalOffsetFrame PEC1pt2_l_offset: socket_parent=/bodyset/PEC1pt2_l translation=(0 0 0)
      SpatialTransform: axes_held_at_zero=(rotation1 rotation2 rotation3)
        TransformAxis translation1: coordinates=PEC1pt2_tx_l axis=(1 0 0) LinearFunction(coefficients=1 0)
        TransformAxis translation2: coordinates=PEC1pt2_ty_l axis=(0 1 0) LinearFunction(coefficients=1 0)
        TransformAxis translation3: coordinates=PEC1pt2_tz_l axis=(0 0 -1) LinearFunction(coefficients=1 0)
    CustomJoint PEC1pt3_l: socket_parent_frame=thorax_offset socket_child_frame=PEC1pt3_l_offset
      Coordinate PEC1pt3_tx_l: default_value=0 range=(-99999.9 99999.9) clamped=false
      Coordinate PEC1pt3_ty_l: default_value=0 range=(-99999.9 99999.9) clamped=false
      Coordinate PEC1pt3_tz_l: default_value=0 range=(-99999.9 99999.9) clamped=false
      PhysicalOffsetFrame thorax_offset: socket_parent=/bodyset/thorax translation=(0 0 0)
      PhysicalOffsetFrame PEC1pt3_l_offset: socket_parent=/bodyset/PEC1pt3_l translation=(0 0 0)
      SpatialTransform: axes_held_at_zero=(rotation1 rotation2 rotation3)
        TransformAxis translation1: coordinates=PEC1pt3_tx_l axis=(1 0 0) LinearFunction(coefficients=1 0)
        TransformAxis translation2: coordinates=PEC1pt3_ty_l axis=(0 1 0) LinearFunction(coefficients=1 0)
        TransformAxis translation3: coordinates=PEC1pt3_tz_l axis=(0 0 -1) LinearFunction(coefficients=1 0)
    CustomJoint PEC2pt2_l: socket_parent_frame=humerus_l_offset socket_child_frame=PEC2pt2_l_offset
      Coordinate PEC2pt2_tx_l: default_value=0 range=(-99999.9 99999.9) clamped=false
      Coordinate PEC2pt2_ty_l: default_value=0 range=(-99999.9 99999.9) clamped=false
      Coordinate PEC2pt2_tz_l: default_value=0 range=(-99999.9 99999.9) clamped=false
      PhysicalOffsetFrame humerus_l_offset: socket_parent=/bodyset/humerus_l translation=(0 0 0)
      PhysicalOffsetFrame PEC2pt2_l_offset: socket_parent=/bodyset/PEC2pt2_l translation=(0 0 0)
      SpatialTransform: axes_held_at_zero=(rotation1 rotation2 rotation3)
        TransformAxis translation1: coordinates=PEC2pt2_tx_l axis=(1 0 0) LinearFunction(coefficients=1 0)
        TransformAxis translation2: coordinates=PEC2pt2_ty_l axis=(0 1 0) LinearFunction(coefficients=1 0)
        TransformAxis translation3: coordinates=PEC2pt2_tz_l axis=(0 0 -1) LinearFunction(coefficients=1 0)
    CustomJoint PEC2pt3_l: socket_parent_frame=thorax_offset socket_child_frame=PEC2pt3_l_offset
      Coordinate PEC2pt3_tx_l: default_value=0 range=(-99999.9 99999.9) clamped=false
      Coordinate PEC2pt3_ty_l: default_value=0 range=(-99999.9 99999.9) clamped=false
      Coordinate PEC2pt3_tz_l: default_value=0 range=(-99999.9 99999.9) clamped=false
      PhysicalOffsetFrame thorax_offset: socket_parent=/bodyset/thorax translation=(0 0 0)
      PhysicalOffsetFrame PEC2pt3_l_offset: socket_parent=/bodyset/PEC2pt3_l translation=(0 0 0)
      SpatialTransform: axes_held_at_zero=(rotation1 rotation2 rotation3)
        TransformAxis translation1: coordinates=PEC2pt3_tx_l axis=(1 0 0) LinearFunction(coefficients=1 0)
        TransformAxis translation2: coordinates=PEC2pt3_ty_l axis=(0 1 0) LinearFunction(coefficients=1 0)
        TransformAxis translation3: coordinates=PEC2pt3_tz_l axis=(0 0 -1) LinearFunction(coefficients=1 0)
    CustomJoint PEC3pt2_l: socket_parent_frame=humerus_l_offset socket_child_frame=PEC3pt2_l_offset
      Coordinate PEC3pt2_tx_l: default_value=0 range=(-99999.9 99999.9) clamped=false
      Coordinate PEC3pt2_ty_l: default_value=0 range=(-99999.9 99999.9) clamped=false
      Coordinate PEC3pt2_tz_l: default_value=0 range=(-99999.9 99999.9) clamped=false
      PhysicalOffsetFrame humerus_l_offset: socket_parent=/bodyset/humerus_l translation=(0 0 0)
      PhysicalOffsetFrame PEC3pt2_l_offset: socket_parent=/bodyset/PEC3pt2_l translation=(0 0 0)
      SpatialTransform: axes_held_at_zero=(rotation1 rotation2 rotation3)
        TransformAxis translation1: coordinates=PEC3pt2_tx_l axis=(1 0 0) LinearFunction(coefficients=1 0)
        TransformAxis translation2: coordinates=PEC3pt2_ty_l axis=(0 1 0) LinearFunction(coefficients=1 0)
        TransformAxis translation3: coordinates=PEC3pt2_tz_l axis=(0 0 -1) LinearFunction(coefficients=1 0)
    CustomJoint PEC3pt3_l: socket_parent_frame=thorax_offset socket_child_frame=PEC3pt3_l_offset
      Coordinate PEC3pt3_tx_l: default_value=0 range=(-99999.9 99999.9) clamped=false
      Coordinate PEC3pt3_ty_l: default_value=0.00022532 range=(-99999.9 99999.9) clamped=false
      Coordinate PEC3pt3_tz_l: default_value=0 range=(-99999.9 99999.9) clamped=false
      PhysicalOffsetFrame thorax_offset: socket_parent=/bodyset/thorax translation=(0 0 0)
      PhysicalOffsetFrame PEC3pt3_l_offset: socket_parent=/bodyset/PEC3pt3_l translation=(0 0 0)
      SpatialTransform: axes_held_at_zero=(rotation1 rotation2 rotation3)
        TransformAxis translation1: coordinates=PEC3pt3_tx_l axis=(1 0 0) LinearFunction(coefficients=1 0)
        TransformAxis translation2: coordinates=PEC3pt3_ty_l axis=(0 1 0) LinearFunction(coefficients=1 0)
        TransformAxis translation3: coordinates=PEC3pt3_tz_l axis=(0 0 -1) LinearFunction(coefficients=1 0)
    CustomJoint DELT2pt2a_l: socket_parent_frame=humerus_l_offset socket_child_frame=DELT2pt2a_l_offset
      Coordinate DELT2pt2a_tx_l: default_value=0 range=(-99999.9 99999.9) clamped=false
      Coordinate DELT2pt2a_ty_l: default_value=0 range=(-99999.9 99999.9) clamped=false
      Coordinate DELT2pt2a_tz_l: default_value=0 range=(-99999.9 99999.9) clamped=false
      PhysicalOffsetFrame humerus_l_offset: socket_parent=/bodyset/humerus_l translation=(0 0 0)
      PhysicalOffsetFrame DELT2pt2a_l_offset: socket_parent=/bodyset/DELT2pt2a_l translation=(0 0 0)
      SpatialTransform: axes_held_at_zero=(rotation1 rotation2 rotation3)
        TransformAxis translation1: coordinates=DELT2pt2a_tx_l axis=(1 0 0) LinearFunction(coefficients=1 0)
        TransformAxis translation2: coordinates=DELT2pt2a_ty_l axis=(0 1 0) LinearFunction(coefficients=1 0)
        TransformAxis translation3: coordinates=DELT2pt2a_tz_l axis=(0 0 -1) LinearFunction(coefficients=1 0)
    CustomJoint DELT2pt2_l: socket_parent_frame=DELT2pt2a_l_offset socket_child_frame=DELT2pt2_l_offset
      Coordinate DELT2pt2_tx_l: default_value=-0.00043991 range=(-99999.9 99999.9) clamped=false
      Coordinate DELT2pt2_ty_l: default_value=0 range=(-99999.9 99999.9) clamped=false
      Coordinate DELT2pt2_tz_l: default_value=0 range=(-99999.9 99999.9) clamped=false
      PhysicalOffsetFrame DELT2pt2a_l_offset: socket_parent=/bodyset/DELT2pt2a_l translation=(0 0 0)
      PhysicalOffsetFrame DELT2pt2_l_offset: socket_parent=/bodyset/DELT2pt2_l translation=(0 0 0)
      SpatialTransform: axes_held_at_zero=(rotation1 rotation2 rotation3)
        TransformAxis translation1: coordinates=DELT2pt2_tx_l axis=(1 0 0) LinearFunction(coefficients=1 0)
        TransformAxis translation2: coordinates=DELT2pt2_ty_l axis=(0 1 0) LinearFunction(coefficients=1 0)
        TransformAxis translation3: coordinates=DELT2pt2_tz_l axis=(0 0 -1) LinearFunction(coefficients=1 0)
    CustomJoint LAT1pt2_l: socket_parent_frame=scapula_l_offset socket_child_frame=LAT1pt2_l_offset
      Coordinate LAT1pt2_tx_l: default_value=0 range=(-99999.9 99999.9) clamped=false
      Coordinate LAT1pt2_ty_l: default_value=0 range=(-99999.9 99999.9) clamped=false
      Coordinate LAT1pt2_tz_l: default_value=0 range=(-99999.9 99999.9) clamped=false
      PhysicalOffsetFrame scapula_l_offset: socket_parent=/bodyset/scapula_l translation=(0 0 0)
      PhysicalOffsetFrame LAT1pt2_l_offset: socket_parent=/bodyset/LAT1pt2_l translation=(0 0 0)
      SpatialTransform: axes_held_at_zero=(rotation1 rotation2 rotation3)
        TransformAxis translation1: coordinates=LAT1pt2_tx_l axis=(1 0 0) LinearFunction(coefficients=1 0)
        TransformAxis translation2: coordinates=LAT1pt2_ty_l axis=(0 1 0) LinearFunction(coefficients=1 0)
        TransformAxis translation3: coordinates=LAT1pt2_tz_l axis=(0 0 -1) LinearFunction(coefficients=1 0)
    CustomJoint LAT1pt3_l: socket_parent_frame=scapula_l_offset socket_child_frame=LAT1pt3_l_offset
      Coordinate LAT1pt3_tx_l: default_value=0 range=(-99999.9 99999.9) clamped=false
      Coordinate LAT1pt3_ty_l: default_value=0 range=(-99999.9 99999.9) clamped=false
      Coordinate LAT1pt3_tz_l: default_value=0 range=(-99999.9 99999.9) clamped=false
      PhysicalOffsetFrame scapula_l_offset: socket_parent=/bodyset/scapula_l translation=(0 0 0)
      PhysicalOffsetFrame LAT1pt3_l_offset: socket_parent=/bodyset/LAT1pt3_l translation=(0 0 0)
      SpatialTransform: axes_held_at_zero=(rotation1 rotation2 rotation3)
        TransformAxis translation1: coordinates=LAT1pt3_tx_l axis=(1 0 0) LinearFunction(coefficients=1 0)
        TransformAxis translation2: coordinates=LAT1pt3_ty_l axis=(0 1 0) LinearFunction(coefficients=1 0)
        TransformAxis translation3: coordinates=LAT1pt3_tz_l axis=(0 0 -1) LinearFunction(coefficients=1 0)
    CustomJoint LAT2pt2_l: socket_parent_frame=scapula_l_offset socket_child_frame=LAT2pt2_l_offset
      Coordinate LAT2pt2_tx_l: default_value=0 range=(-99999.9 99999.9) clamped=false
      Coordinate LAT2pt2_ty_l: default_value=0 range=(-99999.9 99999.9) clamped=false
      Coordinate LAT2pt2_tz_l: default_value=0 range=(-99999.9 99999.9) clamped=false
      PhysicalOffsetFrame scapula_l_offset: socket_parent=/bodyset/scapula_l translation=(0 0 0)
      PhysicalOffsetFrame LAT2pt2_l_offset: socket_parent=/bodyset/LAT2pt2_l translation=(0 0 0)
      SpatialTransform: axes_held_at_zero=(rotation1 rotation2 rotation3)
        TransformAxis translation1: coordinates=LAT2pt2_tx_l axis=(1 0 0) LinearFunction(coefficients=1 0)
        TransformAxis translation2: coordinates=LAT2pt2_ty_l axis=(0 1 0) LinearFunction(coefficients=1 0)
        TransformAxis translation3: coordinates=LAT2pt2_tz_l axis=(0 0 -1) LinearFunction(coefficients=1 0)
    CustomJoint LAT2pt3_l: socket_parent_frame=scapula_l_offset socket_child_frame=LAT2pt3_l_offset
      Coordinate LAT2pt3_tx_l: default_value=0 range=(-99999.9 99999.9) clamped=false
      Coordinate LAT2pt3_ty_l: default_value=0 range=(-99999.9 99999.9) clamped=false
      Coordinate LAT2pt3_tz_l: default_value=0 range=(-99999.9 99999.9) clamped=false
      PhysicalOffsetFrame scapula_l_offset: socket_parent=/bodyset/scapula_l translation=(0 0 0)
      PhysicalOffsetFrame LAT2pt3_l_offset: socket_parent=/bodyset/LAT2pt3_l translation=(0 0 0)
      SpatialTransform: axes_held_at_zero=(rotation1 rotation2 rotation3)
        TransformAxis translation1: coordinates=LAT2pt3_tx_l axis=(1 0 0) LinearFunction(coefficients=1 0)
        TransformAxis translation2: coordinates=LAT2pt3_ty_l axis=(0 1 0) LinearFunction(coefficients=1 0)
        TransformAxis translation3: coordinates=LAT2pt3_tz_l axis=(0 0 -1) LinearFunction(coefficients=1 0)
    CustomJoint LAT3pt2_l: socket_parent_frame=scapula_l_offset socket_child_frame=LAT3pt2_l_offset
      Coordinate LAT3pt2_tx_l: default_value=0 range=(-99999.9 99999.9) clamped=false
      Coordinate LAT3pt2_ty_l: default_value=0 range=(-99999.9 99999.9) clamped=false
      Coordinate LAT3pt2_tz_l: default_value=0 range=(-99999.9 99999.9) clamped=false
      PhysicalOffsetFrame scapula_l_offset: socket_parent=/bodyset/scapula_l translation=(0 0 0)
      PhysicalOffsetFrame LAT3pt2_l_offset: socket_parent=/bodyset/LAT3pt2_l translation=(0 0 0)
      SpatialTransform: axes_held_at_zero=(rotation1 rotation2 rotation3)
        TransformAxis translation1: coordinates=LAT3pt2_tx_l axis=(1 0 0) LinearFunction(coefficients=1 0)
        TransformAxis translation2: coordinates=LAT3pt2_ty_l axis=(0 1 0) LinearFunction(coefficients=1 0)
        TransformAxis translation3: coordinates=LAT3pt2_tz_l axis=(0 0 -1) LinearFunction(coefficients=1 0)
    CustomJoint LAT3pt3_l: socket_parent_frame=scapula_l_offset socket_child_frame=LAT3pt3_l_offset
      Coordinate LAT3pt3_tx_l: default_value=0 range=(-99999.9 99999.9) clamped=false
      Coordinate LAT3pt3_ty_l: default_value=0 range=(-99999.9 99999.9) clamped=false
      Coordinate LAT3pt3_tz_l: default_value=0 range=(-99999.9 99999.9) clamped=false
      PhysicalOffsetFrame scapula_l_offset: socket_parent=/bodyset/scapula_l translation=(0 0 0)
      PhysicalOffsetFrame LAT3pt3_l_offset: socket_parent=/bodyset/LAT3pt3_l translation=(0 0 0)
      SpatialTransform: axes_held_at_zero=(rotation1 rotation2 rotation3)
        TransformAxis translation1: coordinates=LAT3pt3_tx_l axis=(1 0 0) LinearFunction(coefficients=1 0)
        TransformAxis translation2: coordinates=LAT3pt3_ty_l axis=(0 1 0) LinearFunction(coefficients=1 0)
        TransformAxis translation3: coordinates=LAT3pt3_tz_l axis=(0 0 -1) LinearFunction(coefficients=1 0)
  ForceSet:
    Schutte1993Muscle_Deprecated [values shared by the 50 below unless stated]: min_control=0.01 optimal_force=1
        max_contraction_velocity=0 time_scale=0.1 activation1=7.667 activation2=1.459854 damping=0.05
      tendon_force_length_curve: SimmSpline: x=(-10 -0.002 -0.001 0 0.00131 0.00281 0.00431 0.00581 0.00731 0.00881 0.0103 0.0118 0.0123 9.2 9.201 9.202 20)
          y=(0 0 0 0 0.0108 0.0257 0.0435 0.0652 0.0915 0.123 0.161 0.208 0.227 345 345 345 345)
      active_force_length_curve: SimmSpline: x=(-35 0 0.401 0.402 0.4035 0.52725 0.62875 0.71875 0.86125 1.045 1.2175 1.43875 1.61875 1.62 1.621 2.2 35)
          y=(0 0 0 0 0 0.226667 0.636667 0.856667 0.95 0.993333 0.77 0.246667 0 0 0 0 0)
      passive_force_length_curve: SimmSpline: x=(-35 0.998 0.999 1.15 1.25 1.35 1.45 1.55 1.65 1.75 1.7501 1.7502 35)
          y=(0 0 0 0 0.035 0.12 0.26 0.55 1.17 2 2 2 2)
    Schutte1993Muscle_Deprecated DELT1_l: max_isometric_force=1142.6 optimal_fiber_length=0.05767509
        tendon_slack_length=0.05495679 pennation_angle_at_optimal=0.3839724 [radians]
      PathPoint P1: humerus_l (0.004918393 -0.06522917 -0.003211236)
      PathPoint P2: humerus_l (0.008909125 -0.06056328 -0.002261594)
      PathPoint P3: scapula_l (0.02462892 -0.01842494 -0.0005609126)
      PathPoint P4: clavicle_l (-0.007932027 0.006266297 -0.0454448)
      PathWrap: wrap_object=delt2hum_l method=hybrid
      PathWrap pathwrap_0: wrap_object=DELT1hh_l method=hybrid range=(2 3)
    Schutte1993Muscle_Deprecated DELT2_l: max_isometric_force=1142.6 optimal_fiber_length=0.06330116
        tendon_slack_length=0.06429942 pennation_angle_at_optimal=0.2617994
      PathPoint P1: humerus_l (0.002530562 -0.07471466 -0.003073993)
      PathPoint P2: DELT2pt2_l (0.01541077 0.003031166 -0.02723516)
      PathPoint P3: scapula_l (2.833183e-5 0.00166573 -0.01265157)
      PathPoint P4: scapula_l (-0.006107651 -0.0001926297 -0.003512745)
      PathWrap: wrap_object=Deltoid2_l method=hybrid
      PathWrap pathwrap_0: wrap_object=delt2hum_l method=hybrid
      PathWrap pathwrap_1: wrap_object=TMAJ_LAT_PEC_CORBhh_l method=hybrid
    Schutte1993Muscle_Deprecated DELT3_l: max_isometric_force=259.88 optimal_fiber_length=0.08389973
        tendon_slack_length=0.02332253 pennation_angle_at_optimal=0.3141593
      PathPoint P1: scapula_l (-0.0315751 0.0006912266 0.01423231)
      PathPoint P2: scapula_l (-0.04105954 -0.01861192 -0.006985834)
      PathPoint P3: humerus_l (0.001130792 -0.04172955 -0.0057363)
      PathWrap: wrap_object=Delt3_l method=hybrid
      PathWrap pathwrap_0: wrap_object=delt3hum_l method=hybrid
      PathWrap pathwrap_1: wrap_object=TMAJ_LAT_PEC_CORBhh_l method=hybrid
    Schutte1993Muscle_Deprecated SUPSP_l: max_isometric_force=487.82 optimal_fiber_length=0.04127682
        tendon_slack_length=0.02390665 pennation_angle_at_optimal=0.1221731
      PathPoint P1: humerus_l (0.001405267 0.005835122 -0.01423371)
      PathPoint P2: scapula_l (-0.01086686 0.0007195482 0.007201144)
      PathPoint P3: scapula_l (-0.02492921 -0.00856658 0.03317284)
      PathWrap: wrap_object=SUPSP_l method=hybrid
    Schutte1993Muscle_Deprecated INFSP_l: max_isometric_force=1210.84 optimal_fiber_length=0.040271
        tendon_slack_length=0.01642843 pennation_angle_at_optimal=0.3228859
      PathPoint P1: humerus_l (-0.004868988 0.002656819 -0.01343777)
      PathPoint P2: scapula_l (-0.0418244 -0.03102553 0.02708783)
      PathWrap: wrap_object=INFSP_l method=hybrid
      PathWrap pathwrap_0: wrap_object=INFSP_and_TMIN_hum_head_l method=hybrid
    Schutte1993Muscle_Deprecated SUBSC_l: max_isometric_force=1377.81 optimal_fiber_length=0.04983765
        tendon_slack_length=0.01883897 pennation_angle_at_optimal=0.3490659
      PathPoint P1: humerus_l (0.007701471 0.004610985 0.007306246)
      PathPoint P2: scapula_l (-0.01037395 -0.02959209 0.01392069)
      PathPoint P3: scapula_l (-0.04105387 -0.02233997 0.03668558)
      PathWrap: wrap_object=SUBSCAP_l method=hybrid
    Schutte1993Muscle_Deprecated TMIN_l: max_isometric_force=354.25 optimal_fiber_length=0.03989896
        tendon_slack_length=0.0383913 pennation_angle_at_optimal=0.418879
      PathPoint P1: humerus_l (-0.0006038118 -0.006938457 -0.01183489)
      PathPoint P2: scapula_l (-0.05367145 -0.04527483 0.02683855)
      PathPoint P3: scapula_l (-0.05463462 -0.04601138 0.03001703)
      PathWrap: wrap_object=TMIN_l method=hybrid range=(1 2)
      PathWrap pathwrap_0: wrap_object=INFSP_and_TMIN_hum_head_l method=hybrid range=(1 2)
      PathWrap pathwrap_1: wrap_object=TMINhum_l method=hybrid range=(1 2)
    Schutte1993Muscle_Deprecated TMAJ_l: max_isometric_force=425.39 optimal_fiber_length=0.090817
        tendon_slack_length=0.01118435 pennation_angle_at_optimal=0.2792527
      PathPoint P1: humerus_l (0.005478297 -0.02974643 0.003117901)
      PathPoint P2: scapula_l (-0.05815304 -0.05846465 0.03302552)
      PathPoint P3: scapula_l (-0.05942782 -0.06172812 0.04032299)
      PathWrap: wrap_object=TMAJ_LAThum_l method=hybrid
      PathWrap pathwrap_0: wrap_object=LAT_TMAJhh_l method=hybrid range=(1 2)
      PathWrap pathwrap_1: wrap_object=LAT_TMAJ2hh_l method=hybrid
    Schutte1993Muscle_Deprecated PECM1_l: max_isometric_force=364.41 optimal_fiber_length=0.08051043
        tendon_slack_length=0.001563314 pennation_angle_at_optimal=0.296706
      PathPoint P1: humerus_l (0.006416984 -0.02300559 -0.004281637)
      PathPoint P2: PEC1pt2_l (0.009150152 -0.02291788 0.003269135)
      PathPoint P3: PEC1pt3_l (0.005427759 -0.008549593 -0.07175078)
      PathPoint P4: clavicle_l (0.001818704 -7.36607e-5 -0.02896885)
      PathWrap: wrap_object=Thorax_l method=hybrid
      PathWrap pathwrap_0: wrap_object=PEC12hum_l method=hybrid range=(2 3)
      PathWrap pathwrap_1: wrap_object=PEC1hh_l method=hybrid
    Schutte1993Muscle_Deprecated PECM2_l: max_isometric_force=515.41 optimal_fiber_length=0.07703117
        tendon_slack_length=0.04950018 pennation_angle_at_optimal=0.4363323
      PathPoint P1: humerus_l (0.00699335 -0.02354354 -0.004309084)
      PathPoint P2: PEC2pt2_l (0.008232311 -0.02588105 0.003892353)
      PathPoint P3: PEC2pt3_l (0.01143345 -0.02359776 -0.07189808)
      PathPoint P4: thorax (0.01751277 -0.02222099 -0.05498589)
      PathPoint P5: thorax (0.01568838 -0.02548445 -0.01286687)
      PathWrap: wrap_object=Thorax method=hybrid
      PathWrap pathwrap_0: wrap_object=PEC12hum_l method=hybrid range=(2 3)
      PathWrap pathwrap_1: wrap_object=TMAJ_LAT_PEC_CORBhh_l method=hybrid
      PathWrap pathwrap_2: wrap_object=PEC23hh_l method=hybrid
    Schutte1993Muscle_Deprecated PECM3_l: max_isometric_force=390.55 optimal_fiber_length=0.07646036
        tendon_slack_length=0.07287196 pennation_angle_at_optimal=0.4363323
      PathPoint P1: humerus_l (0.006965914 -0.02401562 -0.004116959)
      PathPoint P2: PEC3pt2_l (0.007042508 -0.02921817 0.01023796)
      PathPoint P3: PEC3pt3_l (0.01690654 -0.04022666 -0.06521252)
      PathPoint P4: thorax (0.02974507 -0.04768843 -0.05062329)
      PathPoint P5: thorax (0.03243063 -0.06602839 -0.02145612)
      PathWrap: wrap_object=Thorax method=hybrid
      PathWrap pathwrap_0: wrap_object=PEC3hum_l method=hybrid range=(2 3)
      PathWrap pathwrap_1: wrap_object=PEC23hh_l method=hybrid
    Schutte1993Muscle_Deprecated LAT1_l: max_isometric_force=389.1 optimal_fiber_length=0.1444966
        tendon_slack_length=0.06826612 pennation_angle_at_optimal=0.4363323
      PathPoint P1: humerus_l (0.005763746 -0.01874591 0.003584502)
      PathPoint P2: LAT1pt2_l (-0.04502554 -0.04861761 0.01239662)
      PathPoint P3: LAT1pt3_l (-0.06354113 -0.05540515 0.030153)
      PathPoint P4: thorax (-0.06701423 -0.05732582 -0.01878757)
      PathPoint P5: thorax (-0.05426636 -0.06642499 -0.004997171)
      PathWrap: wrap_object=TMAJ_LAThum_l method=hybrid
      PathWrap pathwrap_0: wrap_object=LAT_TMAJhh_l method=hybrid range=(1 2)
      PathWrap pathwrap_1: wrap_object=LAT_TMAJ2hh_l method=hybrid
    Schutte1993Muscle_Deprecated LAT2_l: max_isometric_force=389.1 optimal_fiber_length=0.1315829
        tendon_slack_length=0.09993282 pennation_angle_at_optimal=0.3316126
      PathPoint P1: humerus_l (0.005313639 -0.02234687 0.003353945)
      PathPoint P2: LAT2pt2_l (-0.04328617 -0.05790373 0.01024362)
      PathPoint P3: LAT2pt3_l (-0.05696322 -0.07914456 0.0297904)
      PathPoint P4: thorax (-0.06227769 -0.09579613 -0.01630597)
      PathPoint P5: thorax (-0.04071391 -0.1066177 -0.004617573)
      PathWrap: wrap_object=TMAJ_LAThum_l method=hybrid
      PathWrap pathwrap_0: wrap_object=LAT_TMAJhh_l method=hybrid range=(1 2)
      PathWrap pathwrap_1: wrap_object=LAT_TMAJ2hh_l method=hybrid
    Schutte1993Muscle_Deprecated LAT3_l: max_isometric_force=281.66 optimal_fiber_length=0.1540816
        tendon_slack_length=0.07751037 pennation_angle_at_optimal=0.3665191
      PathPoint P1: humerus_l (0.006631048 -0.02152898 0.002283543)
      PathPoint P2: LAT3pt2_l (-0.03217001 -0.07537118 0.012068)
      PathPoint P3: LAT3pt3_l (-0.05353546 -0.09945052 0.02609634)
      PathPoint P4: thorax (-0.06321252 -0.1098415 -0.03134282)
      PathPoint P5: thorax (-0.04032299 -0.1408387 -0.005138809)
      PathWrap: wrap_object=TMAJ_LAThum_l method=hybrid
      PathWrap pathwrap_0: wrap_object=LAT_TMAJhh_l method=hybrid range=(1 2)
      PathWrap pathwrap_1: wrap_object=LAT_TMAJ2hh_l method=hybrid
    Schutte1993Muscle_Deprecated CORB_l: max_isometric_force=242.46 optimal_fiber_length=0.0568422
        tendon_slack_length=0.0591598 pennation_angle_at_optimal=0
      PathPoint P1: scapula_l (0.007082165 -0.02338246 0.01502551)
      PathPoint P2: scapula_l (0.002736554 -0.03942214 0.00885555)
      PathPoint P3: humerus_l (0.004078538 -0.08260276 0.004292622)
      PathWrap: wrap_object=CORBhum_l method=hybrid
      PathWrap pathwrap_0: wrap_object=TMAJ_LAT_PEC_CORBhh_l method=hybrid
    Schutte1993Muscle_Deprecated TRIlong_l: max_isometric_force=798.52 optimal_fiber_length=0.07794714
        tendon_slack_length=0.08318238 pennation_angle_at_optimal=0.2094395
      PathPoint P1: scapula_l (-0.03706199 -0.03191449 0.0133835)
      PathPoint P2: humerus_l (-0.01489791 -0.06280291 0.003644429)
      PathPoint P3: humerus_l (-0.01747789 -0.1242609 0.006680464)
      PathPoint P4: humerus_l (-0.009567809 -0.1468768 0.006631048)
      PathPoint P5: ulna_l (-0.01413106 0.006749365 0.000503296)
      PathWrap: wrap_object=TRI_l method=hybrid
      PathWrap pathwrap_0: wrap_object=TRIlonghh_l method=hybrid
    Schutte1993Muscle_Deprecated TRIlat_l: max_isometric_force=624.3 optimal_fiber_length=0.06183342
        tendon_slack_length=0.05324846 pennation_angle_at_optimal=0.1570796
      PathPoint P1: humerus_l (-0.003288078 -0.0694175 -0.002349421)
      PathPoint P2: humerus_l (-0.01286689 -0.07974834 -0.005094057)
      PathPoint P3: humerus_l (-0.01747789 -0.1242609 0.006680464)
      PathPoint P4: humerus_l (-0.009567809 -0.1468768 0.006631048)
      PathPoint P5: ulna_l (-0.01413106 0.006749365 0.000503296)
      PathWrap: wrap_object=TRI_l method=hybrid
    Schutte1993Muscle_Deprecated TRImed_l: max_isometric_force=624.3 optimal_fiber_length=0.06178251
        tendon_slack_length=0.04929572 pennation_angle_at_optimal=0.1570796
      PathPoint P1: humerus_l (-0.00460001 -0.07517575 0.004973286)
      PathPoint P2: humerus_l (-0.01427764 -0.08310229 0.005928425)
      PathPoint P3: humerus_l (-0.01747789 -0.1242609 0.006680464)
      PathPoint P4: humerus_l (-0.009567809 -0.1468768 0.006631048)
      PathPoint P5: ulna_l (-0.01413106 0.006749365 0.000503296)
      PathWrap: wrap_object=TRI_l method=hybrid
    Schutte1993Muscle_Deprecated ANC_l: max_isometric_force=350 optimal_fiber_length=0.01627524
        tendon_slack_length=0.01085014 pennation_angle_at_optimal=0
      PathPoint P1: humerus_l (-0.004084025 -0.1556706 -0.005373998)
      PathPoint P2: ulna_l (-0.01633783 -0.0008001179 -0.003871536)
      PathWrap: wrap_object=ANC_l method=hybrid
    Schutte1993Muscle_Deprecated SUP_l: max_isometric_force=476 optimal_fiber_length=0.0212934
        tendon_slack_length=0.01806712 pennation_angle_at_optimal=0
      PathPoint P1: radius_l (0.006426732 -0.03933469 -0.0004839434)
      PathPoint P2: radius_l (0.00774951 -0.03335965 0.0006904175)
      PathPoint P3: ulna_l (-0.008775465 -0.0218354 -0.01298896)
      PathWrap: wrap_object=SUP_l method=hybrid
    Schutte1993Muscle_Deprecated BIClong_l: max_isometric_force=624.3 optimal_fiber_length=0.06621505
        tendon_slack_length=0.1558371 pennation_angle_at_optimal=0
      PathPoint P1: scapula_l (-0.01769406 -0.01333145 0.007393774)
      PathPoint P2: scapula_l (-0.01186404 -0.007416443 0.002611902)
      PathPoint P3: humerus_l (0.01169766 0.009842284 -0.005642986)
      PathPoint P4: humerus_l (0.01305352 -0.002805026 -0.006592627)
      PathPoint P5: humerus_l (0.007383087 -0.0155182 -0.0007465519)
      PathPoint P6: humerus_l (0.005862568 -0.04246512 0.0009057332)
      PathPoint P7: humerus_l (0.009348258 -0.06655758 -0.0001317451)
      PathPoint P8: humerus_l (0.01251557 -0.09628205 0.003458254)
      PathPoint P9: bicpt2_l (0 0 0)
      ConditionalPathPoint P10: bicpt_l (0 0 0) socket_coordinate=/jointset/radioulnar_l/pro_sup_l
          range=(-0.6387905 1.570796) [radians]
      PathPoint P11: radius_l (-0.001290509 -0.02419703 0.001290509)
      PathWrap: wrap_object=Elbow_BIC_BRD_l method=hybrid
      PathWrap pathwrap_0: wrap_object=BIClong_l method=hybrid range=(2 3)
    Schutte1993Muscle_Deprecated BICshort_l: max_isometric_force=435.56 optimal_fiber_length=0.07730207
        tendon_slack_length=0.1125298 pennation_angle_at_optimal=0
      PathPoint P1: scapula_l (0.007184147 -0.02227197 0.01487254)
      PathPoint P2: scapula_l (0.0005269185 -0.03798305 0.009025489)
      PathPoint P3: humerus_l (0.006131535 -0.04158683 0.006043698)
      PathPoint P4: humerus_l (0.009348258 -0.06655758 0.005922928)
      PathPoint P5: humerus_l (0.01251557 -0.09628205 0.003458254)
      PathPoint P6: bicpt2_l (0 0 0)
      ConditionalPathPoint P7: bicpt_l (0 0 0) socket_coordinate=/jointset/radioulnar_l/pro_sup_l
          range=(-0.6387905 1.570796)
      PathPoint P8: radius_l (-0.001290509 -0.02419703 0.001290509)
      PathWrap: wrap_object=Elbow_BIC_BRD_l method=hybrid
    Schutte1993Muscle_Deprecated BRA_l: max_isometric_force=987.26 optimal_fiber_length=0.04848342
        tendon_slack_length=0.03023151 pennation_angle_at_optimal=0
      PathPoint P1: humerus_l (0.003732719 -0.09545866 0.001976155)
      ConditionalPathPoint P2: humerus_l (0.0103967 -0.1567685 0.006065657)
          socket_coordinate=/jointset/elbow_l/elbow_flexion_l range=(0 0.8131489)
      ConditionalPathPoint P3: ulna_l (0.003213366 -0.009440082 -0.0008259285)
          socket_coordinate=/jointset/elbow_l/elbow_flexion_l range=(0 0.8131489)
      PathPoint P4: ulna_l (-0.002064805 -0.01542158 -0.0005807278)
    Schutte1993Muscle_Deprecated BRD_l: max_isometric_force=261.33 optimal_fiber_length=0.1068238
        tendon_slack_length=0.08231496 pennation_angle_at_optimal=0
      PathPoint P1: humerus_l (-0.005379496 -0.1095826 -0.001224116)
      PathPoint P2: radius_l (0.02308075 -0.08221831 -0.01493763)
      PathPoint P3: radius_l (0.02703615 -0.1426012 -0.01445369)
      PathWrap: wrap_object=Elbow_BIC_BRD_l method=hybrid
    Schutte1993Muscle_Deprecated ECRL_l: max_isometric_force=304.89 optimal_fiber_length=0.05122701
        tendon_slack_length=0.1416648 pennation_angle_at_optimal=0
      PathPoint P1: humerus_l (-0.004007173 -0.1432154 -0.004995256)
      PathPoint P2: radius_l (0.02061588 -0.08687059 -0.01793161)
      PathPoint P3: radius_l (0.02737814 -0.152822 -0.02335821)
      PathPoint P4: secondmc_l (0.001311263 0.008636442 -0.0004212781)
      PathWrap: wrap_object=Elbow_PT_ECRL_l method=hybrid
      PathWrap pathwrap_0: wrap_object=ECRL_l method=hybrid
    Schutte1993Muscle_Deprecated ECRB_l: max_isometric_force=100.52 optimal_fiber_length=0.03816558
        tendon_slack_length=0.1450292 pennation_angle_at_optimal=0.1553343
      PathPoint P1: humerus_l (0.007405047 -0.1594528 -0.009320791)
      PathPoint P2: radius_l (0.01874463 -0.08443798 -0.01538931)
      PathPoint P3: radius_l (0.02290007 -0.1471502 -0.02540366)
      PathPoint P4: thirdmc_l (0.002155695 0.01329652 -0.0005341624)
      PathWrap: wrap_object=ECRB_l method=hybrid
    Schutte1993Muscle_Deprecated ECU_l: max_isometric_force=93.17 optimal_fiber_length=0.04030199
        tendon_slack_length=0.1480547 pennation_angle_at_optimal=0.06108652
      PathPoint P1: humerus_l (0.0004556154 -0.1589422 -0.01031987)
      PathPoint P2: ulna_l (-0.008975492 -0.0206546 -0.01901564)
      PathPoint P3: ulna_l (-0.01100159 -0.03502441 -0.01850589)
      PathPoint P4: ulna_l (-0.01156941 -0.0617702 -0.02115143)
      PathPoint P5: radius_l (-0.00916906 -0.1464469 -0.02246131)
      PathPoint P6: fifthmc_l (-0.000307131 0.01040728 -0.00148026)
      PathWrap: wrap_object=ECU_l method=hybrid
    Schutte1993Muscle_Deprecated FCR_l: max_isometric_force=73.96 optimal_fiber_length=0.0400581
        tendon_slack_length=0.1556397 pennation_angle_at_optimal=0.05410521
      PathPoint P1: humerus_l (0.004160887 -0.1526351 0.02033781)
      PathPoint P2: radius_l (0.01361487 -0.1415881 -0.0008194705)
      PathPoint P3: secondmc_l (-0.001816797 0.01010042 0.004850094)
      PathWrap: wrap_object=Elbow_PT_ECRL_l method=hybrid
      PathWrap pathwrap_0: wrap_object=FCR_l method=hybrid
    Schutte1993Muscle_Deprecated FCU_l: max_isometric_force=128.93 optimal_fiber_length=0.03081402
        tendon_slack_length=0.1604266 pennation_angle_at_optimal=0.2111848
      PathPoint P1: humerus_l (0.001202167 -0.1522728 0.02129843)
      PathPoint P2: FCUpt_l (0.003542844 0 0)
      PathPoint P3: radius_l (0.00698166 -0.1440659 -0.006252516)
      PathPoint P4: fifthmc_l (0.000775391 0.008574538 0.001661539)
      PathWrap: wrap_object=FCU_l method=hybrid
      PathWrap pathwrap_0: wrap_object=Elbow_PT_ECRL_l method=hybrid
    Schutte1993Muscle_Deprecated PL_l: max_isometric_force=26.72 optimal_fiber_length=0.04037647
        tendon_slack_length=0.1704925 pennation_angle_at_optimal=0.06981317
      PathPoint P1: humerus_l (0.002508613 -0.1510596 0.02121608)
      PathPoint P2: radius_l (0.01633138 -0.1543126 0.00178091)
      PathPoint P3: capitate_l (0.005429448 -0.01123787 0.01038527)
      PathPoint P4: thirdmc_l (0.0008536958 0.003948899 0.001168456)
      PathWrap: wrap_object=PL_l method=hybrid
      PathWrap pathwrap_0: wrap_object=Elbow_PT_ECRL_l method=hybrid
    Schutte1993Muscle_Deprecated PT_l: max_isometric_force=566.22 optimal_fiber_length=0.03032508
        tendon_slack_length=0.06040361 pennation_angle_at_optimal=0.1745329
      PathPoint P1: humerus_l (0.001976155 -0.1514494 0.02003591)
      PathPoint P2: ulna_l (0.005458846 -0.02176443 0.009240045)
      PathPoint P3: ptpt_l (0.002994309 -0.0001677797 0.001380996)
      ConditionalPathPoint P4: radius_l (0.015228 -0.06026676 -0.006065395)
          socket_coordinate=/jointset/radioulnar_l/pro_sup_l range=(-1.570796 0.5096361)
      PathPoint P5: radius_l (0.01638946 -0.07020366 -0.01277603)
      PathWrap: wrap_object=Elbow_PT_ECRL_l method=hybrid
    Schutte1993Muscle_Deprecated PQ_l: max_isometric_force=75.48 optimal_fiber_length=0.01819617
        tendon_slack_length=0.003226271 pennation_angle_at_optimal=0.1745329
      PathPoint P1: radius_l (0.0209385 -0.129038 -0.01265989)
      PathPoint P2: ulna_l (0.001245335 -0.1353227 -0.02343564)
      PathWrap: wrap_object=PQ2_l method=hybrid
      PathWrap pathwrap_0: wrap_object=PQ1_l method=hybrid
    Schutte1993Muscle_Deprecated FDSL_l: max_isometric_force=16.55 optimal_fiber_length=0.03245063
        tendon_slack_length=0.213166 pennation_angle_at_optimal=0.08726646
      PathPoint P1: humerus_l (0.002311 -0.1514933 0.02121059)
      PathPoint P2: radius_l (0.008885155 -0.1207787 -0.001322766)
      PathPoint P3: capitate_l (-0.001391416 -0.008247801 0.008147161)
      PathPoint P4: fourthmc_l (-0.001324263 0.003810654 0.005463704)
      PathPoint P5: fifthmc_l (-0.0001611069 -0.009908807 0.003811457)
      PathPoint P6: 5proxph_l (-0.00214928 -0.023742 0.002774771)
      PathPoint P7: 5midph_l (-0.001733689 -0.01322281 0.002333828)
      PathWrap: wrap_object=FDS_l method=hybrid
      PathWrap pathwrap_0: wrap_object=Elbow_PT_ECRL_l method=hybrid
    Schutte1993Muscle_Deprecated FDSR_l: max_isometric_force=57.9 optimal_fiber_length=0.04692689
        tendon_slack_length=0.2091307 pennation_angle_at_optimal=0.06981317
      PathPoint P1: humerus_l (0.002629383 -0.1530413 0.02048053)
      PathPoint P2: radius_l (0.01013696 -0.1204432 -0.001722831)
      PathPoint P3: capitate_l (-0.0004855261 -0.007957697 0.008046522)
      PathPoint P4: thirdmc_l (-0.004359052 0.002594429 0.005174563)
      PathPoint P5: fourthmc_l (-0.001306248 -0.01051303 0.003454828)
      PathPoint P6: 4proxph_l (-0.001233679 -0.02831019 0.0007316092)
      PathPoint P7: 4midph_l (-1.526005e-5 -0.01908138 -0.0002212507)
      PathWrap: wrap_object=FDS_l method=hybrid
      PathWrap pathwrap_0: wrap_object=Elbow_PT_ECRL_l method=hybrid
    Schutte1993Muscle_Deprecated FDSM_l: max_isometric_force=91.03 optimal_fiber_length=0.04721832
        tendon_slack_length=0.1859733 pennation_angle_at_optimal=0.1221731
      PathPoint P1: ulna_l (-0.004316753 -0.01750574 0.001232429)
      PathPoint P2: radius_l (0.01225338 -0.1207013 -0.002735881)
      PathPoint P3: capitate_l (0.004026195 -0.008153085 0.008283333)
      PathPoint P4: thirdmc_l (0.0006104629 0.003047506 0.004540269)
      PathPoint P5: thirdmc_l (0.001254291 -0.01181807 0.0008727416)
      PathPoint P6: 3proxph_l (0.001692102 -0.02892014 -0.002800024)
      PathPoint P7: 3midph_l (0.001010473 -0.01807765 -0.000436777)
      PathWrap: wrap_object=FDS_l method=hybrid
    Schutte1993Muscle_Deprecated FDSI_l: max_isometric_force=61.24 optimal_fiber_length=0.05177484
        tendon_slack_length=0.1705159 pennation_angle_at_optimal=0.1047198
      PathPoint P1: ulna_l (-0.004361916 -0.01818972 0.000883997)
      PathPoint P2: radius_l (0.0138407 -0.1201657 -0.003561799)
      PathPoint P3: capitate_l (0.005263679 -0.008087945 0.008212291)
      PathPoint P4: secondmc_l (-0.002143311 -0.0001316428 0.002522504)
      PathPoint P5: secondmc_l (0.001600909 -0.01161708 0.003049075)
      PathPoint P6: 2proxph_l (0.002606909 -0.02055613 -0.002710699)
      PathPoint P7: 2midph_l (0.001360389 -0.01245833 0.0001730299)
      PathWrap: wrap_object=FDS_l method=hybrid
      PathWrap pathwrap_0: wrap_object=2ndmcp_l method=hybrid
    Schutte1993Muscle_Deprecated FDPL_l: max_isometric_force=79.65 optimal_fiber_length=0.04718439
        tendon_slack_length=0.1775872 pennation_angle_at_optimal=0.1396263
      PathPoint P1: ulna_l (-0.0040522 -0.02073847 -0.001638952)
      PathPoint P2: radius_l (0.009091639 -0.1194753 -0.005555641)
      PathPoint P3: capitate_l (-0.0005210473 -0.006080755 0.007034057)
      PathPoint P4: fourthmc_l (-0.003089954 0.00400883 0.002788161)
      PathPoint P5: fifthmc_l (-0.000931485 -0.00945564 0.003554686)
      PathPoint P6: 5proxph_l (-0.003260531 -0.02305661 0.003979181)
      PathPoint P7: 5distph_l (-0.0001453698 -0.001967007 0.0007495589)
      PathWrap: wrap_object=FDP_l method=hybrid
    Schutte1993Muscle_Deprecated FDPR_l: max_isometric_force=64.08 optimal_fiber_length=0.05113138
        tendon_slack_length=0.1806898 pennation_angle_at_optimal=0.1221731
      PathPoint P1: ulna_l (-0.003239177 -0.02177088 -0.001761547)
      PathPoint P2: radius_l (0.01019502 -0.1202044 -0.005181387)
      PathPoint P3: capitate_l (0.0006275892 -0.006968917 0.007010329)
      PathPoint P4: thirdmc_l (-0.004959969 0.002255815 0.003834436)
      PathPoint P5: fourthmc_l (-0.00130173 -0.01034635 0.00274313)
      PathPoint P6: 4proxph_l (-0.002180468 -0.02870469 0.0005379494)
      PathPoint P7: 4distph_l (6.378996e-5 -0.004210337 0.0004210297)
      PathWrap: wrap_object=FDP_l method=hybrid
    Schutte1993Muscle_Deprecated FDPM_l: max_isometric_force=81.65 optimal_fiber_length=0.05273761
        tendon_slack_length=0.1850553 pennation_angle_at_optimal=0.1047198
      PathPoint P1: ulna_l (-0.00336823 -0.02146761 -0.001355035)
      PathPoint P2: radius_l (0.01229855 -0.1203012 -0.00506525)
      PathPoint P3: capitate_l (0.001983495 -0.007578767 0.006773506)
      PathPoint P4: thirdmc_l (-0.0006104629 0.002904452 0.003996607)
      PathPoint P5: thirdmc_l (0.0001621592 -0.01119331 0.001445054)
      PathPoint P6: 3proxph_l (0.0006848909 -0.02909472 -0.001974113)
      PathPoint P7: 3distph_l (0.00017271 -0.003792249 0.00169713)
      PathWrap: wrap_object=FDP_l method=hybrid
    Schutte1993Muscle_Deprecated FDPI_l: max_isometric_force=68.27 optimal_fiber_length=0.04658595
        tendon_slack_length=0.1825497 pennation_angle_at_optimal=0.1221731
      PathPoint P1: ulna_l (-0.004174795 -0.02049327 -0.00180671)
      PathPoint P2: radius_l (0.01342129 -0.1197592 -0.005904084)
      PathPoint P3: capitate_l (0.005305113 -0.006915613 0.007176142)
      PathPoint P4: secondmc_l (-0.002274965 0.003491443 0.001306004)
      PathPoint P5: secondmc_l (0.002211757 -0.01191199 0.002627797)
      PathPoint P6: 2proxph_l (0.003547108 -0.0217039 -0.001868179)
      PathPoint P7: 2distph_l (0.0003993053 -0.003993032 0.002612823)
      PathWrap: wrap_object=FDP_l method=hybrid
      PathWrap pathwrap_0: wrap_object=2ndmcp_l method=hybrid
    Schutte1993Muscle_Deprecated EDCL_l: max_isometric_force=13.11 optimal_fiber_length=0.04116651
        tendon_slack_length=0.1877826 pennation_angle_at_optimal=0.03490659
      PathPoint P1: humerus_l (-0.0002195717 -0.1582616 -0.01026496)
      PathPoint P2: EDCpt_l (0.0008389305 -0.02509028 -0.009066839)
      PathPoint P3: radius_l (0.00640738 -0.1439175 -0.0233453)
      PathPoint P4: fifthmc_l (-0.002406699 -0.009641933 -0.002250627)
      PathPoint P5: 5proxph_l (-0.004764361 -0.02197197 0.0005922201)
      PathPoint P6: 5distph_l (-0.0006450791 0.0003089096 -0.0005224193)
      PathWrap: wrap_object=EDCL_l method=hybrid range=(3 4)
    Schutte1993Muscle_Deprecated EDCR_l: max_isometric_force=34.04 optimal_fiber_length=0.0264211
        tendon_slack_length=0.1380143 pennation_angle_at_optimal=0.05235988
      PathPoint P1: humerus_l (-0.0008563275 -0.1588379 -0.009781904)
      PathPoint P2: EDCpt_l (0.00167785 -0.02575496 -0.01001546)
      PathPoint P3: radius_l (0.005691141 -0.1443176 -0.02764269)
      PathPoint P4: fourthmc_l (-0.001522473 -0.01049501 -0.002310703)
      PathPoint P5: 4proxph_l (-0.003916236 -0.02774356 -0.002962277)
      PathPoint P6: 4distph_l (-0.001090859 -0.002392238 -0.001537409)
      PathWrap: wrap_object=EDCR_l method=hybrid range=(3 4)
    Schutte1993Muscle_Deprecated EDCM_l: max_isometric_force=35.32 optimal_fiber_length=0.05489075
        tendon_slack_length=0.2539833 pennation_angle_at_optimal=0.05235988
      PathPoint P1: humerus_l (0.0002799518 -0.1591014 -0.01069862)
      PathPoint P2: EDCpt_l (0.002039231 -0.02547748 -0.009860585)
      PathPoint P3: radius_l (0.009291666 -0.1440401 -0.0272491)
      PathPoint P4: thirdmc_l (0.000624759 -0.01116944 -0.003643661)
      PathPoint P5: 3proxph_l (0.001201932 -0.02846354 -0.006734829)
      PathPoint P6: 3distph_l (0.0005782299 -0.008342948 -0.0015094)
      PathWrap: wrap_object=EDCM_l method=hybrid range=(3 4)
    Schutte1993Muscle_Deprecated EDCI_l: max_isometric_force=18.26 optimal_fiber_length=0.04374373
        tendon_slack_length=0.2012212 pennation_angle_at_optimal=0.05235988
      PathPoint P1: humerus_l (0.0003568143 -0.1586294 -0.01025947)
      PathPoint P2: EDCpt_l (0.001471344 -0.02528388 -0.009570189)
      PathPoint P3: radius_l (0.009891757 -0.143982 -0.02707487)
      PathPoint P4: secondmc_l (0.002496133 -0.01398682 -0.006809116)
      PathPoint P5: 2proxph_l (0.001172189 -0.006721807 -0.006233387)
      PathPoint P6: 2proxph_l (0.004707098 -0.02558678 -0.008541146)
      PathPoint P7: 2midph_l (0.0007338995 -0.005614596 -0.003466618)
      PathPoint P8: 2midph_l (0.001551329 -0.01168864 -0.002165889)
      PathPoint P9: 2distph_l (0.0002170226 -0.003211754 -0.001979151)
      PathWrap: wrap_object=EDCI_l method=hybrid range=(3 4)
      PathWrap pathwrap_0: wrap_object=Secondpm_l method=hybrid range=(6 7)
      PathWrap pathwrap_1: wrap_object=Secondmd_l method=hybrid range=(8 9)
    Schutte1993Muscle_Deprecated EDM_l: max_isometric_force=25.25 optimal_fiber_length=0.04265455
        tendon_slack_length=0.203478 pennation_angle_at_optimal=0.05235988
      PathPoint P1: humerus_l (0.0004885388 -0.1587446 -0.01013871)
      PathPoint P2: ulna_l (-0.006304137 -0.02521009 -0.0199061)
      PathPoint P3: ulna_l (-0.00487167 -0.05334317 -0.02352598)
      PathPoint P4: radius_l (0.00292946 -0.146092 -0.02373245)
      PathPoint P5: fifthmc_l (0.0006595764 0.01226517 -0.003997771)
      PathPoint P6: fifthmc_l (-0.002703771 -0.009304614 -0.001591039)
      PathPoint P7: 5proxph_l (-0.003593241 -0.02153946 -9.982002e-5)
      PathPoint P8: 5distph_l (-0.001026659 -0.001517288 -0.0002816496)
      PathWrap: wrap_object=EDM_l method=hybrid range=(4 5)
    Schutte1993Muscle_Deprecated EIP_l: max_isometric_force=21.7 optimal_fiber_length=0.03603656
        tendon_slack_length=0.1137997 pennation_angle_at_optimal=0.1047198
      PathPoint P1: ulna_l (-0.002542301 -0.1074478 -0.02375826)
      PathPoint P2: ulna_l (0.001103387 -0.1127195 -0.02612635)
      PathPoint P3: radius_l (0.006942934 -0.1470083 -0.02364211)
      PathPoint P4: secondmc_l (-0.005692671 0.008046653 -0.003586239)
      PathPoint P5: secondmc_l (0.002322362 -0.01370242 -0.006766967)
      PathPoint P6: 2proxph_l (0.00104398 -0.006306647 -0.005781598)
      PathPoint P7: 2proxph_l (0.004359098 -0.02523268 -0.008626616)
      PathPoint P8: 2midph_l (0.0006861595 -0.005363996 -0.003562088)
      PathPoint P9: 2midph_l (0.001754189 -0.01218983 -0.002249419)
      PathPoint P10: 2distph_l (0.001016957 -0.007227845 -0.001510471)
      PathWrap: wrap_object=Extensor_ellipse_l method=hybrid
      PathWrap pathwrap_0: wrap_object=Secondpm_l method=hybrid range=(7 8)
      PathWrap pathwrap_1: wrap_object=Secondmd_l method=hybrid range=(9 10)
    Schutte1993Muscle_Deprecated EPL_l: max_isometric_force=39.46 optimal_fiber_length=0.03323691
        tendon_slack_length=0.1357174 pennation_angle_at_optimal=0.1047198
      PathPoint P1: ulna_l (-0.009111003 -0.06262837 -0.0190479)
      PathPoint P2: radius_l (0.0008001179 -0.08819335 -0.01464727)
      PathPoint P3: radius_l (0.01743476 -0.14113 -0.02470034)
      PathPoint P4: radius_l (0.0218225 -0.1468212 -0.02972686)
      PathPoint P5: radius_l (0.02732007 -0.1533834 -0.02692646)
      PathPoint P6: capitate_l (0.01437595 8.290108e-5 -0.003599897)
      PathPoint P7: trapezium_l (0.00479 -0.002723626 -0.005873518)
      PathPoint P8: firstmc_l (0.003137963 -0.002056912 -0.003788524)
      PathPoint P9: firstmc_l (0.01035625 -0.01157604 0.0025496)
      PathPoint P10: proximal_thumb_l (0.007792535 -0.002459355 -0.001059844)
      PathPoint P11: proximal_thumb_l (0.01305096 -0.01800367 0.007052002)
      PathPoint P12: distal_thumb_l (0.002388231 -0.003140329 0.002040773)
      PathWrap: wrap_object=MPthumb_l method=hybrid
    Schutte1993Muscle_Deprecated EPB_l: max_isometric_force=14.2 optimal_fiber_length=0.04075699
        tendon_slack_length=0.06973972 pennation_angle_at_optimal=0.1256637
      PathPoint P1: radius_l (0.01241468 -0.09482011 -0.01364067)
      PathPoint P2: radius_l (0.01468597 -0.102318 -0.01719602)
      PathPoint P3: radius_l (0.02471969 -0.1272571 -0.02473905)
      PathPoint P4: radius_l (0.03377907 -0.152351 -0.01741542)
      PathPoint P5: capitate_l (0.01849099 0.001515751 0.001936137)
      PathPoint P6: firstmc1_l (0.006902581 -0.001612029 0.001937309)
      PathPoint P7: firstmc_l (0.01039452 -0.01101639 0.005457959)
      PathPoint P8: proximal_thumb_l (0.006297893 -0.004198576 0.003784163)
      PathWrap: wrap_object=MPthumb_l method=hybrid
    Schutte1993Muscle_Deprecated FPL_l: max_isometric_force=77.2 optimal_fiber_length=0.03554807
        tendon_slack_length=0.1248047 pennation_angle_at_optimal=0.1221731
      PathPoint P1: radius_l (0.006265421 -0.06102816 -0.01141455)
      PathPoint P2: radius_l (0.01069831 -0.08727064 -0.01235662)
      PathPoint P3: radius_l (0.0120598 -0.115707 -0.01282765)
      PathPoint P4: radius_l (0.02451965 -0.1495119 -0.01019502)
      PathPoint P5: FPLpt_l (0.01353601 0.006387769 0.01120397)
      PathPoint P6: FPLpt2_l (0.009009533 -0.01598393 0.01512933)
      PathPoint P7: firstmc_l (-0.002908369 -0.007768392 0.004496481)
      PathPoint P8: firstmc_l (0.000994957 -0.01098768 0.004573013)
      PathPoint P9: proximal_thumb_l (-0.00305722 -0.01251425 0.003451262)
      PathPoint P10: proximal_thumb_l (0.004008357 -0.01767758 0.007568327)
      PathPoint P11: distal_thumb_l (0.001064373 -0.0049568 0.001812071)
      PathWrap: wrap_object=FPL_l method=hybrid
      PathWrap pathwrap_0: wrap_object=IPthumb_l method=hybrid
      PathWrap pathwrap_1: wrap_object=MPthumb_l method=hybrid
    Schutte1993Muscle_Deprecated APL_l: max_isometric_force=59.53 optimal_fiber_length=0.04588735
        tendon_slack_length=0.08334376 pennation_angle_at_optimal=0.1308997
      PathPoint P1: radius_l (0.00744624 -0.06115075 -0.01084673)
      PathPoint P2: radius_l (0.01955121 -0.09014202 -0.02262906)
      PathPoint P3: radius_l (0.02576501 -0.1037053 -0.02193865)
      PathPoint P4: radius_l (0.02837183 -0.1151456 -0.02022226)
      PathPoint P5: radius_l (0.03552124 -0.1489505 -0.01527962)
      PathPoint P6: APLpt_l (0.02451544 0.004591654 0.005395576)
      PathPoint P7: firstmc1_l (0.005060948 0.003166671 0.002960984)
      PathPoint P8: firstmc_l (0.003008817 0.00154506 0.002817474)
      PathPoint P9: firstmc_l (0.003955941 -0.00280312 0.002889234)
      PathWrap: wrap_object=APL_l method=hybrid range=(5 6)
  MarkerSet:
    Marker Wrist_L: lunate_l (0.006378382 0.00292677 -0.002264792)
    Marker Thumb_MCP_L: firstmc1_l (0.009974076 -0.001252458 0.001446541)
    Marker Thumb_PIP_L: proximal_thumb_l (0.004953146 -0.004866147 -0.0006982815)
    Marker Thumb_DIP_L: distal_thumb_l (0.001553736 -0.006469772 -0.001146205)
    Marker Thumb_TIP_L: distal_thumb_l (0.002974872 -0.01208653 0.004370283)
    Marker Index_MCP_L: 2proxph_l (0.0005384164 -0.002545248 0.002868939)
    Marker Index_PIP_L: 2midph_l (0.0005984961 -0.001460031 -0.0009902314)
    Marker Index_DIP_L: 2distph_l (-0.000719788 -0.001582877 -0.0002698591)
    Marker Little_PIP_L: 5midph_l (0.001763212 0.004101232 -0.00244536)
    Marker Ring_PIP_L: 4midph_l (-0.0007374691 0.005137283 -0.002618438)
    Marker Middle_PIP_L: 3midph_l (0.001705472 0.001259757 -0.00189332)
    Marker Middle_MCP_L: 3proxph_l (0.0007320611 -0.0006636585 0.002344428)
    Marker Ring_MCP_L: 4proxph_l (4.342659e-5 0.002618408 -0.0003779656)
    Marker Little_MCP_L: 5proxph_l (-0.00200397 0.003542617 -0.005464176)
    Marker Middle_DIP_L: 3distph_l (0.0005294787 0.001283089 -0.0003034771)
    Marker Ring_DIP_L: 4distph_l (0.000668762 0.005102205 0.0005257563)
    Marker Little_DIP_L: 5distph_l (0.003255171 0.00455115 0.001233717)
    Marker Index_TIP_L: 2distph_l (-0.0004123439 -0.01257706 -9.409205e-5)
    Marker Middle_TIP_L: 3distph_l (-0.000261636 -0.0124175 0.00246474)
    Marker Ring_TIP_L: 4distph_l (0.001614665 -0.007063897 0.005007378)
    Marker Little_TIP_L: 5distph_l (0.003075776 -0.00420186 0.006066066)
    Marker Elbow_L: ulna_l (-0.0008329573 -0.00313791 -2.359131e-5)
    Marker Shoulder_L: humphant1_l (0 0 0)
    Marker Point_E1_L: ulna_l (-0.0004444063 -0.005506822 0.01983176)
    Marker Point_W1_L: lunate_l (-0.02296566 -0.01142028 -0.0005442504)
