# OpenSim document version 40000
InverseKinematicsTool:
  results_directory: ./
  input_directory: ./
  constraint_weight: Inf
  accuracy: 1e-5
  marker_file: /Users/jgoodman/Documents/GitHub/Mirror-Analysis/MirrorData/KinematicsProcessing/Template Files/Setup XML/../../Zara_ControlandActive1.trc
  time_range: 192.31 944.42
  report_errors: true
  output_motion_file: /Users/jgoodman/Dropbox/Mirror Local/KinematicsCode/Zara_ControlandActive1.mot
  report_marker_locations: false
  IKTaskSet:
    IKMarkerTask Wrist_L: apply=true weight=10
    IKMarkerTask Thumb_MCP_L: apply=true weight=1
    IKMarkerTask Thumb_PIP_L: apply=true weight=1
    IKMarkerTask Thumb_DIP_L: apply=true weight=1
    IKMarkerTask Thumb_TIP_L: apply=true weight=10
    IKMarkerTask Index_MCP_L: apply=true weight=1
    IKMarkerTask Index_PIP_L: apply=true weight=1
    IKMarkerTask Index_DIP_L: apply=true weight=1
    IKMarkerTask Little_PIP_L: apply=true weight=1
    IKMarkerTask Ring_PIP_L: apply=true weight=1
    IKMarkerTask Middle_PIP_L: apply=true weight=1
    IKMarkerTask Middle_MCP_L: apply=true weight=1
    IKMarkerTask Ring_MCP_L: apply=true weight=1
    IKMarkerTask Little_MCP_L: apply=true weight=1
    IKMarkerTask Middle_DIP_L: apply=true weight=1
    IKMarkerTask Ring_DIP_L: apply=true weight=1
    IKMarkerTask Little_DIP_L: apply=true weight=1
    IKMarkerTask Index_TIP_L: apply=true weight=10
    IKMarkerTask Middle_TIP_L: apply=true weight=10
    IKMarkerTask Ring_TIP_L: apply=true weight=10
    IKMarkerTask Little_TIP_L: apply=true weight=10
