# OpenSim document version 40000
ScaleTool Zara61-scaled:
  mass: 0 [kg]
  height: -1
  age: -1
  ModelScaler:
    apply: true
    scaling_order: measurements
    marker_file: /Users/jgoodman/Documents/GitHub/Mirror-Analysis/MirrorData/KinematicsProcessing/Template Files/Setup XML/../OpenSim TRC/ScaleMarkersRalphie.trc
    time_range: 13.7435 14.7335
    preserve_mass_distribution: false
    MeasurementSet:
      Measurement CARP: apply=true
        MarkerPair: markers=(Wrist_L Thumb_MCP_L)
        BodyScale ulna_l: axes=(X Y Z)
        BodyScale radius_l: axes=(X Y Z)
        BodyScale lunate_l: axes=(X Y Z)
        BodyScale scaphoid_l: axes=(X Y Z)
        BodyScale pisiform_l: axes=(X Y Z)
        BodyScale triquetrum_l: axes=(X Y Z)
        BodyScale capitate_l: axes=(X Y Z)
        BodyScale trapezium_l: axes=(X Y Z)
        BodyScale trapezoid_l: axes=(X Y Z)
        BodyScale hamate_l: axes=(X Y Z)
      Measurement CMC1: apply=true
        MarkerPair: markers=(Thumb_MCP_L Thumb_PIP_L)
        BodyScale firstmc1_l: axes=(X Y Z)
        BodyScale firstmc_l: axes=(X Y Z)
      Measurement MCP1: apply=true
        MarkerPair: markers=(Thumb_PIP_L Thumb_DIP_L)
        BodyScale proximal_thumb_l: axes=(X Y Z)
      Measurement IP1: apply=true
        MarkerPair: markers=(Thumb_DIP_L Thumb_TIP_L)
        BodyScale distal_thumb_l: axes=(X Y Z)
      Measurement CMC2: apply=true
        MarkerPair: markers=(Thumb_MCP_L Index_MCP_L)
        BodyScale secondmc_l: axes=(X Y Z)
      Measurement MCP2: apply=true
        MarkerPair: markers=(Index_MCP_L Index_PIP_L)
        BodyScale 2proxph_l: axes=(X Y Z)
      Measurement PIP2: apply=true
        MarkerPair: markers=(Index_PIP_L Index_DIP_L)
        BodyScale 2midph_l: axes=(X Y Z)
      Measurement DIP2: apply=true
        MarkerPair: markers=(Index_DIP_L Index_TIP_L)
        BodyScale 2distph_l: axes=(X Y Z)
      Measurement CMC3: apply=true
        MarkerPair: markers=(Wrist_L Middle_MCP_L)
        BodyScale thirdmc_l: axes=(X Y Z)
      Measurement MCP3: apply=true
        MarkerPair: markers=(Middle_MCP_L Middle_PIP_L)
        BodyScale 3proxph_l: axes=(X Y Z)
      Measurement PIP3: apply=true
        MarkerPair: markers=(Middle_PIP_L Middle_DIP_L)
        BodyScale 3midph_l: axes=(X Y Z)
      Measurement DIP3: apply=true
        MarkerPair: markers=(Middle_DIP_L Middle_TIP_L)
        BodyScale 3distph_l: axes=(X Y Z)
      Measurement CMC4: apply=true
        MarkerPair: markers=(Wrist_L Ring_MCP_L)
        BodyScale fourthmc_l: axes=(X Y Z)
      Measurement MCP4: apply=true
        MarkerPair: markers=(Ring_MCP_L Ring_PIP_L)
        BodyScale 4proxph_l: axes=(X Y Z)
      Measurement PIP4: apply=true
        MarkerPair: markers=(Ring_PIP_L Ring_DIP_L)
        BodyScale 4midph_l: axes=(X Y Z)
      Measurement DIP4: apply=true
        MarkerPair: markers=(Ring_DIP_L Ring_TIP_L)
        BodyScale 4distph_l: axes=(X Y Z)
      Measurement CMC5: apply=true
        MarkerPair: markers=(Wrist_L Little_MCP_L)
        BodyScale fifthmc_l: axes=(X Y Z)
      Measurement MCP5: apply=true
        MarkerPair: markers=(Little_MCP_L Little_PIP_L)
        BodyScale 5proxph_l: axes=(X Y Z)
      Measurement PIP5: apply=true
        MarkerPair: markers=(Little_PIP_L Little_DIP_L)
        BodyScale 5midph_l: axes=(X Y Z)
      Measurement DIP5: apply=true
        MarkerPair: markers=(Little_DIP_L Little_TIP_L)
        BodyScale 5distph_l: axes=(X Y Z)
  MarkerPlacer:
    apply: true
    marker_file: /Users/jgoodman/Documents/GitHub/Mirror-Analysis/MirrorData/KinematicsProcessing/Template Files/Setup XML/../OpenSim TRC/ScaleMarkersRalphie.trc
    time_range: 215.06 14.7335
    max_marker_movement: -1
    IKTaskSet:
      IKMarkerTask Wrist_L: apply=true weight=10
      IKMarkerTask Thumb_MCP_L: apply=true weight=1
      IKMarkerTask Thumb_PIP_L: apply=true weight=1
      IKMarkerTask Thumb_DIP_L: apply=true weight=1
      IKMarkerTask Thumb_TIP_L: apply=true weight=10
      IKMarkerTask Index_MCP_L: apply=true weight=1
      IKMarkerTask Index_PIP_L: apply=true weight=1
      IKMarkerTask Index_DIP_L: apply=true weight=1
      IKMarkerTask Little_PIP_L: apply=true weight=1
      IKMarkerTask Ring_PIP_L: apply=true weight=1
      IKMarkerTask Middle_PIP_L: apply=true weight=1
      IKMarkerTask Middle_MCP_L: apply=true weight=1
      IKMarkerTask Ring_MCP_L: apply=true weight=1
      IKMarkerTask Little_MCP_L: apply=true weight=1
      IKMarkerTask Middle_DIP_L: apply=true weight=1
      IKMarkerTask Ring_DIP_L: apply=true weight=1
      IKMarkerTask Little_DIP_L: apply=true weight=1
      IKMarkerTask Index_TIP_L: apply=true weight=10
      IKMarkerTask Middle_TIP_L: apply=true weight=10
      IKMarkerTask Ring_TIP_L: apply=true weight=10
      IKMarkerTask Little_TIP_L: apply=true weight=10
